# OpenSim document version 20302
IKTaskSet:
  IKMarkerTask LASIS: apply=true weight=5
  IKMarkerTask RASIS: apply=true weight=5
  IKMarkerTask LPSIS: apply=true weight=2
  IKMarkerTask RPSIS: apply=true weight=2
  IKMarkerTask LDC: apply=true weight=2
  IKMarkerTask RT1: apply=true weight=1
  IKMarkerTask RT2: apply=true weight=1
  IKMarkerTask RT3: apply=true weight=1
  IKMarkerTask RT4: apply=false weight=1
  IKMarkerTask RS1: apply=false weight=1
  IKMarkerTask RS2: apply=true weight=1
  IKMarkerTask RS3: apply=true weight=1
  IKMarkerTask RS4: apply=true weight=1
  IKMarkerTask RDC: apply=true weight=2
  IKMarkerTask RLC: apply=true weight=0.2
  IKMarkerTask RMC: apply=true weight=0.2
  IKMarkerTask RNAV: apply=true weight=1
  IKMarkerTask RMB1: apply=true weight=0.1
  IKMarkerTask RMB5: apply=true weight=0.5
  IKMarkerTask RMH1: apply=true weight=0.5
  IKMarkerTask RMH5: apply=true weight=0.5
  IKMarkerTask RD1: apply=true weight=1
  IKMarkerTask LT1: apply=true weight=1
  IKMarkerTask LT2: apply=true weight=1
  IKMarkerTask LT3: apply=true weight=1
  IKMarkerTask LT4: apply=true weight=1
  IKMarkerTask LS1: apply=true weight=1
  IKMarkerTask LS2: apply=true weight=1
  IKMarkerTask LS3: apply=true weight=1
  IKMarkerTask LS4: apply=true weight=1
  IKMarkerTask LDC: apply=true weight=2
  IKMarkerTask LLC: apply=true weight=0.2
  IKMarkerTask LMC: apply=true weight=0.2
  IKMarkerTask LNAV: apply=true weight=1
  IKMarkerTask LMB1: apply=true weight=0.1
  IKMarkerTask LMB5: apply=true weight=0.5
  IKMarkerTask LMH1: apply=true weight=0.5
  IKMarkerTask LMH5: apply=true weight=0.5
  IKMarkerTask LD1: apply=true weight=1
