# OpenSim document version 20302
MeasurementSet:
  Measurement pelvis_w: apply=true
    MarkerPair: markers=(LASIS RASIS)
    BodyScale pelvis: axes=Z
  Measurement pelvis_d: apply=true
    MarkerPair: markers=(RASIS RPSIS)
    MarkerPair: markers=(LASIS LPSIS)
    BodyScale pelvis: axes=X
  Measurement pelvis_h: apply=true
    MarkerPair: markers=(RLKN RASIS)
    BodyScale pelvis: axes=Y
  Measurement femur_r: apply=true
    MarkerPair: markers=(RASIS RLKN)
    BodyScale femur_r: axes=(X Y Z)
    BodyScale patella_r: axes=(X Y Z)
  Measurement tibia_r: apply=true
    MarkerPair: markers=(RLKN RLM)
    BodyScale tibia_r: axes=(X Y Z)
  Measurement talus_r_w_d: apply=true
    MarkerPair: markers=(RMC RLC)
    BodyScale talus_r: axes=(X Z)
  Measurement foot_r_h: apply=true
    MarkerPair: markers=(RMM RD1)
    BodyScale talus_r: axes=Y
    BodyScale calcn_r: axes=Y
    BodyScale midfoot_r: axes=Y
    BodyScale forefoot_r: axes=Y
  Measurement rearfoot_r_w: apply=true
    MarkerPair: markers=(RMC RLC)
    BodyScale calcn_r: axes=Z
  Measurement rearfoot_r_l: apply=true
    MarkerPair: markers=(RDC RNAV)
    BodyScale calcn_r: axes=X
  Measurement midfoot_r_l_w: apply=true
    MarkerPair: markers=(RNAV RMB5)
    BodyScale midfoot_r: axes=(X Z)
  Measurement forefoot_r_l: apply=true
    MarkerPair: markers=(RMB2 RMH2)
    MarkerPair: markers=(RMB5 RMH5)
    BodyScale forefoot_r: axes=X
  Measurement forefoot_r_w: apply=true
    MarkerPair: markers=(RNAV RMB5)
    BodyScale forefoot_r: axes=Z
  Measurement digits_r_dh: apply=true
    MarkerPair: markers=(RMB1 RD1)
    BodyScale digits_r: axes=(X Y)
  Measurement digits_r_w: apply=true
    MarkerPair: markers=(RMH1 RMH5)
    MarkerPair: markers=(RNAV RMB5)
    BodyScale digits_r: axes=Z
  Measurement femur_l: apply=true
    MarkerPair: markers=(LASIS LLKN)
    BodyScale femur_l: axes=(X Y Z)
    BodyScale patella_l: axes=(X Y Z)
  Measurement tibia_l: apply=true
    MarkerPair: markers=(LLKN LLM)
    BodyScale tibia_l: axes=(X Y Z)
  Measurement talus_l_w_d: apply=true
    MarkerPair: markers=(LMC LLC)
    BodyScale talus_l: axes=(X Z)
  Measurement foot_l_h: apply=true
    MarkerPair: markers=(LMM LD1)
    BodyScale talus_l: axes=Y
    BodyScale calcn_l: axes=Y
    BodyScale midfoot_l: axes=Y
    BodyScale forefoot_l: axes=Y
  Measurement rearfoot_l_w: apply=true
    MarkerPair: markers=(LMC LLC)
    BodyScale calcn_l: axes=Z
  Measurement rearfoot_l_l: apply=true
    MarkerPair: markers=(LDC LNAV)
    BodyScale calcn_l: axes=X
  Measurement midfoot_l_l_w: apply=true
    MarkerPair: markers=(LNAV LMB5)
    BodyScale midfoot_l: axes=(X Z)
  Measurement forefoot_l_l: apply=true
    MarkerPair: markers=(LMB2 LMH2)
    MarkerPair: markers=(LMB5 LMH5)
    BodyScale forefoot_l: axes=X
  Measurement forefoot_l_w: apply=true
    MarkerPair: markers=(LNAV LMB5)
    BodyScale forefoot_l: axes=Z
  Measurement digits_l_dh: apply=true
    MarkerPair: markers=(LMB1 LD1)
    BodyScale digits_l: axes=(X Y)
  Measurement digits_l_w: apply=true
    MarkerPair: markers=(LMH1 LMH5)
    MarkerPair: markers=(LNAV LMB5)
    BodyScale digits_l: axes=Z
