# OpenSim document version 20302
IKTaskSet:
  IKMarkerTask LASIS: apply=true weight=10
  IKMarkerTask RASIS: apply=true weight=10
  IKMarkerTask LPSIS: apply=true weight=5
  IKMarkerTask RPSIS: apply=true weight=5
  IKMarkerTask LDC: apply=true weight=2
  IKMarkerTask RLKN: apply=true weight=0.3
  IKMarkerTask RMKN: apply=true weight=0.3
  IKMarkerTask RLM: apply=true weight=1
  IKMarkerTask RMM: apply=true weight=1
  IKMarkerTask RDC: apply=true weight=2
  IKMarkerTask RLC: apply=true weight=0.2
  IKMarkerTask RMC: apply=true weight=0.2
  IKMarkerTask RNAV: apply=true weight=0.5
  IKMarkerTask RMB1: apply=true weight=0.1
  IKMarkerTask RMB5: apply=true weight=0.5
  IKMarkerTask RMH1: apply=true weight=0.5
  IKMarkerTask RMH5: apply=true weight=0.5
  IKMarkerTask RD1: apply=true weight=0.1
  IKCoordinateTask subtalar_angle_r: apply=true weight=0.001 value_type=default_value value=0
  IKMarkerTask LT1: apply=false weight=0
  IKMarkerTask LLKN: apply=true weight=0.3
  IKMarkerTask LMKN: apply=true weight=0.3
  IKMarkerTask LLM: apply=true weight=1
  IKMarkerTask LMM: apply=true weight=1
  IKMarkerTask LDC: apply=true weight=2
  IKMarkerTask LLC: apply=true weight=0.2
  IKMarkerTask LMC: apply=true weight=0.2
  IKMarkerTask LNAV: apply=true weight=0.5
  IKMarkerTask LMB1: apply=true weight=0.1
  IKMarkerTask LMB5: apply=true weight=0.5
  IKMarkerTask LMH1: apply=true weight=0.5
  IKMarkerTask LMH5: apply=true weight=0.5
  IKMarkerTask LD1: apply=true weight=0.1
  IKCoordinateTask subtalar_angle_l: apply=true weight=0.001 value_type=default_value value=0
