# OpenSim document version 30000
Model Maharaj2021_BothLegs:
  length_units: meters
  force_units: N
  gravity: 0 -9.80665 0
  credits:
    Maharaj, J.N., Rainbow, M.J., Cresswell, A.G., Kessler, S., Konow, N., Gehring, D., and Lichtwark, G.A.
    Delp, S.L., Loan, J.P., Hoy, M.G., Zajac, F.E., Topp E.L., Rosen, J.M.
  publications:
    Modelling the complexity of the foot and ankle during human locomotion: the development and validation of a multi-segment foot model using biplanar videoradiography. Computer Methods in Biomechanics and Biomedical Engineering, 2021 DOI: 10.1080/10255842.2021.1968844
    An interactive graphics-based model of the lower extremity to study orthopaedic surgical procedures. IEEE Transactions on Biomedical Engineering, vol. 37, pp. 757-767, 1990.
  BodySet:
    Body ground: mass=0 mass_center=(0 0 0) inertia_xx=0 inertia_yy=0 inertia_zz=0
    Body pelvis: mass=46.37517 mass_center=(-0.0724376 0 0) inertia_xx=0.1042331 inertia_yy=0.08831422
        inertia_zz=0.05870716 meshes=(sacrum.vtp pelvis.vtp l_pelvis.vtp)
      CustomJoint ground_pelvis: parent_body=ground location_in_parent=(0 0 0) location=(0 0 0)
        Coordinate pelvis_rotation: motion_type=rotational default_value=0 range=(-0.2618 6.2832) clamped=true
        Coordinate pelvis_tilt: motion_type=rotational default_value=0 range=(-3.14 3.14) clamped=true
        Coordinate pelvis_list: motion_type=rotational default_value=0 range=(-3.14 3.14) clamped=true
        Coordinate pelvis_tx: motion_type=translational default_value=0.37 range=(-5 5) clamped=false
        Coordinate pelvis_ty: motion_type=translational default_value=1 range=(-1 2) clamped=false
        Coordinate pelvis_tz: motion_type=translational default_value=0.556 range=(-5 5) clamped=false
        SpatialTransform:
          TransformAxis rotation1: coordinates=pelvis_rotation axis=(0 1 0) LinearFunction(coefficients=1 0)
          TransformAxis rotation2: coordinates=pelvis_tilt axis=(0 0 1) LinearFunction(coefficients=1 0)
          TransformAxis rotation3: coordinates=pelvis_list axis=(1 0 0) LinearFunction(coefficients=1 0)
          TransformAxis translation1: coordinates=pelvis_tx axis=(1 0 0) LinearFunction(coefficients=1 0)
          TransformAxis translation2: coordinates=pelvis_ty axis=(0 1 0) LinearFunction(coefficients=1 0)
          TransformAxis translation3: coordinates=pelvis_tz axis=(0 0 1) LinearFunction(coefficients=1 0)
    Body femur_r: mass=8.984038 mass_center=(0 -0.195031 0) inertia_xx=0.1702207 inertia_yy=0.04462096
        inertia_zz=0.1795009 meshes=femur_r.vtp
      CustomJoint rhip: parent_body=pelvis location_in_parent=(-0.0707 -0.0661 0.0835) location=(0 0 0)
        Coordinate hip_flexion_r: motion_type=rotational default_value=0 range=(-0.1919862 1.658063) clamped=true
        Coordinate hip_adduction_r: motion_type=rotational default_value=0 range=(-0.8726646 0.2617994) clamped=true
        Coordinate hip_rotation_r: motion_type=rotational default_value=0 range=(-0.3490659 0.3490659) clamped=true
        SpatialTransform: axes_held_at_zero=(translation1 translation2 translation3)
          TransformAxis rotation1: coordinates=hip_flexion_r axis=(0 0 1) LinearFunction(coefficients=1 0)
          TransformAxis rotation2: coordinates=hip_adduction_r axis=(1 0 0) LinearFunction(coefficients=1 0)
          TransformAxis rotation3: coordinates=hip_rotation_r axis=(0 1 0) LinearFunction(coefficients=1 0)
    Body tibia_r: mass=3.581001 mass_center=(0 -0.184557 0) inertia_xx=0.04756937 inertia_yy=0.00481357
        inertia_zz=0.04823005 meshes=(tibia_r.vtp fibula_r.vtp)
      CustomJoint rfemoral-tibial: parent_body=femur_r location_in_parent=(0 0 0) location=(0 0 0)
        Coordinate knee_angle_r: motion_type=rotational default_value=0 range=(-2.094395 0) clamped=true
        SpatialTransform: axes_held_at_zero=(rotation2 rotation3 translation3)
          TransformAxis rotation1: coordinates=knee_angle_r axis=(0 0 1) LinearFunction(coefficients=1 0)
          TransformAxis translation1: coordinates=knee_angle_r axis=(1 0 0)
            SimmSpline: x=(-2.0944 -1.74533 -1.39626 -1.0472 -0.698132 -0.349066 -0.174533 0)
                y=(-0.0032 0.00179 0.00411 0.0041 0.00212 -0.001 -0.0031 -0.00525)
          TransformAxis translation2: coordinates=knee_angle axis=(0 1 0)
            SimmSpline: x=(-2.0944 -1.22173 -0.523599 -0.349066 -0.174533 0)
                y=(-0.4226 -0.4082 -0.399 -0.3976 -0.3966 -0.396)
    Body rpatella: mass=0 mass_center=(0 0 0) inertia_xx=0 inertia_yy=0 inertia_zz=0 meshes=pat.vtp
      CustomJoint rtp: parent_body=tibia_r location_in_parent=(0 0 0) location=(0 0 0)
        Coordinate tp_r3: motion_type=rotational default_value=-0.00116917 range=(-99999.9 99999.9) clamped=false
        Coordinate tp_tx: motion_type=translational default_value=0.0496 range=(-99999.9 99999.9) clamped=false
        Coordinate tp_ty: motion_type=translational default_value=-0.02268909 range=(-99999.9 99999.9) clamped=false
        Coordinate tp_tz: motion_type=translational default_value=0.0024 range=(-99999.9 99999.9) clamped=false
        SpatialTransform: axes_held_at_zero=(rotation2 rotation3)
          TransformAxis rotation1: coordinates=tp_r3 axis=(0 0 1) LinearFunction(coefficients=1 0)
          TransformAxis translation1: coordinates=tp_tx axis=(1 0 0) LinearFunction(coefficients=1 0)
          TransformAxis translation2: coordinates=tp_ty axis=(0 1 0) LinearFunction(coefficients=1 0)
          TransformAxis translation3: coordinates=tp_tz axis=(0 0 1) LinearFunction(coefficients=1 0)
    Body talus_r: mass=0.09658802 mass_center=(0 0 0) inertia_xx=0.00119861 inertia_yy=0.00119861 inertia_zz=0.00119861
        meshes=FootModel_talus_r.stl
      CustomJoint ankle_r: parent_body=tibia_r location_in_parent=(-0.005 -0.428 0.01) location=(0 0 0)
        Coordinate ankle_flexion_r: motion_type=rotational default_value=0 range=(-1.0472 1.0472) clamped=true
        Coordinate ankle_in_ev_r: motion_type=rotational default_value=0 range=(-0.0873 0.0873) clamped=true
        Coordinate ankle_rot_r: motion_type=rotational default_value=0 range=(-0.0873 0.0873) clamped=true
        SpatialTransform: axes_held_at_zero=(translation1 translation2 translation3)
          TransformAxis rotation1: coordinates=ankle_flexion_r axis=(0 0 -1) LinearFunction(coefficients=1 0)
          TransformAxis rotation2: coordinates=ankle_in_ev_r axis=(1 0 0) LinearFunction(coefficients=1 0)
          TransformAxis rotation3: coordinates=ankle_rot_r axis=(0 1 0) LinearFunction(coefficients=1 0)
    Body calcn_r: mass=0.6 mass_center=(0 0 0) inertia_xx=0.0005 inertia_yy=0.0015 inertia_zz=0.0002
        meshes=FootModel_calcn_r.stl
      CustomJoint subtalar_r: parent_body=talus_r location_in_parent=(-0.01 -0.041 -0.005) location=(0 0 0)
        Coordinate subtalar_angle_r: motion_type=rotational default_value=6.563574e-7 range=(-0.5236 0.5236)
            clamped=true
        SpatialTransform: axes_held_at_zero=(rotation2 rotation3 translation1 translation2 translation3)
          TransformAxis rotation1: coordinates=subtalar_angle_r axis=(0.7357 0.6157 -0.2824)
              LinearFunction(coefficients=1 0)
    Body midfoot_r: mass=0.2092096 mass_center=(0.0153464 0.00641489 0.000407659) inertia_xx=0.00010189
        inertia_yy=0.00020378 inertia_zz=0.00101891 meshes=FootModel_midfoot_r.stl
      CustomJoint midtarsal_r: parent_body=calcn_r location_in_parent=(0.047 0.025 0.004) location=(0 0 0)
        Coordinate midtarsal_angle_r: motion_type=rotational default_value=0 range=(-0.5236 0.5236) clamped=true
        SpatialTransform: axes_held_at_zero=(rotation2 rotation3 translation1 translation2 translation3)
          TransformAxis rotation1: coordinates=midtarsal_angle_r axis=(0.9392, 0.5666, -0.4183)
              LinearFunction(coefficients=1 0)
    Body forefoot_r: mass=0.4092096 mass_center=(0.03 0 0) inertia_xx=0.00010189 inertia_yy=0.00020378
        inertia_zz=0.00101891 meshes=FootModel_forefoot_r.stl
      CustomJoint tarsometatarsal_r: parent_body=midfoot_r location_in_parent=(0.035 -0.005 0.006) location=(0 0 0)
        Coordinate tarsometatarsal_angle_r: motion_type=rotational default_value=0 range=(-0.5236 0.5236) clamped=true
        SpatialTransform: axes_held_at_zero=(rotation2 rotation3 translation1 translation2 translation3)
          TransformAxis rotation1: coordinates=tarsometatarsal_angle_r axis=(0.5407 0.5872 -0.9361)
              LinearFunction(coefficients=1 0)
    Body digits_r: mass=0.15 mass_center=(-2.26868e-5 0.00112435 9.2251e-5) inertia_xx=5.189e-5 inertia_yy=0.00010378
        inertia_zz=0.00051891 meshes=FootModel_digits_r.stl
      CustomJoint digits_r: parent_body=forefoot_r location_in_parent=(0.074 -0.03 -0.002) location=(0 0 0)
        Coordinate mtp_angle_r: motion_type=rotational default_value=0 range=(-1.0472 0.5235988) clamped=true
        SpatialTransform: axes_held_at_zero=(rotation2 rotation3 translation1 translation2 translation3)
          TransformAxis rotation1: coordinates=mtp_angle_r axis=(0.3 0.25 -0.866) LinearFunction(coefficients=1 0)
    Body femur_l: mass=8.984038 mass_center=(0 -0.195031 0) inertia_xx=0.1702207 inertia_yy=0.04462096
        inertia_zz=0.1795009 meshes=femur_l.vtp
      CustomJoint lhip: parent_body=pelvis location_in_parent=(-0.0707 -0.0661 -0.0835) location=(0 0 0)
        Coordinate hip_flexion_l: motion_type=rotational default_value=0 range=(-0.1919862 1.658063) clamped=true
        Coordinate hip_adduction_l: motion_type=rotational default_value=0 range=(-0.8726646 0.2617994) clamped=true
        Coordinate hip_rotation_l: motion_type=rotational default_value=0 range=(-0.3490659 0.3490659) clamped=true
        SpatialTransform: axes_held_at_zero=(translation1 translation2 translation3)
          TransformAxis rotation1: coordinates=hip_flexion_l axis=(0 0 1) LinearFunction(coefficients=1 0)
          TransformAxis rotation2: coordinates=hip_adduction_l axis=(-1 0 0) LinearFunction(coefficients=1 0)
          TransformAxis rotation3: coordinates=hip_rotation_l axis=(0 -1 0) LinearFunction(coefficients=1 0)
    Body tibia_l: mass=3.581001 mass_center=(0 -0.184557 0) inertia_xx=0.04756937 inertia_yy=0.00481357
        inertia_zz=0.04823005 meshes=(tibia_l.vtp l_fibula.vtp)
      CustomJoint lfemoral-tibial: parent_body=femur_l location_in_parent=(0 0 0) location=(0 0 0)
        Coordinate knee_angle_l: motion_type=rotational default_value=0 range=(-2.094395 0) clamped=true
        SpatialTransform: axes_held_at_zero=(rotation2 rotation3 translation3)
          TransformAxis rotation1: coordinates=knee_angle_l axis=(0 0 1) LinearFunction(coefficients=1 0)
          TransformAxis translation1: coordinates=knee_angle_l axis=(1 0 0)
            SimmSpline: x=(-2.0944 -1.74533 -1.39626 -1.0472 -0.698132 -0.349066 -0.174533 0)
                y=(-0.0032 0.00179 0.00411 0.0041 0.00212 -0.001 -0.0031 -0.00525)
          TransformAxis translation2: coordinates=knee_angle_l axis=(0 1 0)
            SimmSpline: x=(-2.0944 -1.22173 -0.523599 -0.349066 -0.174533 0)
                y=(-0.4226 -0.4082 -0.399 -0.3976 -0.3966 -0.396)
    Body lpatella: mass=0 mass_center=(0 0 0) inertia_xx=0 inertia_yy=0 inertia_zz=0 meshes=l_pat.vtp
      CustomJoint ltp: parent_body=tibia_l location_in_parent=(0 0 0) location=(0 0 0)
        Coordinate ltp_r3: motion_type=rotational default_value=-0.00116917 range=(-99999.9 99999.9) clamped=false
        Coordinate ltp_tx: motion_type=translational default_value=0.0496 range=(-99999.9 99999.9) clamped=false
        Coordinate ltp_ty: motion_type=translational default_value=-0.02268909 range=(-99999.9 99999.9) clamped=false
        Coordinate ltp_tz: motion_type=translational default_value=-0.0024 range=(-99999.9 99999.9) clamped=false
        SpatialTransform: axes_held_at_zero=(rotation2 rotation3)
          TransformAxis rotation1: coordinates=ltp_r3 axis=(0 0 1) LinearFunction(coefficients=1 0)
          TransformAxis translation1: coordinates=ltp_tx axis=(1 0 0) LinearFunction(coefficients=1 0)
          TransformAxis translation2: coordinates=ltp_ty axis=(0 1 0) LinearFunction(coefficients=1 0)
          TransformAxis translation3: coordinates=ltp_tz axis=(0 0 1) LinearFunction(coefficients=1 0)
    Body talus_l: mass=0.09658802 mass_center=(0 0 0) inertia_xx=0.00119861 inertia_yy=0.00119861 inertia_zz=0.00119861
        meshes=FootModel_talus_l.stl
      CustomJoint ankle_l: parent_body=tibia_l location_in_parent=(-0.005 -0.428 -0.01) location=(0 0 0)
        Coordinate ankle_flexion_l: motion_type=rotational default_value=0 range=(-1.0472 1.0472) clamped=true
        Coordinate ankle_in_ev_l: motion_type=rotational default_value=0 range=(-0.0873 0.0873) clamped=true
        Coordinate ankle_rot_l: motion_type=rotational default_value=0 range=(-0.0873 0.0873) clamped=true
        SpatialTransform: axes_held_at_zero=(translation1 translation2 translation3)
          TransformAxis rotation1: coordinates=ankle_flexion_l axis=(0 0 -1) LinearFunction(coefficients=1 0)
          TransformAxis rotation2: coordinates=ankle_in_ev_l axis=(-1 0 0) LinearFunction(coefficients=1 0)
          TransformAxis rotation3: coordinates=ankle_rot_l axis=(0 -1 0) LinearFunction(coefficients=1 0)
    Body calcn_l: mass=0.6 mass_center=(0 0 0) inertia_xx=0.0005 inertia_yy=0.0015 inertia_zz=0.0002
        meshes=FootModel_calcn_l.stl
      CustomJoint subtalar_l: parent_body=talus_l location_in_parent=(-0.01 -0.041 0.005) location=(0 0 0)
        Coordinate subtalar_angle_l: motion_type=rotational default_value=6.563574e-7 range=(-0.5236 0.5236)
            clamped=true
        SpatialTransform: axes_held_at_zero=(rotation2 rotation3 translation1 translation2 translation3)
          TransformAxis rotation1: coordinates=subtalar_angle_l axis=(-0.7357 -0.6157 -0.2824)
              LinearFunction(coefficients=1 0)
    Body midfoot_l: mass=0.2092096 mass_center=(0.0153464 0.00641489 0.000407659) inertia_xx=0.00010189
        inertia_yy=0.00020378 inertia_zz=0.00101891 meshes=FootModel_midfoot_l.stl
      CustomJoint midtarsal_l: parent_body=calcn_l location_in_parent=(0.047 0.025 0.004) location=(0 0 0)
        Coordinate midtarsal_angle_l: motion_type=rotational default_value=0 range=(-0.5236 0.5236) clamped=true
        SpatialTransform: axes_held_at_zero=(rotation2 rotation3 translation1 translation2 translation3)
          TransformAxis rotation1: coordinates=midtarsal_angle_l axis=(-0.9392, -0.5666, -0.4183)
              LinearFunction(coefficients=1 0)
    Body forefoot_l: mass=0.4092096 mass_center=(0.03 0 0) inertia_xx=0.00010189 inertia_yy=0.00020378
        inertia_zz=0.00101891 meshes=FootModel_forefoot_l.stl
      CustomJoint tarsometatarsal_l: parent_body=midfoot_l location_in_parent=(0.035 -0.005 0.006) location=(0 0 0)
        Coordinate tarsometatarsal_angle_l: motion_type=rotational default_value=0 range=(-0.5236 0.5236) clamped=true
        SpatialTransform: axes_held_at_zero=(rotation2 rotation3 translation1 translation2 translation3)
          TransformAxis rotation1: coordinates=tarsometatarsal_angle_l axis=(-0.5407 -0.5872 -0.9361)
              LinearFunction(coefficients=1 0)
    Body digits_l: mass=0.15 mass_center=(-2.26868e-5 0.00112435 9.2251e-5) inertia_xx=5.189e-5 inertia_yy=0.00010378
        inertia_zz=0.00051891 meshes=FootModel_digits_l.stl
      CustomJoint digits_l: parent_body=forefoot_l location_in_parent=(0.074 -0.03 -0.002) location=(0 0 0)
        Coordinate mtp_angle_l: motion_type=rotational default_value=0 range=(-1.0472 0.5235988) clamped=true
        SpatialTransform: axes_held_at_zero=(rotation2 rotation3 translation1 translation2 translation3)
          TransformAxis rotation1: coordinates=mtp_angle_l axis=(-0.3 -0.25 -0.866) LinearFunction(coefficients=1 0)
  ConstraintSet:
    CoordinateCouplerConstraint tp_r3_con: independent_coordinate_names=knee_angle_r dependent_coordinate_name=tp_r3
        scale_factor=1
      coupled_coordinates_function: SimmSpline: x=(-2.0944 -1.99997 -1.45752 -0.526391 0.0279253 0.174533)
          y=(0.308051 0.308051 0.306305 0.270177 -0.037001 -0.279951)
    CoordinateCouplerConstraint tp_tx_con: independent_coordinate_names=knee_angle_r dependent_coordinate_name=tp_tx
        scale_factor=1
      coupled_coordinates_function: SimmSpline: x=(-2.0944 -1.39626 -1.0472 -0.698132 -0.349066 -0.174533 0)
          y=(0.0173 0.0324 0.0381 0.043 0.0469 0.0484 0.0496)
    CoordinateCouplerConstraint tp_ty_con: independent_coordinate_names=knee_angle_r dependent_coordinate_name=tp_ty
        scale_factor=1
      coupled_coordinates_function: SimmSpline: x=(-2.0944 -1.5708 -1.39626 -1.0472 -0.698132 -0.349066 -0.174533 0.00499164)
          y=(-0.0219 -0.0202 -0.02 -0.0204 -0.0211 -0.0219 -0.0223 -0.0227)
    CoordinateCouplerConstraint tp_tz_con: independent_coordinate_names=knee_angle_r dependent_coordinate_name=tp_tz
        scale_factor=1
      coupled_coordinates_function: SimmSpline: x=(-17453.3 17453.3) y=(0.0024 0.0024)
    CoordinateCouplerConstraint ltp_r3_con: independent_coordinate_names=knee_angle_l dependent_coordinate_name=ltp_r3
        scale_factor=1
      coupled_coordinates_function: SimmSpline: x=(-2.0944 -1.99997 -1.45752 -0.526391 0.0279253 0.174533)
          y=(0.308051 0.308051 0.306305 0.270177 -0.037001 -0.279951)
    CoordinateCouplerConstraint ltp_tx_con: independent_coordinate_names=knee_angle_l dependent_coordinate_name=ltp_tx
        scale_factor=1
      coupled_coordinates_function: SimmSpline: x=(-2.0944 -1.39626 -1.0472 -0.698132 -0.349066 -0.174533 0)
          y=(0.0173 0.0324 0.0381 0.043 0.0469 0.0484 0.0496)
    CoordinateCouplerConstraint ltp_ty_con: independent_coordinate_names=knee_angle_l dependent_coordinate_name=ltp_ty
        scale_factor=1
      coupled_coordinates_function: SimmSpline: x=(-2.0944 -1.5708 -1.39626 -1.0472 -0.698132 -0.349066 -0.174533 0.00499164)
          y=(-0.0219 -0.0202 -0.02 -0.0204 -0.0211 -0.0219 -0.0223 -0.0227)
    CoordinateCouplerConstraint ltp_tz_con: independent_coordinate_names=knee_angle_l dependent_coordinate_name=ltp_tz
        scale_factor=1
      coupled_coordinates_function: SimmSpline: x=(-17453.3 17453.3) y=(-0.0024 -0.0024)
  ForceSet:
    Schutte1993Muscle_Deprecated [values shared by the 93 below unless stated]: min_control=0 max_control=1
        optimal_force=1 max_contraction_velocity=10 time_scale=0.1 activation1=7.667 activation2=1.459854 damping=0.1
      tendon_force_length_curve: SimmSpline: x=(-10 -0.002 -0.001 0 0.00131 0.00281 0.00431 0.00581 0.00731 0.00881 0.0103 0.0118 0.0123 9.2 9.201 9.202 20)
          y=(0 0 0 0 0.0108 0.0257 0.0435 0.0652 0.0915 0.123 0.161 0.208 0.227 345 345 345 345)
      active_force_length_curve: SimmSpline: x=(-5 0 0.401 0.402 0.4035 0.52725 0.62875 0.71875 0.86125 1.045 1.2175 1.43875 1.61875 1.62 1.621 2.2 5)
          y=(0 0 0 0 0 0.226667 0.636667 0.856667 0.95 0.993333 0.77 0.246667 0 0 0 0 0)
      passive_force_length_curve: SimmSpline: x=(-5 0.998 0.999 1 1.1 1.2 1.3 1.4 1.5 1.6 1.601 1.602 5)
          y=(0 0 0 0 0.035 0.12 0.26 0.55 1.17 2 2 2 2)
    Schutte1993Muscle_Deprecated GMED1: max_isometric_force=546 optimal_fiber_length=0.0535 tendon_slack_length=0.078
        pennation_angle_at_optimal=0.1396263 [radians]
      PathPoint P1: pelvis (-0.0408 0.0304 0.1209)
      PathPoint P2: femur_r (-0.0218 -0.0117 0.0555)
    Schutte1993Muscle_Deprecated GMED2: max_isometric_force=382 optimal_fiber_length=0.0845 tendon_slack_length=0.053
        pennation_angle_at_optimal=0
      PathPoint P1: pelvis (-0.0855 0.0445 0.0766)
      PathPoint P2: femur_r (-0.0258 -0.0058 0.0527)
    Schutte1993Muscle_Deprecated GMED3: max_isometric_force=435 optimal_fiber_length=0.0646 tendon_slack_length=0.053
        pennation_angle_at_optimal=0.3316126
      PathPoint P1: pelvis (-0.1223 0.0105 0.0648)
      PathPoint P2: femur_r (-0.0309 -0.0047 0.0518)
    Schutte1993Muscle_Deprecated GMIN1: max_isometric_force=180 optimal_fiber_length=0.068 tendon_slack_length=0.016
        pennation_angle_at_optimal=0.1745329
      PathPoint P1: pelvis (-0.0467 -0.008 0.1056)
      PathPoint P2: femur_r (-0.0072 -0.0104 0.056)
    Schutte1993Muscle_Deprecated GMIN2: max_isometric_force=190 optimal_fiber_length=0.056 tendon_slack_length=0.026
        pennation_angle_at_optimal=0
      PathPoint P1: pelvis (-0.0633 -0.0065 0.0991)
      PathPoint P2: femur_r (-0.0096 -0.0104 0.056)
    Schutte1993Muscle_Deprecated GMIN3: max_isometric_force=215 optimal_fiber_length=0.038 tendon_slack_length=0.051
        pennation_angle_at_optimal=0.3665191
      PathPoint P1: pelvis (-0.0834 -0.0063 0.0856)
      PathPoint P2: femur_r (-0.0135 -0.0083 0.055)
    Schutte1993Muscle_Deprecated SEMIMEM: max_isometric_force=1030 optimal_fiber_length=0.08 tendon_slack_length=0.359
        pennation_angle_at_optimal=0.2617994
      PathPoint P1: pelvis (-0.1192 -0.1015 0.0695)
      PathPoint P2: tibia_r (-0.0243 -0.0536 -0.0194)
    Schutte1993Muscle_Deprecated SEMITEN: max_isometric_force=328 optimal_fiber_length=0.201 tendon_slack_length=0.262
        pennation_angle_at_optimal=0.08726646
      PathPoint P1: pelvis (-0.1237 -0.1043 0.0603)
      PathPoint P2: tibia_r (-0.0314 -0.0545 -0.0146)
      PathPoint P3: tibia_r (-0.0113 -0.0746 -0.0245)
      PathPoint P4: tibia_r (0.0027 -0.0956 -0.0193)
    Schutte1993Muscle_Deprecated BIFEMLH: max_isometric_force=717 optimal_fiber_length=0.109 tendon_slack_length=0.341
        pennation_angle_at_optimal=0
      PathPoint P1: pelvis (-0.1244 -0.1001 0.0666)
      PathPoint P2: tibia_r (-0.0081 -0.0729 0.0423)
    Schutte1993Muscle_Deprecated HAMSTRINGS: max_isometric_force=717 optimal_fiber_length=0.109
        tendon_slack_length=0.341 pennation_angle_at_optimal=0
      PathPoint P1: pelvis (-0.1244 -0.1001 0.0666)
      PathPoint P2: tibia_r (-0.0081 -0.0729 0.0423)
    Schutte1993Muscle_Deprecated BIFEMSH: max_isometric_force=402 optimal_fiber_length=0.173 tendon_slack_length=0.1
        pennation_angle_at_optimal=0.4014257
      PathPoint P1: femur_r (0.005 -0.2111 0.0234)
      PathPoint P2: tibia_r (-0.0101 -0.0725 0.0406)
    Schutte1993Muscle_Deprecated SAR: max_isometric_force=104 optimal_fiber_length=0.579 tendon_slack_length=0.04
        pennation_angle_at_optimal=0
      PathPoint P1: pelvis (-0.0153 -0.0013 0.1242)
      PathPoint P2: femur_r (-0.003 -0.3568 -0.0421)
      PathPoint P3: tibia_r (-0.0056 -0.0419 -0.0399)
      PathPoint P4: tibia_r (0.006 -0.0589 -0.0383)
      PathPoint P5: tibia_r (0.0243 -0.084 -0.0252)
    Schutte1993Muscle_Deprecated RF: max_isometric_force=779 optimal_fiber_length=0.084 tendon_slack_length=0.346
        pennation_angle_at_optimal=0.08726646
      PathPoint P1: pelvis (-0.0295 -0.0311 0.0968)
      ConditionalPathPoint P2: femur_r (0.0334 -0.403 0.0019) range=(-2.61799 -1.45997) coordinate=knee_angle_r
      PathPoint P3: rpatella (0.0121 0.0437 -0.001)
    Schutte1993Muscle_Deprecated ADDLONG: max_isometric_force=418 optimal_fiber_length=0.138 tendon_slack_length=0.11
        pennation_angle_at_optimal=0.1047198
      PathPoint P1: pelvis (-0.0316 -0.0836 0.0169)
      PathPoint P2: femur_r (0.005 -0.2111 0.0234)
    Schutte1993Muscle_Deprecated ADDBREV: max_isometric_force=286 optimal_fiber_length=0.133 tendon_slack_length=0.02
        pennation_angle_at_optimal=0
      PathPoint P1: pelvis (-0.0587 -0.0915 0.0164)
      PathPoint P2: femur_r (0.0009 -0.1196 0.0294)
    Schutte1993Muscle_Deprecated AMAG1: max_isometric_force=346 optimal_fiber_length=0.087 tendon_slack_length=0.06
        pennation_angle_at_optimal=0.08726646
      PathPoint P1: pelvis (-0.0732 -0.1174 0.0255)
      PathPoint P2: femur_r (-0.0045 -0.1211 0.0339)
    Schutte1993Muscle_Deprecated AMAG2: max_isometric_force=312 optimal_fiber_length=0.121 tendon_slack_length=0.13
        pennation_angle_at_optimal=0.05235988
      PathPoint P1: pelvis (-0.0831 -0.1192 0.0308)
      PathPoint P2: femur_r (0.0054 -0.2285 0.0227)
    Schutte1993Muscle_Deprecated AMAG3: max_isometric_force=444 optimal_fiber_length=0.131 tendon_slack_length=0.26
        pennation_angle_at_optimal=0.08726646
      PathPoint P1: pelvis (-0.0771 -0.1181 0.0276)
      PathPoint P2: femur_r (0.007 -0.3837 -0.0266)
    Schutte1993Muscle_Deprecated TFL: max_isometric_force=155 optimal_fiber_length=0.095 tendon_slack_length=0.425
        pennation_angle_at_optimal=0.05235988
      PathPoint P1: pelvis (-0.0311 0.0214 0.1241)
      PathPoint P2: femur_r (0.0294 -0.0995 0.0597)
      PathPoint P3: femur_r (0.0054 -0.4049 0.0357)
      PathPoint P4: tibia_r (0.006 -0.0487 0.0297)
    Schutte1993Muscle_Deprecated PECT: max_isometric_force=177 optimal_fiber_length=0.133 tendon_slack_length=0.001
        pennation_angle_at_optimal=0
      PathPoint P1: pelvis (-0.0431 -0.0768 0.0451)
      PathPoint P2: femur_r (-0.0122 -0.0822 0.0253)
    Schutte1993Muscle_Deprecated GRA: max_isometric_force=108 optimal_fiber_length=0.352 tendon_slack_length=0.14
        pennation_angle_at_optimal=0.05235988
      PathPoint P1: pelvis (-0.0563 -0.1038 0.0079)
      PathPoint P2: tibia_r (-0.0154 -0.0475 -0.0358)
      PathPoint P3: tibia_r (0.006 -0.0836 -0.0228)
    Schutte1993Muscle_Deprecated GMAX1: max_isometric_force=382 optimal_fiber_length=0.142 tendon_slack_length=0.125
        pennation_angle_at_optimal=0.08726646
      PathPoint P1: pelvis (-0.1195 0.0612 0.07)
      PathPoint P2: pelvis (-0.1291 0.0012 0.0886)
      PathPoint P3: femur_r (-0.0457 -0.0248 0.0392)
      PathPoint P4: femur_r (-0.0277 -0.0566 0.047)
    Schutte1993Muscle_Deprecated GMAX2: max_isometric_force=546 optimal_fiber_length=0.147 tendon_slack_length=0.127
        pennation_angle_at_optimal=0
      PathPoint P1: pelvis (-0.1349 0.0176 0.0563)
      PathPoint P2: pelvis (-0.1376 -0.052 0.0914)
      PathPoint P3: femur_r (-0.0426 -0.053 0.0293)
      PathPoint P4: femur_r (-0.0156 -0.1016 0.0419)
    Schutte1993Muscle_Deprecated GMAX3: max_isometric_force=368 optimal_fiber_length=0.144 tendon_slack_length=0.145
        pennation_angle_at_optimal=0.08726646
      PathPoint P1: pelvis (-0.1556 -0.0314 0.0058)
      PathPoint P2: pelvis (-0.1529 -0.1052 0.0403)
      PathPoint P3: femur_r (-0.0299 -0.1041 0.0135)
      PathPoint P4: femur_r (-0.006 -0.1419 0.0411)
    Schutte1993Muscle_Deprecated ILIACUS: max_isometric_force=429 optimal_fiber_length=0.1 tendon_slack_length=0.09
        pennation_angle_at_optimal=0.1221731
      PathPoint P1: pelvis (-0.0674 0.0365 0.0854)
      PathPoint P2: pelvis (-0.0218 -0.055 0.0851)
      PathPoint P3: femur_r (0.0017 -0.0543 0.0057)
      PathPoint P4: femur_r (-0.0193 -0.0621 0.0129)
    Schutte1993Muscle_Deprecated PSOAS: max_isometric_force=371 optimal_fiber_length=0.104 tendon_slack_length=0.13
        pennation_angle_at_optimal=0.1396263
      PathPoint P1: pelvis (-0.0647 0.0887 0.0289)
      PathPoint P2: pelvis (-0.0238 -0.057 0.0759)
      PathPoint P3: femur_r (0.0016 -0.0507 0.0038)
      PathPoint P4: femur_r (-0.0188 -0.0597 0.0104)
    Schutte1993Muscle_Deprecated QUADFEM: max_isometric_force=254 optimal_fiber_length=0.054 tendon_slack_length=0.024
        pennation_angle_at_optimal=0
      PathPoint P1: pelvis (-0.1143 -0.1151 0.052)
      PathPoint P2: femur_r (-0.0381 -0.0359 0.0366)
    Schutte1993Muscle_Deprecated GLEM: max_isometric_force=109 optimal_fiber_length=0.024 tendon_slack_length=0.039
        pennation_angle_at_optimal=0
      PathPoint P1: pelvis (-0.1133 -0.082 0.0714)
      PathPoint P2: femur_r (-0.0142 -0.0033 0.0443)
    Schutte1993Muscle_Deprecated PERI: max_isometric_force=296 optimal_fiber_length=0.026 tendon_slack_length=0.115
        pennation_angle_at_optimal=0.1745329
      PathPoint P1: pelvis (-0.1396 0.0003 0.0235)
      PathPoint P2: pelvis (-0.1193 -0.0276 0.0657)
      PathPoint P3: femur_r (-0.0148 -0.0036 0.0437)
    Schutte1993Muscle_Deprecated VASMED: max_isometric_force=1294 optimal_fiber_length=0.089 tendon_slack_length=0.126
        pennation_angle_at_optimal=0.08726646
      PathPoint P1: femur_r (0.014 -0.2099 0.0188)
      PathPoint P2: femur_r (0.0356 -0.2769 0.0009)
      ConditionalPathPoint P3: femur_r (0.037 -0.4048 -0.0125) range=(-2.61799 -1.20986) coordinate=knee_angle_r
      ConditionalPathPoint P4: femur_r (0.0274 -0.4255 -0.0131) range=(-2.61799 -1.78006) coordinate=knee_angle_r
      PathPoint P5: rpatella (0.0063 0.0445 -0.017)
    Schutte1993Muscle_Deprecated VASINT: max_isometric_force=1365 optimal_fiber_length=0.087 tendon_slack_length=0.136
        pennation_angle_at_optimal=0.05235988
      PathPoint P1: femur_r (0.029 -0.1924 0.031)
      PathPoint P2: femur_r (0.0335 -0.2084 0.0285)
      ConditionalPathPoint P3: femur_r (0.0343 -0.403 0.0055) range=(-2.61799 -1.42) coordinate=knee_angle_r
      PathPoint P4: rpatella (0.0058 0.048 -0.0006)
    Schutte1993Muscle_Deprecated VASLAT: max_isometric_force=1871 optimal_fiber_length=0.084 tendon_slack_length=0.157
        pennation_angle_at_optimal=0.08726646
      PathPoint P1: femur_r (0.0048 -0.1854 0.0349)
      PathPoint P2: femur_r (0.0269 -0.2591 0.0409)
      ConditionalPathPoint P3: femur_r (0.0361 -0.403 0.0205) range=(-2.61799 -1.20986) coordinate=knee_angle_r
      ConditionalPathPoint P4: femur_r (0.0253 -0.4243 0.0184) range=(-2.61799 -1.91986) coordinate=knee_angle_r
      PathPoint P5: rpatella (0.0103 0.0423 0.0141)
    Schutte1993Muscle_Deprecated MEDGAS: max_isometric_force=1113 optimal_fiber_length=0.045 tendon_slack_length=0.408
        pennation_angle_at_optimal=0.296706
      PathPoint P1: femur_r (-0.0127 -0.3929 -0.0235)
      ConditionalPathPoint P2: femur_r (-0.0239 -0.4022 -0.0258) range=(-0.770039 0.100007) coordinate=knee_angle_r
      PathPoint P3: tibia_r (-0.0217 -0.0487 -0.0295)
      PathPoint P4: calcn_r (0.0044 0.031 -0.0053)
    Schutte1993Muscle_Deprecated LATGAS: max_isometric_force=488 optimal_fiber_length=0.064 tendon_slack_length=0.385
        pennation_angle_at_optimal=0.1396263
      PathPoint P1: femur_r (-0.0155 -0.3946 0.0272)
      ConditionalPathPoint P2: femur_r (-0.0254 -0.4018 0.0274) range=(-0.770039 0.100007) coordinate=knee_angle_r
      PathPoint P3: tibia_r (-0.0242 -0.0481 0.0235)
      PathPoint P4: calcn_r (0.0044 0.031 -0.0053)
    Schutte1993Muscle_Deprecated SOL: max_isometric_force=2839 optimal_fiber_length=0.03 tendon_slack_length=0.268
        pennation_angle_at_optimal=0.4363323
      PathPoint P1: tibia_r (-0.0024 -0.1533 0.0071)
      PathPoint P2: calcn_r (0.0044 0.031 -0.0053)
    Schutte1993Muscle_Deprecated SOLSTIF: max_isometric_force=2839 optimal_fiber_length=0.03 tendon_slack_length=0.268
        pennation_angle_at_optimal=0.4363323
      PathPoint P1: tibia_r (-0.0024 -0.1533 0.0071)
      PathPoint P2: calcn_r (0.0044 0.031 -0.0053)
      tendon_force_length_curve: SimmSpline: x=(-10 -0.002 -0.001 0 0.00131 0.00281 0.00431 0.00581 0.00731 0.00881 0.0103 0.0118 0.0123 9.2 9.201 9.202 20)
          y=(0 0 0 0 1.08 2.57 4.35 6.52 9.15 12.3 16.1 20.8 22.7 34500 34500 34500 34500)
    Schutte1993Muscle_Deprecated TIBPOST: max_isometric_force=1270 optimal_fiber_length=0.031 tendon_slack_length=0.31
        pennation_angle_at_optimal=0.2094395
      PathPoint P1: tibia_r (-0.0094 -0.1348 0.0019)
      PathPoint P2: tibia_r (-0.0144 -0.4051 -0.0229)
      PathPoint P3: calcn_r (0.0417 0.0334 -0.0286)
      PathPoint P4: calcn_r (0.0772 0.0159 -0.0281)
    Schutte1993Muscle_Deprecated FLEXDIG: max_isometric_force=310 optimal_fiber_length=0.034 tendon_slack_length=0.4
        pennation_angle_at_optimal=0.1221731
      PathPoint P1: tibia_r (-0.0083 -0.2046 -0.0018)
      PathPoint P2: tibia_r (-0.0154 -0.4051 -0.0196)
      PathPoint P3: calcn_r (0.0436 0.0315 -0.028)
      PathPoint P4: calcn_r (0.0708 0.0176 -0.0263)
      PathPoint P5: calcn_r (0.1658 -0.0081 0.0116)
      PathPoint P6: digits_r (-0.0019 -0.0078 0.0147)
      PathPoint P7: digits_r (0.0285 -0.0071 0.0215)
      PathPoint P8: digits_r (0.0441 -0.006 0.0242)
    Schutte1993Muscle_Deprecated FLEXHAL: max_isometric_force=322 optimal_fiber_length=0.043 tendon_slack_length=0.38
        pennation_angle_at_optimal=0.1745329
      PathPoint P1: tibia_r (-0.0079 -0.2334 0.0244)
      PathPoint P2: tibia_r (-0.0186 -0.4079 -0.0174)
      PathPoint P3: calcn_r (0.0374 0.0276 -0.0241)
      PathPoint P4: calcn_r (0.1038 0.0068 -0.0256)
      PathPoint P5: calcn_r (0.1726 -0.0053 -0.0269)
      PathPoint P6: digits_r (0.0155 -0.0064 -0.0265)
      PathPoint P7: digits_r (0.0562 -0.0102 -0.0181)
    Schutte1993Muscle_Deprecated TIBANT: max_isometric_force=603 optimal_fiber_length=0.098 tendon_slack_length=0.223
        pennation_angle_at_optimal=0.08726646
      PathPoint P1: tibia_r (0.0179 -0.1624 0.0115)
      PathPoint P2: tibia_r (0.0329 -0.3951 -0.0177)
      PathPoint P3: calcn_r (0.1166 0.0178 -0.0305)
    Schutte1993Muscle_Deprecated PERBREV: max_isometric_force=348 optimal_fiber_length=0.05 tendon_slack_length=0.161
        pennation_angle_at_optimal=0.08726646
      PathPoint P1: tibia_r (-0.007 -0.2646 0.0325)
      PathPoint P2: tibia_r (-0.0198 -0.4184 0.0283)
      PathPoint P3: tibia_r (-0.0144 -0.4295 0.0289)
      PathPoint P4: calcn_r (0.0471 0.027 0.0233)
      PathPoint P5: calcn_r (0.0677 0.0219 0.0343)
    Schutte1993Muscle_Deprecated PERLONG: max_isometric_force=754 optimal_fiber_length=0.049 tendon_slack_length=0.345
        pennation_angle_at_optimal=0.1745329
      PathPoint P1: tibia_r (0.0005 -0.1568 0.0362)
      PathPoint P2: tibia_r (-0.0207 -0.4205 0.0286)
      PathPoint P3: tibia_r (-0.0162 -0.4319 0.0289)
      PathPoint P4: calcn_r (0.0438 0.023 0.0221)
      PathPoint P5: calcn_r (0.0681 0.0106 0.0284)
      PathPoint P6: calcn_r (0.0852 0.0069 0.0118)
      PathPoint P7: calcn_r (0.1203 0.0085 -0.0184)
    Schutte1993Muscle_Deprecated PERTERT: max_isometric_force=90 optimal_fiber_length=0.079 tendon_slack_length=0.1
        pennation_angle_at_optimal=0.2268928
      PathPoint P1: tibia_r (0.001 -0.2804 0.0231)
      PathPoint P2: tibia_r (0.0229 -0.4069 0.0159)
      PathPoint P3: calcn_r (0.0857 0.0228 0.0299)
    Schutte1993Muscle_Deprecated EXTDIG: max_isometric_force=341 optimal_fiber_length=0.102 tendon_slack_length=0.345
        pennation_angle_at_optimal=0.1396263
      PathPoint P1: tibia_r (0.0032 -0.1381 0.0276)
      PathPoint P2: tibia_r (0.0289 -0.4007 0.0072)
      PathPoint P3: calcn_r (0.0922 0.0388 -0.0001)
      PathPoint P4: calcn_r (0.1616 0.0055 0.013)
      PathPoint P5: digits_r (0.0003 0.0047 0.0153)
      PathPoint P6: digits_r (0.0443 -0.0004 0.025)
    Schutte1993Muscle_Deprecated EXTHAL: max_isometric_force=108 optimal_fiber_length=0.111 tendon_slack_length=0.305
        pennation_angle_at_optimal=0.1047198
      PathPoint P1: tibia_r (0.0012 -0.1767 0.0228)
      PathPoint P2: tibia_r (0.0326 -0.3985 -0.0085)
      PathPoint P3: calcn_r (0.097 0.0389 -0.0211)
      PathPoint P4: calcn_r (0.1293 0.0309 -0.0257)
      PathPoint P5: calcn_r (0.1734 0.0139 -0.028)
      PathPoint P6: digits_r (0.0298 0.0041 -0.0245)
      PathPoint P7: digits_r (0.0563 0.0034 -0.0186)
    Schutte1993Muscle_Deprecated LIGPAT: max_isometric_force=100 optimal_fiber_length=0.05 tendon_slack_length=0.005
        pennation_angle_at_optimal=0
      PathPoint P1: tibia_r (0.039 -0.0822 0)
      PathPoint P2: rpatella (0.0021 0.0015 0.0001)
    Schutte1993Muscle_Deprecated TPOST2: max_isometric_force=1270 optimal_fiber_length=0.031 tendon_slack_length=0.31
        pennation_angle_at_optimal=0.2094395
      PathPoint P1: tibia_r (-0.0094 -0.1348 0.0019)
      PathPoint P2: tibia_r (0.0063 -0.3505 0.0146)
      PathPoint P3: tibia_r (0.0165 -0.3904 0.0176)
      PathPoint P4: calcn_r (0.0912 0.0463 0.0086)
      PathPoint P5: calcn_r (0.105 0.0325 0.0093)
    Schutte1993Muscle_Deprecated LGMED1: max_isometric_force=546 optimal_fiber_length=0.0535 tendon_slack_length=0.078
        pennation_angle_at_optimal=0.1396263
      PathPoint P1: pelvis (-0.0408 0.0304 -0.1209)
      PathPoint P2: femur_l (-0.0218 -0.0117 -0.0555)
    Schutte1993Muscle_Deprecated LGMED2: max_isometric_force=382 optimal_fiber_length=0.0845 tendon_slack_length=0.053
        pennation_angle_at_optimal=0
      PathPoint P1: pelvis (-0.0855 0.0445 -0.0766)
      PathPoint P2: femur_l (-0.0258 -0.0058 -0.0527)
    Schutte1993Muscle_Deprecated LGMED3: max_isometric_force=435 optimal_fiber_length=0.0646 tendon_slack_length=0.053
        pennation_angle_at_optimal=0.3316126
      PathPoint P1: pelvis (-0.1223 0.0105 -0.0648)
      PathPoint P2: femur_l (-0.0309 -0.0047 -0.0518)
    Schutte1993Muscle_Deprecated LGMIN1: max_isometric_force=180 optimal_fiber_length=0.068 tendon_slack_length=0.016
        pennation_angle_at_optimal=0.1745329
      PathPoint P1: pelvis (-0.0467 -0.008 -0.1056)
      PathPoint P2: femur_l (-0.0072 -0.0104 -0.056)
    Schutte1993Muscle_Deprecated LGMIN2: max_isometric_force=190 optimal_fiber_length=0.056 tendon_slack_length=0.026
        pennation_angle_at_optimal=0
      PathPoint P1: pelvis (-0.0633 -0.0065 -0.0991)
      PathPoint P2: femur_l (-0.0096 -0.0104 -0.056)
    Schutte1993Muscle_Deprecated LGMIN3: max_isometric_force=215 optimal_fiber_length=0.038 tendon_slack_length=0.051
        pennation_angle_at_optimal=0.3665191
      PathPoint P1: pelvis (-0.0834 -0.0063 -0.0856)
      PathPoint P2: femur_l (-0.0135 -0.0083 -0.055)
    Schutte1993Muscle_Deprecated LSEMIMEM: max_isometric_force=1030 optimal_fiber_length=0.08 tendon_slack_length=0.359
        pennation_angle_at_optimal=0.2617994
      PathPoint P1: pelvis (-0.1192 -0.1015 -0.0695)
      PathPoint P2: tibia_l (-0.0243 -0.0536 0.0194)
    Schutte1993Muscle_Deprecated LSEMITEN: max_isometric_force=328 optimal_fiber_length=0.201 tendon_slack_length=0.262
        pennation_angle_at_optimal=0.08726646
      PathPoint P1: pelvis (-0.1237 -0.1043 -0.0603)
      PathPoint P2: tibia_l (-0.0314 -0.0545 0.0146)
      PathPoint P3: tibia_l (-0.0113 -0.0746 0.0245)
      PathPoint P4: tibia_l (0.0027 -0.0956 0.0193)
    Schutte1993Muscle_Deprecated LBIFEMLH: max_isometric_force=717 optimal_fiber_length=0.109 tendon_slack_length=0.341
        pennation_angle_at_optimal=0
      PathPoint P1: pelvis (-0.1244 -0.1001 -0.0666)
      PathPoint P2: tibia_l (-0.0081 -0.0729 -0.0423)
    Schutte1993Muscle_Deprecated LBIFEMSH: max_isometric_force=402 optimal_fiber_length=0.173 tendon_slack_length=0.1
        pennation_angle_at_optimal=0.4014257
      PathPoint P1: femur_l (0.005 -0.2111 -0.0234)
      PathPoint P2: tibia_l (-0.0101 -0.0725 -0.0406)
    Schutte1993Muscle_Deprecated LSAR: max_isometric_force=104 optimal_fiber_length=0.579 tendon_slack_length=0.04
        pennation_angle_at_optimal=0
      PathPoint P1: pelvis (-0.0153 -0.0013 -0.1242)
      PathPoint P2: femur_l (-0.003 -0.3568 0.0421)
      PathPoint P3: tibia_l (-0.0056 -0.0419 0.0399)
      PathPoint P4: tibia_l (0.006 -0.0589 0.0383)
      PathPoint P5: tibia_l (0.0243 -0.084 0.0252)
    Schutte1993Muscle_Deprecated LRF: max_isometric_force=779 optimal_fiber_length=0.084 tendon_slack_length=0.346
        pennation_angle_at_optimal=0.08726646
      PathPoint P1: pelvis (-0.0295 -0.0311 -0.0968)
      ConditionalPathPoint P2: femur_l (0.0334 -0.403 -0.0019) range=(-2.61799 -1.45997) coordinate=knee_angle_l
      PathPoint P3: lpatella (0.0121 0.0437 0.001)
    Schutte1993Muscle_Deprecated LADDLONG: max_isometric_force=418 optimal_fiber_length=0.138 tendon_slack_length=0.11
        pennation_angle_at_optimal=0.1047198
      PathPoint P1: pelvis (-0.0316 -0.0836 -0.0169)
      PathPoint P2: femur_l (0.005 -0.2111 -0.0234)
    Schutte1993Muscle_Deprecated LADDBREV: max_isometric_force=286 optimal_fiber_length=0.133 tendon_slack_length=0.02
        pennation_angle_at_optimal=0
      PathPoint P1: pelvis (-0.0587 -0.0915 -0.0164)
      PathPoint P2: femur_l (0.0009 -0.1196 -0.0294)
    Schutte1993Muscle_Deprecated LAMAG1: max_isometric_force=346 optimal_fiber_length=0.087 tendon_slack_length=0.06
        pennation_angle_at_optimal=0.08726646
      PathPoint P1: pelvis (-0.0732 -0.1174 -0.0255)
      PathPoint P2: femur_l (-0.0045 -0.1211 -0.0339)
    Schutte1993Muscle_Deprecated LAMAG2: max_isometric_force=312 optimal_fiber_length=0.121 tendon_slack_length=0.13
        pennation_angle_at_optimal=0.05235988
      PathPoint P1: pelvis (-0.0831 -0.1192 -0.0308)
      PathPoint P2: femur_l (0.0054 -0.2285 -0.0227)
    Schutte1993Muscle_Deprecated LAMAG3: max_isometric_force=444 optimal_fiber_length=0.131 tendon_slack_length=0.26
        pennation_angle_at_optimal=0.08726646
      PathPoint P1: pelvis (-0.0771 -0.1181 -0.0276)
      PathPoint P2: femur_l (0.007 -0.3837 0.0266)
    Schutte1993Muscle_Deprecated LTFL: max_isometric_force=155 optimal_fiber_length=0.095 tendon_slack_length=0.425
        pennation_angle_at_optimal=0.05235988
      PathPoint P1: pelvis (-0.0311 0.0214 -0.1241)
      PathPoint P2: femur_l (0.0294 -0.0995 -0.0597)
      PathPoint P3: femur_l (0.0054 -0.4049 -0.0357)
      PathPoint P4: tibia_l (0.006 -0.0487 -0.0297)
    Schutte1993Muscle_Deprecated LPECT: max_isometric_force=177 optimal_fiber_length=0.133 tendon_slack_length=0.001
        pennation_angle_at_optimal=0
      PathPoint P1: pelvis (-0.0431 -0.0768 -0.0451)
      PathPoint P2: femur_l (-0.0122 -0.0822 -0.0253)
    Schutte1993Muscle_Deprecated LGRA: max_isometric_force=108 optimal_fiber_length=0.352 tendon_slack_length=0.14
        pennation_angle_at_optimal=0.05235988
      PathPoint P1: pelvis (-0.0563 -0.1038 -0.0079)
      PathPoint P2: tibia_l (-0.0154 -0.0475 0.0358)
      PathPoint P3: tibia_l (0.006 -0.0836 0.0228)
    Schutte1993Muscle_Deprecated LGMAX1: max_isometric_force=382 optimal_fiber_length=0.142 tendon_slack_length=0.125
        pennation_angle_at_optimal=0.08726646
      PathPoint P1: pelvis (-0.1195 0.0612 -0.07)
      PathPoint P2: pelvis (-0.1291 0.0012 -0.0886)
      PathPoint P3: femur_l (-0.0457 -0.0248 -0.0392)
      PathPoint P4: femur_l (-0.0277 -0.0566 -0.047)
    Schutte1993Muscle_Deprecated LGMAX2: max_isometric_force=546 optimal_fiber_length=0.147 tendon_slack_length=0.127
        pennation_angle_at_optimal=0
      PathPoint P1: pelvis (-0.1349 0.0176 -0.0563)
      PathPoint P2: pelvis (-0.1376 -0.052 -0.0914)
      PathPoint P3: femur_l (-0.0426 -0.053 -0.0293)
      PathPoint P4: femur_l (-0.0156 -0.1016 -0.0419)
    Schutte1993Muscle_Deprecated LGMAX3: max_isometric_force=368 optimal_fiber_length=0.144 tendon_slack_length=0.145
        pennation_angle_at_optimal=0.08726646
      PathPoint P1: pelvis (-0.1556 -0.0314 -0.0058)
      PathPoint P2: pelvis (-0.1529 -0.1052 -0.0403)
      PathPoint P3: femur_l (-0.0299 -0.1041 -0.0135)
      PathPoint P4: femur_l (-0.006 -0.1419 -0.0411)
    Schutte1993Muscle_Deprecated LILIACUS: max_isometric_force=429 optimal_fiber_length=0.1 tendon_slack_length=0.09
        pennation_angle_at_optimal=0.1221731
      PathPoint P1: pelvis (-0.0674 0.0365 -0.0854)
      PathPoint P2: pelvis (-0.0218 -0.055 -0.0851)
      PathPoint P3: femur_l (0.0017 -0.0543 -0.0057)
      PathPoint P4: femur_l (-0.0193 -0.0621 -0.0129)
    Schutte1993Muscle_Deprecated LPSOAS: max_isometric_force=371 optimal_fiber_length=0.104 tendon_slack_length=0.13
        pennation_angle_at_optimal=0.1396263
      PathPoint P1: pelvis (-0.0647 0.0887 -0.0289)
      PathPoint P2: pelvis (-0.0238 -0.057 -0.0759)
      PathPoint P3: femur_l (0.0016 -0.0507 -0.0038)
      PathPoint P4: femur_l (-0.0188 -0.0597 -0.0104)
    Schutte1993Muscle_Deprecated LQUADFEM: max_isometric_force=254 optimal_fiber_length=0.054 tendon_slack_length=0.024
        pennation_angle_at_optimal=0
      PathPoint P1: pelvis (-0.1143 -0.1151 -0.052)
      PathPoint P2: femur_l (-0.0381 -0.0359 -0.0366)
    Schutte1993Muscle_Deprecated LGLEM: max_isometric_force=109 optimal_fiber_length=0.024 tendon_slack_length=0.039
        pennation_angle_at_optimal=0
      PathPoint P1: pelvis (-0.1133 -0.082 -0.0714)
      PathPoint P2: femur_l (-0.0142 -0.0033 -0.0443)
    Schutte1993Muscle_Deprecated LPERI: max_isometric_force=296 optimal_fiber_length=0.026 tendon_slack_length=0.115
        pennation_angle_at_optimal=0.1745329
      PathPoint P1: pelvis (-0.1396 0.0003 -0.0235)
      PathPoint P2: pelvis (-0.1193 -0.0276 -0.0657)
      PathPoint P3: femur_l (-0.0148 -0.0036 -0.0437)
    Schutte1993Muscle_Deprecated lVASMED: max_isometric_force=1294 optimal_fiber_length=0.089 tendon_slack_length=0.126
        pennation_angle_at_optimal=0.08726646
      PathPoint P1: femur_l (0.014 -0.2099 -0.0188)
      PathPoint P2: femur_l (0.0356 -0.2769 -0.0009)
      ConditionalPathPoint P3: femur_l (0.037 -0.4048 0.0125) range=(-2.61799 -1.20986) coordinate=knee_angle_l
      ConditionalPathPoint P4: femur_l (0.0274 -0.4255 0.0131) range=(-2.61799 -1.78006) coordinate=knee_angle_l
      PathPoint P5: lpatella (0.0063 0.0445 0.017)
    Schutte1993Muscle_Deprecated LVASINT: max_isometric_force=1365 optimal_fiber_length=0.087 tendon_slack_length=0.136
        pennation_angle_at_optimal=0.05235988
      PathPoint P1: femur_l (0.029 -0.1924 -0.031)
      PathPoint P2: femur_l (0.0335 -0.2084 -0.0285)
      ConditionalPathPoint P3: femur_l (0.0343 -0.403 -0.0055) range=(-2.61799 -1.42) coordinate=knee_angle_l
      PathPoint P4: lpatella (0.0058 0.048 0.0006)
    Schutte1993Muscle_Deprecated LVASLAT: max_isometric_force=1871 optimal_fiber_length=0.084 tendon_slack_length=0.157
        pennation_angle_at_optimal=0.08726646
      PathPoint P1: femur_l (0.0048 -0.1854 -0.0349)
      PathPoint P2: femur_l (0.0269 -0.2591 -0.0409)
      ConditionalPathPoint P3: femur_l (0.0361 -0.403 -0.0205) range=(-2.61799 -1.20986) coordinate=knee_angle_l
      ConditionalPathPoint P4: femur_l (0.0253 -0.4243 -0.0184) range=(-2.61799 -1.91986) coordinate=knee_angle_l
      PathPoint P5: lpatella (0.0103 0.0423 -0.0141)
    Schutte1993Muscle_Deprecated LMEDGAS: max_isometric_force=1113 optimal_fiber_length=0.045 tendon_slack_length=0.408
        pennation_angle_at_optimal=0.296706
      PathPoint P1: femur_l (-0.0127 -0.3929 0.0235)
      ConditionalPathPoint P2: femur_l (-0.0239 -0.4022 0.0258) range=(-0.770039 0.100007) coordinate=knee_angle_l
      PathPoint P3: tibia_l (-0.0217 -0.0487 0.0295)
      PathPoint P4: calcn_l (0.0044 0.031 0.0053)
    Schutte1993Muscle_Deprecated LLATGAS: max_isometric_force=488 optimal_fiber_length=0.064 tendon_slack_length=0.385
        pennation_angle_at_optimal=0.1396263
      PathPoint P1: femur_l (-0.0155 -0.3946 -0.0272)
      ConditionalPathPoint P2: femur_l (-0.0254 -0.4018 -0.0274) range=(-0.770039 0.100007) coordinate=knee_angle_l
      PathPoint P3: tibia_l (-0.0242 -0.0481 -0.0235)
      PathPoint P4: calcn_l (0.0044 0.031 0.0053)
    Schutte1993Muscle_Deprecated LSOL: max_isometric_force=2839 optimal_fiber_length=0.03 tendon_slack_length=0.268
        pennation_angle_at_optimal=0.4363323
      PathPoint P1: tibia_l (-0.0024 -0.1533 -0.0071)
      PathPoint P2: calcn_l (0.0044 0.031 0.0053)
    Schutte1993Muscle_Deprecated LSOLSTIF: max_isometric_force=2839 optimal_fiber_length=0.03 tendon_slack_length=0.268
        pennation_angle_at_optimal=0.4363323
      PathPoint P1: tibia_l (-0.0024 -0.1533 -0.0071)
      PathPoint P2: calcn_l (0.0044 0.031 0.0053)
      tendon_force_length_curve: SimmSpline: x=(-10 -0.002 -0.001 0 0.00131 0.00281 0.00431 0.00581 0.00731 0.00881 0.0103 0.0118 0.0123 9.2 9.201 9.202 20)
          y=(0 0 0 0 1.08 2.57 4.35 6.52 9.15 12.3 16.1 20.8 22.7 34500 34500 34500 34500)
    Schutte1993Muscle_Deprecated LTIBPOST: max_isometric_force=1270 optimal_fiber_length=0.031 tendon_slack_length=0.31
        pennation_angle_at_optimal=0.2094395
      PathPoint P1: tibia_l (-0.0094 -0.1348 -0.0019)
      PathPoint P2: tibia_l (-0.0144 -0.4051 0.0229)
      PathPoint P3: calcn_l (0.0417 0.0334 0.0286)
      PathPoint P4: calcn_l (0.0772 0.0159 0.0281)
    Schutte1993Muscle_Deprecated LFLEXDIG: max_isometric_force=310 optimal_fiber_length=0.034 tendon_slack_length=0.4
        pennation_angle_at_optimal=0.1221731
      PathPoint P1: tibia_l (-0.0083 -0.2046 0.0018)
      PathPoint P2: tibia_l (-0.0154 -0.4051 0.0196)
      PathPoint P3: calcn_l (0.0436 0.0315 0.028)
      PathPoint P4: calcn_l (0.0708 0.0176 0.0263)
      PathPoint P5: calcn_l (0.1658 -0.0081 -0.0116)
      PathPoint P6: digits_l (-0.0019 -0.0078 -0.0147)
      PathPoint P7: digits_l (0.0285 -0.0071 -0.0215)
      PathPoint P8: digits_l (0.0441 -0.006 -0.0242)
    Schutte1993Muscle_Deprecated LFLEXHAL: max_isometric_force=322 optimal_fiber_length=0.043 tendon_slack_length=0.38
        pennation_angle_at_optimal=0.1745329
      PathPoint P1: tibia_l (-0.0079 -0.2334 -0.0244)
      PathPoint P2: tibia_l (-0.0186 -0.4079 0.0174)
      PathPoint P3: calcn_l (0.0374 0.0276 0.0241)
      PathPoint P4: calcn_l (0.1038 0.0068 0.0256)
      PathPoint P5: calcn_l (0.1726 -0.0053 0.0269)
      PathPoint P6: digits_l (0.0155 -0.0064 0.0265)
      PathPoint P7: digits_l (0.0562 -0.0102 0.0181)
    Schutte1993Muscle_Deprecated LTIBANT: max_isometric_force=603 optimal_fiber_length=0.098 tendon_slack_length=0.223
        pennation_angle_at_optimal=0.08726646
      PathPoint P1: tibia_l (0.0179 -0.1624 -0.0115)
      PathPoint P2: tibia_l (0.0329 -0.3951 0.0177)
      PathPoint P3: calcn_l (0.1166 0.0178 0.0305)
    Schutte1993Muscle_Deprecated LPERBREV: max_isometric_force=348 optimal_fiber_length=0.05 tendon_slack_length=0.161
        pennation_angle_at_optimal=0.08726646
      PathPoint P1: tibia_l (-0.007 -0.2646 -0.0325)
      PathPoint P2: tibia_l (-0.0198 -0.4184 -0.0283)
      PathPoint P3: tibia_l (-0.0144 -0.4295 -0.0289)
      PathPoint P4: calcn_l (0.0471 0.027 -0.0233)
      PathPoint P5: calcn_l (0.0677 0.0219 -0.0343)
    Schutte1993Muscle_Deprecated LPERLONG: max_isometric_force=754 optimal_fiber_length=0.049 tendon_slack_length=0.345
        pennation_angle_at_optimal=0.1745329
      PathPoint P1: tibia_l (0.0005 -0.1568 -0.0362)
      PathPoint P2: tibia_l (-0.0207 -0.4205 -0.0286)
      PathPoint P3: tibia_l (-0.0162 -0.4319 -0.0289)
      PathPoint P4: calcn_l (0.0438 0.023 -0.0221)
      PathPoint P5: calcn_l (0.0681 0.0106 -0.0284)
      PathPoint P6: calcn_l (0.0852 0.0069 -0.0118)
      PathPoint P7: calcn_l (0.1203 0.0085 0.0184)
    Schutte1993Muscle_Deprecated LPERTERT: max_isometric_force=90 optimal_fiber_length=0.079 tendon_slack_length=0.1
        pennation_angle_at_optimal=0.2268928
      PathPoint P1: tibia_l (0.001 -0.2804 -0.0231)
      PathPoint P2: tibia_l (0.0229 -0.4069 -0.0159)
      PathPoint P3: calcn_l (0.0857 0.0228 -0.0299)
    Schutte1993Muscle_Deprecated LEXTDIG: max_isometric_force=341 optimal_fiber_length=0.102 tendon_slack_length=0.345
        pennation_angle_at_optimal=0.1396263
      PathPoint P1: tibia_l (0.0032 -0.1381 -0.0276)
      PathPoint P2: tibia_l (0.0289 -0.4007 -0.0072)
      PathPoint P3: calcn_l (0.0922 0.0388 0.0001)
      PathPoint P4: calcn_l (0.1616 0.0055 -0.013)
      PathPoint P5: digits_l (0.0003 0.0047 -0.0153)
      PathPoint P6: digits_l (0.0443 -0.0004 -0.025)
    Schutte1993Muscle_Deprecated LEXTHAL: max_isometric_force=108 optimal_fiber_length=0.111 tendon_slack_length=0.305
        pennation_angle_at_optimal=0.1047198
      PathPoint P1: tibia_l (0.0012 -0.1767 -0.0228)
      PathPoint P2: tibia_l (0.0326 -0.3985 0.0085)
      PathPoint P3: calcn_l (0.097 0.0389 0.0211)
      PathPoint P4: calcn_l (0.1293 0.0309 0.0257)
      PathPoint P5: calcn_l (0.1734 0.0139 0.028)
      PathPoint P6: digits_l (0.0298 0.0041 0.0245)
      PathPoint P7: digits_l (0.0563 0.0034 0.0186)
    Schutte1993Muscle_Deprecated LLIGPAT: max_isometric_force=100 optimal_fiber_length=0.05 tendon_slack_length=0.005
        pennation_angle_at_optimal=0
      PathPoint P1: tibia_l (0.039 -0.0822 0)
      PathPoint P2: lpatella (0.0021 0.0015 -0.0001)
    Schutte1993Muscle_Deprecated LTPOST2: max_isometric_force=1270 optimal_fiber_length=0.031 tendon_slack_length=0.31
        pennation_angle_at_optimal=0.2094395
      PathPoint P1: tibia_l (-0.0094 -0.1348 -0.0019)
      PathPoint P2: tibia_l (0.0063 -0.3505 -0.0146)
      PathPoint P3: tibia_l (0.0165 -0.3904 -0.0176)
      PathPoint P4: calcn_l (0.0912 0.0463 -0.0086)
      PathPoint P5: calcn_l (0.105 0.0325 -0.0093)
    ObjectGroup r rhip abductors: members=(GMAX1 GMED1 GMED2 GMED3 GMIN1 GMIN2 GMIN3 PERI SAR TFL)
    ObjectGroup r rhip flexors: members=(ADDBREV ADDLONG GMED1 GMIN1 GRA ILIACUS PECT PSOAS RF SAR TFL)
    ObjectGroup r rhip int rotators: members=(GMED1 GMIN1 ILIACUS PSOAS TFL)
    ObjectGroup r rhip ext rotators: members=(GLEM GMED3 GMIN3 PERI QUADFEM)
    ObjectGroup r rhip extensors: members=(ADDLONG AMAG1 AMAG2 AMAG3 BIFEMLH GMAX1 GMAX2 GMAX3 GMED3 GMIN3 HAMSTRINGS SEMIMEM SEMITEN)
    ObjectGroup r rhip adductors: members=(ADDBREV ADDLONG AMAG1 AMAG2 AMAG3 BIFEMLH GRA HAMSTRINGS PECT SEMIMEM SEMITEN)
    ObjectGroup r knee flexors: members=(BIFEMLH BIFEMSH GRA HAMSTRINGS LATGAS MEDGAS SAR SEMIMEM SEMITEN)
    ObjectGroup r knee extensors: members=(LIGPAT RF VASINT VASLAT VASMED)
    ObjectGroup r rankle plantar flexors: members=(FLEXDIG FLEXHAL LATGAS MEDGAS PERBREV PERLONG SOL TIBPOST)
    ObjectGroup r rankle dorsiflexors: members=(EXTDIG EXTHAL PERTERT TIBANT TPOST2)
    ObjectGroup r invertors: members=(EXTHAL FLEXDIG FLEXHAL TIBANT TIBPOST)
    ObjectGroup r evertors: members=(EXTDIG PERBREV PERLONG PERTERT TPOST2)
    ObjectGroup l rhip abductors: members=(LGMAX1 LGMED1 LGMED2 LGMED3 LGMIN1 LGMIN2 LGMIN3 LPERI LTFL LSAR)
    ObjectGroup l rhip flexors: members=(LADDBREV LADDLONG LGMED1 LGMIN1 LGRA LILIACUS LPECT LPSOAS LRF LTFL LSAR)
    ObjectGroup l rhip int rotators: members=(LGMED1 LGMIN1 LILIACUS LPSOAS LTFL)
    ObjectGroup l rhip ext rotators: members=(LGLEM LGMED3 LGMIN3 LPERI LQUADFEM)
    ObjectGroup l rhip extensors: members=(LADDLONG LAMAG1 LAMAG2 LAMAG3 LBIFEMLH LGMAX1 LGMAX2 LGMAX3 LGMED3 LGMIN3 LSEMIMEM LSEMITEN)
    ObjectGroup l rhip adductors: members=(LADDBREV LADDLONG LAMAG1 LAMAG2 LAMAG3 LBIFEMLH LGRA LPECT LSEMIMEM LSEMITEN)
    ObjectGroup l knee flexors: members=(LBIFEMLH LBIFEMSH LGRA LLATGAS LMEDGAS LSEMIMEM LSEMITEN LSAR)
    ObjectGroup l knee extensors: members=(LLIGPAT LRF LVASINT LVASLAT lVASMED)
    ObjectGroup l rankle plantar flexors: members=(LFLEXDIG LFLEXHAL LLATGAS LMEDGAS LPERBREV LPERLONG LSOL LTIBPOST)
    ObjectGroup l rankle dorsiflexors: members=(LEXTDIG LEXTHAL LPERTERT LTIBANT LTPOST2)
    ObjectGroup l invertors: members=(LEXTHAL LFLEXDIG LFLEXHAL LTIBANT LTIBPOST)
    ObjectGroup l evertors: members=(LEXTDIG LPERBREV LPERLONG LPERTERT LTPOST2)
  MarkerSet:
    Marker RASIS: pelvis (0.00893789 0.00660939 0.118144) fixed=true
    Marker LASIS: pelvis (-0.00192533 0.00779495 -0.120761)
    Marker RPSIS: pelvis (-0.14694 0.028602 0.05635)
    Marker LPSIS: pelvis (-0.14912 0.0288204 -0.0527463)
    Marker RT1: femur_r (0.0284664 -0.155009 0.0548465)
    Marker RT2: femur_r (-0.0112819 -0.158517 0.0541544)
    Marker RT3: femur_r (0.0326536 -0.185622 0.0573904)
    Marker RT4: femur_r (-0.00559162 -0.188035 0.0569003)
    Marker RMKN: femur_r (0.00339884 -0.399545 -0.0450883)
    Marker RLKN: femur_r (-0.00435219 -0.399882 0.0391678)
    Marker RS1: tibia_r (0.0302391 -0.209143 0.0595105)
    Marker RS2: tibia_r (-0.0068808 -0.207665 0.0592221)
    Marker RS3: tibia_r (0.032137 -0.244 0.0634113)
    Marker RS4: tibia_r (-0.00693125 -0.242761 0.0620677)
    Marker RMM: tibia_r (-0.00682946 -0.400761 -0.0325547)
    Marker RLM: tibia_r (-0.00123123 -0.418298 0.04628772)
    Marker RPC: calcn_r (-0.0456545 0.0218882 -0.000766789)
    Marker RDC: calcn_r (-0.0483713 -0.00348894 0.0045698)
    Marker RLC: calcn_r (-0.00230526 0.01 0.035)
    Marker RMC: calcn_r (0.0204115 0.03 -0.03)
    Marker RNAV: midfoot_r (-2.19104e-5 0.0117597 -0.0345471)
    Marker RMB1: midfoot_r (0.0330979 0.0175777 -0.0293435)
    Marker RMB2: midfoot_r (0.0336502 0.0178192 0.00437069)
    Marker RMB5: midfoot_r (0.00435682 -0.00685816 0.0424309)
    Marker RMH1: forefoot_r (0.0666601 -0.00175447 -0.0347739)
    Marker RMH2: forefoot_r (0.0653854 -0.00052065 0.000120762)
    Marker RMH5: forefoot_r (0.0290165 -0.0124805 0.0508911)
    Marker RD1: digits_r (0.0533188 0.02 -0.00502317)
    Marker RD2: digits_r (0.0327369 0.02 0.0215117)
    Marker RD5: digits_r (-0.00123385 0.02 0.0496394)
    Marker LT1: femur_l (0.0284664 -0.155009 -0.0548465)
    Marker LT2: femur_l (-0.0112819 -0.158517 -0.0541544)
    Marker LT3: femur_l (0.0326536 -0.185622 -0.0573904)
    Marker LT4: femur_l (-0.00559162 -0.188035 -0.0569003)
    Marker LMKN: femur_l (0.00308307 -0.401452 0.0520505)
    Marker LLKN: femur_l (-0.00435219 -0.399882 -0.0391678)
    Marker LS1: tibia_l (0.0302391 -0.209143 -0.0595105)
    Marker LS2: tibia_l (-0.0068808 -0.207665 -0.0592221)
    Marker LS3: tibia_l (0.032137 -0.244 -0.0634113)
    Marker LS4: tibia_l (-0.00693125 -0.242761 -0.0620677)
    Marker LMM: tibia_l (-0.00682946 -0.400761 0.0366038)
    Marker LLM: tibia_l (-0.00123123 -0.418298 -0.0510486)
    Marker LPC: calcn_l (-0.0456545 0.0218882 -0.000766789)
    Marker LDC: calcn_l (-0.0483713 -0.00348894 0.0045698)
    Marker LLC: calcn_l (-0.00230528 0.0158052 -0.0241367)
    Marker LMC: calcn_l (0.016362 0.0265129 0.0447329)
    Marker LNAV: midfoot_l (-2.1882e-5 0.0117596 0.0358442)
    Marker LMB1: midfoot_l (0.0429614 0.0191953 0.0336026)
    Marker LMB2: midfoot_l (0.0398122 0.0230129 -0.00074706)
    Marker LMB5: midfoot_l (0.00467973 -0.00730866 -0.0490407)
    Marker LMH1: forefoot_l (0.0374113 -0.00175447 -0.0552977)
    Marker LMH2: forefoot_l (0.0565385 -0.00321644 -0.0117416)
    Marker LMH5: forefoot_l (0.071846 0.010896 0.0270767)
    Marker LD1: digits_l (0.0417327 0.02 -0.000177122)
    Marker LD2: digits_l (0.0331042 0.0246117 -0.0234508)
    Marker LD5: digits_l (-0.0147229 0.02 -0.0515593)
