# OpenSim document version 40000
Model SampleData:
  gravity: 0 -9.80665 0
  length_units: meters
  force_units: N
  credits:
    Maharaj, J.N., Rainbow, M.J., Cresswell, A.G., Kessler, S., Konow, N., Gehring, D., and Lichtwark, G.A. Delp, S.L., Loan, J.P., Hoy, M.G., Zajac, F.E., Topp E.L., Rosen, J.M.
  publications:
    Modelling the complexity of the foot and ankle during human locomotion: the development and validation of a multi-segment foot model using biplanar videoradiography. Computer Methods in Biomechanics and Biomedical Engineering vol. 37, pp. 757-767, 2021 An interactive graphics-based model of the lower extremity to study orthopaedic surgical procedures. IEEE Transactions on Biomedical Engineering, vol. 37, pp. 757-767, 1990.
  Ground
  BodySet:
    Body pelvis: mass=84.65165 [kg] mass_center=(-0.08644976 0 0) inertia=(0.1902634 0.1612057 0.1071621 0 0 0)
        meshes=(sacrum.vtp pelvis.vtp l_pelvis.vtp)
    Body femur_r: mass=0 mass_center=(0 0 0) inertia=(0 0 0 0 0 0) meshes=femur_r.vtp
    Body tibia_r: mass=0 mass_center=(0 0 0) inertia=(0 0 0 0 0 0) meshes=(tibia_r.vtp fibula_r.vtp)
    Body rpatella: mass=0 mass_center=(0 0 0) inertia=(0 0 0 0 0 0) meshes=pat.vtp
    Body talus_r: mass=0.1763085 mass_center=(0 0 0) inertia=(0.002187902 0.002187902 0.002187902 0 0 0)
        meshes=FootModel_talus_r.stl
    Body calcn_r: mass=1.095219 mass_center=(0 0 0) inertia=(0.0009126829 0.002738049 0.0003650732 0 0 0)
        meshes=FootModel_calcn_r.stl
    Body midfoot_r: mass=0.3818841 mass_center=(0.02087104 0.00511637 0.0005544145)
        inertia=(0.0001859865 0.000371973 0.001859883 0 0 0) meshes=FootModel_midfoot_r.stl
    Body forefoot_r: mass=0.7469573 mass_center=(0.02585797 0 0) inertia=(0.0001859865 0.000371973 0.001859883 0 0 0)
        meshes=FootModel_forefoot_r.stl
    Body digits_r: mass=0.2738049 mass_center=(-1.52173e-5 0.0007541641 0.0001225607)
        inertia=(9.471823e-5 0.0001894365 0.0009472006 0 0 0) meshes=FootModel_digits_r.stl
    Body femur_l: mass=0 mass_center=(0 0 0) inertia=(0 0 0 0 0 0) meshes=femur_l.vtp
    Body tibia_l: mass=0 mass_center=(0 0 0) inertia=(0 0 0 0 0 0) meshes=(tibia_l.vtp l_fibula.vtp)
    Body lpatella: mass=0 mass_center=(0 0 0) inertia=(0 0 0 0 0 0) meshes=l_pat.vtp
    Body talus_l: mass=0.1763085 mass_center=(0 0 0) inertia=(0.002187902 0.002187902 0.002187902 0 0 0)
        meshes=FootModel_talus_l.stl
    Body calcn_l: mass=1.095219 mass_center=(0 0 0) inertia=(0.0009126829 0.002738049 0.0003650732 0 0 0)
        meshes=FootModel_calcn_l.stl
    Body midfoot_l: mass=0.3818841 mass_center=(0.01890466 0.00583883 0.0005021799)
        inertia=(0.0001859865 0.000371973 0.001859883 0 0 0) meshes=FootModel_midfoot_l.stl
    Body forefoot_l: mass=0.7469573 mass_center=(0.01962506 0 0) inertia=(0.0001859865 0.000371973 0.001859883 0 0 0)
        meshes=FootModel_forefoot_l.stl
    Body digits_l: mass=0.2738049 mass_center=(-2.024051e-5 0.001003113 0.0001211529)
        inertia=(9.471823e-5 0.0001894365 0.0009472006 0 0 0) meshes=FootModel_digits_l.stl
  JointSet:
    CustomJoint ground_pelvis: socket_parent_frame=ground_offset socket_child_frame=pelvis_offset
      Coordinate pelvis_rotation: default_value=0 range=(-0.2618 6.2832) clamped=true
      Coordinate pelvis_tilt: default_value=0 range=(-3.14 3.14) clamped=true
      Coordinate pelvis_list: default_value=0 range=(-3.14 3.14) clamped=true
      Coordinate pelvis_tx: default_value=0.37 range=(-5 5) clamped=false
      Coordinate pelvis_ty: default_value=1 range=(-1 2) clamped=false
      Coordinate pelvis_tz: default_value=0.556 range=(-5 5) clamped=false
      PhysicalOffsetFrame ground_offset: socket_parent=/ground translation=(0 0 0) [meters]
      PhysicalOffsetFrame pelvis_offset: socket_parent=/bodyset/pelvis translation=(0 0 0)
      SpatialTransform:
        TransformAxis rotation1: coordinates=pelvis_rotation axis=(0 1 0) LinearFunction(coefficients=1 0)
        TransformAxis rotation2: coordinates=pelvis_tilt axis=(0 0 1) LinearFunction(coefficients=1 0)
        TransformAxis rotation3: coordinates=pelvis_list axis=(1 0 0) LinearFunction(coefficients=1 0)
        TransformAxis translation1: coordinates=pelvis_tx axis=(1 0 0) LinearFunction(coefficients=1 0)
        TransformAxis translation2: coordinates=pelvis_ty axis=(0 1 0) LinearFunction(coefficients=1 0)
        TransformAxis translation3: coordinates=pelvis_tz axis=(0 0 1) LinearFunction(coefficients=1 0)
    CustomJoint rhip: socket_parent_frame=pelvis_offset socket_child_frame=femur_r_offset
      Coordinate hip_flexion_r: default_value=0 range=(-0.1919862 1.658063) clamped=true
      Coordinate hip_adduction_r: default_value=0 range=(-0.8726646 0.2617994) clamped=true
      Coordinate hip_rotation_r: default_value=0 range=(-0.3490659 0.3490659) clamped=true
      PhysicalOffsetFrame pelvis_offset: socket_parent=/bodyset/pelvis translation=(-0.08437604 -0.07046045 0.08294325)
      PhysicalOffsetFrame femur_r_offset: socket_parent=/bodyset/femur_r translation=(0 0 0)
      SpatialTransform: axes_held_at_zero=(translation1 translation2 translation3)
        TransformAxis rotation1: coordinates=hip_flexion_r axis=(0 0 1) LinearFunction(coefficients=1 0)
        TransformAxis rotation2: coordinates=hip_adduction_r axis=(1 0 0) LinearFunction(coefficients=1 0)
        TransformAxis rotation3: coordinates=hip_rotation_r axis=(0 1 0) LinearFunction(coefficients=1 0)
    CustomJoint rfemoral-tibial: socket_parent_frame=femur_r_offset socket_child_frame=tibia_r_offset
      Coordinate knee_angle_r: default_value=0 range=(-2.094395 0) clamped=true
      Coordinate knee_angle
      PhysicalOffsetFrame femur_r_offset: socket_parent=/bodyset/femur_r translation=(0 0 0)
      PhysicalOffsetFrame tibia_r_offset: socket_parent=/bodyset/tibia_r translation=(0 0 0)
      SpatialTransform: axes_held_at_zero=(rotation2 rotation3 translation3)
        TransformAxis rotation1: coordinates=knee_angle_r axis=(0 0 1) LinearFunction(coefficients=1 0)
        TransformAxis translation1: coordinates=knee_angle_r axis=(1 0 0)
          MultiplierFunction: scale=1.065967
            SimmSpline: x=(-2.0944 -1.74533 -1.39626 -1.0472 -0.698132 -0.349066 -0.174533 0)
                y=(-0.0032 0.00179 0.00411 0.0041 0.00212 -0.001 -0.0031 -0.00525)
        TransformAxis translation2: coordinates=knee_angle axis=(0 1 0)
          MultiplierFunction: scale=1.065967
            SimmSpline: x=(-2.0944 -1.22173 -0.523599 -0.349066 -0.174533 0)
                y=(-0.4226 -0.4082 -0.399 -0.3976 -0.3966 -0.396)
    CustomJoint rtp: socket_parent_frame=tibia_r_offset socket_child_frame=rpatella_offset
      Coordinate tp_r3: default_value=-0.00116917 range=(-99999.9 99999.9) clamped=false
      Coordinate tp_tx: default_value=0.0496 range=(-99999.9 99999.9) clamped=false
      Coordinate tp_ty: default_value=-0.02268909 range=(-99999.9 99999.9) clamped=false
      Coordinate tp_tz: default_value=0.0024 range=(-99999.9 99999.9) clamped=false
      PhysicalOffsetFrame tibia_r_offset: socket_parent=/bodyset/tibia_r translation=(0 0 0)
      PhysicalOffsetFrame rpatella_offset: socket_parent=/bodyset/rpatella translation=(0 0 0)
      SpatialTransform: axes_held_at_zero=(rotation2 rotation3)
        TransformAxis rotation1: coordinates=tp_r3 axis=(0 0 1) LinearFunction(coefficients=1 0)
        TransformAxis translation1: coordinates=tp_tx axis=(1 0 0) LinearFunction(coefficients=1 0)
        TransformAxis translation2: coordinates=tp_ty axis=(0 1 0) LinearFunction(coefficients=1 0)
        TransformAxis translation3: coordinates=tp_tz axis=(0 0 1) LinearFunction(coefficients=1 0)
    CustomJoint ankle_r: socket_parent_frame=tibia_r_offset socket_child_frame=talus_r_offset
      Coordinate ankle_flexion_r: default_value=0 range=(-1.0472 1.0472) clamped=true
      Coordinate ankle_in_ev_r: default_value=0 range=(-0.0873 0.0873) clamped=true
      Coordinate ankle_rot_r: default_value=0 range=(-0.0873 0.0873) clamped=true
      PhysicalOffsetFrame tibia_r_offset: socket_parent=/bodyset/tibia_r
          translation=(-0.005061658 -0.4332779 0.01012332)
      PhysicalOffsetFrame talus_r_offset: socket_parent=/bodyset/talus_r translation=(0 0 0)
      SpatialTransform: axes_held_at_zero=(translation1 translation2 translation3)
        TransformAxis rotation1: coordinates=ankle_flexion_r axis=(0 0 -1) LinearFunction(coefficients=1 0)
        TransformAxis rotation2: coordinates=ankle_in_ev_r axis=(1 0 0) LinearFunction(coefficients=1 0)
        TransformAxis rotation3: coordinates=ankle_rot_r axis=(0 1 0) LinearFunction(coefficients=1 0)
    CustomJoint subtalar_r: socket_parent_frame=talus_r_offset socket_child_frame=calcn_r_offset
      Coordinate subtalar_angle_r: default_value=6.563574e-7 range=(-0.5236 0.5236) clamped=true
      PhysicalOffsetFrame talus_r_offset: socket_parent=/bodyset/talus_r
          translation=(-0.01144162 -0.03270066 -0.005720811)
      PhysicalOffsetFrame calcn_r_offset: socket_parent=/bodyset/calcn_r translation=(0 0 0)
      SpatialTransform: axes_held_at_zero=(rotation2 rotation3 translation1 translation2 translation3)
        TransformAxis rotation1: coordinates=subtalar_angle_r axis=(0.7357 0.6157 -0.2824)
            LinearFunction(coefficients=1 0)
    CustomJoint midtarsal_r: socket_parent_frame=calcn_r_offset socket_child_frame=midfoot_r_offset
      Coordinate midtarsal_angle_r: default_value=0 range=(-0.5236 0.5236) clamped=true
      PhysicalOffsetFrame calcn_r_offset: socket_parent=/bodyset/calcn_r
          translation=(0.04920557 0.01993943 0.004576649)
      PhysicalOffsetFrame midfoot_r_offset: socket_parent=/bodyset/midfoot_r translation=(0 0 0)
      SpatialTransform: axes_held_at_zero=(rotation2 rotation3 translation1 translation2 translation3)
        TransformAxis rotation1: coordinates=midtarsal_angle_r axis=(0.9392 0.5666 -0.4183)
            LinearFunction(coefficients=1 0)
    CustomJoint tarsometatarsal_r: socket_parent_frame=midfoot_r_offset socket_child_frame=forefoot_r_offset
      Coordinate tarsometatarsal_angle_r: default_value=0 range=(-0.5236 0.5236) clamped=true
      PhysicalOffsetFrame midfoot_r_offset: socket_parent=/bodyset/midfoot_r
          translation=(0.04759985 -0.003987886 0.008159975)
      PhysicalOffsetFrame forefoot_r_offset: socket_parent=/bodyset/forefoot_r translation=(0 0 0)
      SpatialTransform: axes_held_at_zero=(rotation2 rotation3 translation1 translation2 translation3)
        TransformAxis rotation1: coordinates=tarsometatarsal_angle_r axis=(0.5407 0.5872 -0.9361)
            LinearFunction(coefficients=1 0)
    CustomJoint digits_r: socket_parent_frame=forefoot_r_offset socket_child_frame=digits_r_offset
      Coordinate mtp_angle_r: default_value=0 range=(-1.0472 0.5235988) clamped=true
      PhysicalOffsetFrame forefoot_r_offset: socket_parent=/bodyset/forefoot_r
          translation=(0.06378299 -0.02392732 -0.002719992)
      PhysicalOffsetFrame digits_r_offset: socket_parent=/bodyset/digits_r translation=(0 0 0)
      SpatialTransform: axes_held_at_zero=(rotation2 rotation3 translation1 translation2 translation3)
        TransformAxis rotation1: coordinates=mtp_angle_r axis=(0.3 0.25 -0.866) LinearFunction(coefficients=1 0)
    CustomJoint lhip: socket_parent_frame=pelvis_offset socket_child_frame=femur_l_offset
      Coordinate hip_flexion_l: default_value=0 range=(-0.1919862 1.658063) clamped=true
      Coordinate hip_adduction_l: default_value=0 range=(-0.8726646 0.2617994) clamped=true
      Coordinate hip_rotation_l: default_value=0 range=(-0.3490659 0.3490659) clamped=true
      PhysicalOffsetFrame pelvis_offset: socket_parent=/bodyset/pelvis
          translation=(-0.08437604 -0.07046045 -0.08294325)
      PhysicalOffsetFrame femur_l_offset: socket_parent=/bodyset/femur_l translation=(0 0 0)
      SpatialTransform: axes_held_at_zero=(translation1 translation2 translation3)
        TransformAxis rotation1: coordinates=hip_flexion_l axis=(0 0 1) LinearFunction(coefficients=1 0)
        TransformAxis rotation2: coordinates=hip_adduction_l axis=(-1 0 0) LinearFunction(coefficients=1 0)
        TransformAxis rotation3: coordinates=hip_rotation_l axis=(0 -1 0) LinearFunction(coefficients=1 0)
    CustomJoint lfemoral-tibial: socket_parent_frame=femur_l_offset socket_child_frame=tibia_l_offset
      Coordinate knee_angle_l: default_value=0 range=(-2.094395 0) clamped=true
      PhysicalOffsetFrame femur_l_offset: socket_parent=/bodyset/femur_l translation=(0 0 0)
      PhysicalOffsetFrame tibia_l_offset: socket_parent=/bodyset/tibia_l translation=(0 0 0)
      SpatialTransform: axes_held_at_zero=(rotation2 rotation3 translation3)
        TransformAxis rotation1: coordinates=knee_angle_l axis=(0 0 1) LinearFunction(coefficients=1 0)
        TransformAxis translation1: coordinates=knee_angle_l axis=(1 0 0)
          MultiplierFunction: scale=1.029658
            SimmSpline: x=(-2.0944 -1.74533 -1.39626 -1.0472 -0.698132 -0.349066 -0.174533 0)
                y=(-0.0032 0.00179 0.00411 0.0041 0.00212 -0.001 -0.0031 -0.00525)
        TransformAxis translation2: coordinates=knee_angle_l axis=(0 1 0)
          MultiplierFunction: scale=1.029658
            SimmSpline: x=(-2.0944 -1.22173 -0.523599 -0.349066 -0.174533 0)
                y=(-0.4226 -0.4082 -0.399 -0.3976 -0.3966 -0.396)
    CustomJoint ltp: socket_parent_frame=tibia_l_offset socket_child_frame=lpatella_offset
      Coordinate ltp_r3: default_value=-0.00116917 range=(-99999.9 99999.9) clamped=false
      Coordinate ltp_tx: default_value=0.0496 range=(-99999.9 99999.9) clamped=false
      Coordinate ltp_ty: default_value=-0.02268909 range=(-99999.9 99999.9) clamped=false
      Coordinate ltp_tz: default_value=-0.0024 range=(-99999.9 99999.9) clamped=false
      PhysicalOffsetFrame tibia_l_offset: socket_parent=/bodyset/tibia_l translation=(0 0 0)
      PhysicalOffsetFrame lpatella_offset: socket_parent=/bodyset/lpatella translation=(0 0 0)
      SpatialTransform: axes_held_at_zero=(rotation2 rotation3)
        TransformAxis rotation1: coordinates=ltp_r3 axis=(0 0 1) LinearFunction(coefficients=1 0)
        TransformAxis translation1: coordinates=ltp_tx axis=(1 0 0) LinearFunction(coefficients=1 0)
        TransformAxis translation2: coordinates=ltp_ty axis=(0 1 0) LinearFunction(coefficients=1 0)
        TransformAxis translation3: coordinates=ltp_tz axis=(0 0 1) LinearFunction(coefficients=1 0)
    CustomJoint ankle_l: socket_parent_frame=tibia_l_offset socket_child_frame=talus_l_offset
      Coordinate ankle_flexion_l: default_value=0 range=(-1.0472 1.0472) clamped=true
      Coordinate ankle_in_ev_l: default_value=0 range=(-0.0873 0.0873) clamped=true
      Coordinate ankle_rot_l: default_value=0 range=(-0.0873 0.0873) clamped=true
      PhysicalOffsetFrame tibia_l_offset: socket_parent=/bodyset/tibia_l
          translation=(-0.005149072 -0.4407605 -0.01029814)
      PhysicalOffsetFrame talus_l_offset: socket_parent=/bodyset/talus_l translation=(0 0 0)
      SpatialTransform: axes_held_at_zero=(translation1 translation2 translation3)
        TransformAxis rotation1: coordinates=ankle_flexion_l axis=(0 0 -1) LinearFunction(coefficients=1 0)
        TransformAxis rotation2: coordinates=ankle_in_ev_l axis=(-1 0 0) LinearFunction(coefficients=1 0)
        TransformAxis rotation3: coordinates=ankle_rot_l axis=(0 -1 0) LinearFunction(coefficients=1 0)
    CustomJoint subtalar_l: socket_parent_frame=talus_l_offset socket_child_frame=calcn_l_offset
      Coordinate subtalar_angle_l: default_value=6.563574e-7 range=(-0.5236 0.5236) clamped=true
      PhysicalOffsetFrame talus_l_offset: socket_parent=/bodyset/talus_l
          translation=(-0.01138509 -0.03731818 0.005692547)
      PhysicalOffsetFrame calcn_l_offset: socket_parent=/bodyset/calcn_l translation=(0 0 0)
      SpatialTransform: axes_held_at_zero=(rotation2 rotation3 translation1 translation2 translation3)
        TransformAxis rotation1: coordinates=subtalar_angle_l axis=(-0.7357 -0.6157 -0.2824)
            LinearFunction(coefficients=1 0)
    CustomJoint midtarsal_l: socket_parent_frame=calcn_l_offset socket_child_frame=midfoot_l_offset
      Coordinate midtarsal_angle_l: default_value=0 range=(-0.5236 0.5236) clamped=true
      PhysicalOffsetFrame calcn_l_offset: socket_parent=/bodyset/calcn_l
          translation=(0.04834901 0.02275499 0.004554038)
      PhysicalOffsetFrame midfoot_l_offset: socket_parent=/bodyset/midfoot_l translation=(0 0 0)
      SpatialTransform: axes_held_at_zero=(rotation2 rotation3 translation1 translation2 translation3)
        TransformAxis rotation1: coordinates=midtarsal_angle_l axis=(-0.9392 -0.5666 -0.4183)
            LinearFunction(coefficients=1 0)
    CustomJoint tarsometatarsal_l: socket_parent_frame=midfoot_l_offset socket_child_frame=forefoot_l_offset
      Coordinate tarsometatarsal_angle_l: default_value=0 range=(-0.5236 0.5236) clamped=true
      PhysicalOffsetFrame midfoot_l_offset: socket_parent=/bodyset/midfoot_l
          translation=(0.04311519 -0.004550998 0.007391175)
      PhysicalOffsetFrame forefoot_l_offset: socket_parent=/bodyset/forefoot_l translation=(0 0 0)
      SpatialTransform: axes_held_at_zero=(rotation2 rotation3 translation1 translation2 translation3)
        TransformAxis rotation1: coordinates=tarsometatarsal_angle_l axis=(-0.5407 -0.5872 -0.9361)
            LinearFunction(coefficients=1 0)
    CustomJoint digits_l: socket_parent_frame=forefoot_l_offset socket_child_frame=digits_l_offset
      Coordinate mtp_angle_l: default_value=0 range=(-1.0472 0.5235988) clamped=true
      PhysicalOffsetFrame forefoot_l_offset: socket_parent=/bodyset/forefoot_l
          translation=(0.04840847 -0.02730599 -0.002463725)
      PhysicalOffsetFrame digits_l_offset: socket_parent=/bodyset/digits_l translation=(0 0 0)
      SpatialTransform: axes_held_at_zero=(rotation2 rotation3 translation1 translation2 translation3)
        TransformAxis rotation1: coordinates=mtp_angle_l axis=(-0.3 -0.25 -0.866) LinearFunction(coefficients=1 0)
  ConstraintSet:
    CoordinateCouplerConstraint tp_r3_con: independent_coordinate_names=knee_angle_r dependent_coordinate_name=tp_r3
        scale_factor=1
      coupled_coordinates_function: SimmSpline: x=(-2.0944 -1.99997 -1.45752 -0.526391 0.0279253 0.174533)
          y=(0.308051 0.308051 0.306305 0.270177 -0.037001 -0.279951)
    CoordinateCouplerConstraint tp_tx_con: independent_coordinate_names=knee_angle_r dependent_coordinate_name=tp_tx
        scale_factor=1.012332
      coupled_coordinates_function: SimmSpline: x=(-2.0944 -1.39626 -1.0472 -0.698132 -0.349066 -0.174533 0)
          y=(0.0173 0.0324 0.0381 0.043 0.0469 0.0484 0.0496)
    CoordinateCouplerConstraint tp_ty_con: independent_coordinate_names=knee_angle_r dependent_coordinate_name=tp_ty
        scale_factor=1.012332
      coupled_coordinates_function: SimmSpline: x=(-2.0944 -1.5708 -1.39626 -1.0472 -0.698132 -0.349066 -0.174533 0.00499164)
          y=(-0.0219 -0.0202 -0.02 -0.0204 -0.0211 -0.0219 -0.0223 -0.0227)
    CoordinateCouplerConstraint tp_tz_con: independent_coordinate_names=knee_angle_r dependent_coordinate_name=tp_tz
        scale_factor=1.012332
      coupled_coordinates_function: SimmSpline: x=(-17453.3 17453.3) y=(0.0024 0.0024)
    CoordinateCouplerConstraint ltp_r3_con: independent_coordinate_names=knee_angle_l dependent_coordinate_name=ltp_r3
        scale_factor=1
      coupled_coordinates_function: SimmSpline: x=(-2.0944 -1.99997 -1.45752 -0.526391 0.0279253 0.174533)
          y=(0.308051 0.308051 0.306305 0.270177 -0.037001 -0.279951)
    CoordinateCouplerConstraint ltp_tx_con: independent_coordinate_names=knee_angle_l dependent_coordinate_name=ltp_tx
        scale_factor=1.029814
      coupled_coordinates_function: SimmSpline: x=(-2.0944 -1.39626 -1.0472 -0.698132 -0.349066 -0.174533 0)
          y=(0.0173 0.0324 0.0381 0.043 0.0469 0.0484 0.0496)
    CoordinateCouplerConstraint ltp_ty_con: independent_coordinate_names=knee_angle_l dependent_coordinate_name=ltp_ty
        scale_factor=1.029814
      coupled_coordinates_function: SimmSpline: x=(-2.0944 -1.5708 -1.39626 -1.0472 -0.698132 -0.349066 -0.174533 0.00499164)
          y=(-0.0219 -0.0202 -0.02 -0.0204 -0.0211 -0.0219 -0.0223 -0.0227)
    CoordinateCouplerConstraint ltp_tz_con: independent_coordinate_names=knee_angle_l dependent_coordinate_name=ltp_tz
        scale_factor=1.029814
      coupled_coordinates_function: SimmSpline: x=(-17453.3 17453.3) y=(-0.0024 -0.0024)
  ForceSet:
    Schutte1993Muscle_Deprecated [values shared by the 93 below unless stated]: optimal_force=1
        max_contraction_velocity=10 time_scale=0.1 activation1=7.667 activation2=1.459854 damping=0.1
      tendon_force_length_curve: SimmSpline: x=(-10 -0.002 -0.001 0 0.00131 0.00281 0.00431 0.00581 0.00731 0.00881 0.0103 0.0118 0.0123 9.2 9.201 9.202 20)
          y=(0 0 0 0 0.0108 0.0257 0.0435 0.0652 0.0915 0.123 0.161 0.208 0.227 345 345 345 345)
      active_force_length_curve: SimmSpline: x=(-5 0 0.401 0.402 0.4035 0.52725 0.62875 0.71875 0.86125 1.045 1.2175 1.43875 1.61875 1.62 1.621 2.2 5)
          y=(0 0 0 0 0 0.226667 0.636667 0.856667 0.95 0.993333 0.77 0.246667 0 0 0 0 0)
      passive_force_length_curve: SimmSpline: x=(-5 0.998 0.999 1 1.1 1.2 1.3 1.4 1.5 1.6 1.601 1.602 5)
          y=(0 0 0 0 0.035 0.12 0.26 0.55 1.17 2 2 2 2)
    Schutte1993Muscle_Deprecated GMED1: max_isometric_force=546 optimal_fiber_length=0.05795475
        tendon_slack_length=0.08449478 pennation_angle_at_optimal=0.1396263 [radians]
      PathPoint P1: pelvis (-0.04869226 0.03240541 0.1200939)
      PathPoint P2: femur_r (-0.02323809 -0.01247182 0.0591612)
    Schutte1993Muscle_Deprecated GMED2: max_isometric_force=382 optimal_fiber_length=0.08983432
        tendon_slack_length=0.05634579 pennation_angle_at_optimal=0
      PathPoint P1: pelvis (-0.1020389 0.04743555 0.07608925)
      PathPoint P2: femur_r (-0.02750196 -0.006182611 0.05617649)
    Schutte1993Muscle_Deprecated GMED3: max_isometric_force=435 optimal_fiber_length=0.06919184
        tendon_slack_length=0.0567673 pennation_angle_at_optimal=0.3316126
      PathPoint P1: pelvis (-0.1459574 0.01119266 0.06436793)
      PathPoint P2: femur_r (-0.0329384 -0.005010047 0.05521712)
    Schutte1993Muscle_Deprecated GMIN1: max_isometric_force=180 optimal_fiber_length=0.0740208
        tendon_slack_length=0.01741666 pennation_angle_at_optimal=0.1745329
      PathPoint P1: pelvis (-0.05573354 -0.00852774 0.1048959)
      PathPoint P2: femur_r (-0.007674966 -0.01108606 0.05969418)
    Schutte1993Muscle_Deprecated GMIN2: max_isometric_force=190 optimal_fiber_length=0.06020781
        tendon_slack_length=0.02795363 pennation_angle_at_optimal=0
      PathPoint P1: pelvis (-0.0755446 -0.006928789 0.09843923)
      PathPoint P2: femur_r (-0.01023329 -0.01108606 0.05969418)
    Schutte1993Muscle_Deprecated GMIN3: max_isometric_force=215 optimal_fiber_length=0.04054769
        tendon_slack_length=0.05441927 pennation_angle_at_optimal=0.3665191
      PathPoint P1: pelvis (-0.0995327 -0.006715595 0.08502925)
      PathPoint P2: femur_r (-0.01439056 -0.00884753 0.05862821)
    Schutte1993Muscle_Deprecated SEMIMEM: max_isometric_force=1030 optimal_fiber_length=0.08480203
        tendon_slack_length=0.3805491 pennation_angle_at_optimal=0.2617994
      PathPoint P1: pelvis (-0.1422578 -0.1081957 0.0690366)
      PathPoint P2: tibia_r (-0.02459966 -0.05426097 -0.01963923)
    Schutte1993Muscle_Deprecated SEMITEN: max_isometric_force=328 optimal_fiber_length=0.211893
        tendon_slack_length=0.2761988 pennation_angle_at_optimal=0.08726646
      PathPoint P1: pelvis (-0.1476282 -0.1111804 0.05989794)
      PathPoint P2: tibia_r (-0.03178721 -0.05517207 -0.01478004)
      PathPoint P3: tibia_r (-0.01143935 -0.07551993 -0.02480212)
      PathPoint P4: tibia_r (0.002733295 -0.09677889 -0.019538)
    Schutte1993Muscle_Deprecated BIFEMLH: max_isometric_force=717 optimal_fiber_length=0.1153028
        tendon_slack_length=0.360718 pennation_angle_at_optimal=0
      PathPoint P1: pelvis (-0.1484636 -0.1067033 0.06615593)
      PathPoint P2: tibia_r (-0.008199885 -0.07379897 0.04282162)
    Schutte1993Muscle_Deprecated HAMSTRINGS: max_isometric_force=717 optimal_fiber_length=0.1153028
        tendon_slack_length=0.360718 pennation_angle_at_optimal=0
      PathPoint P1: pelvis (-0.1484636 -0.1067033 0.06615593)
      PathPoint P2: tibia_r (-0.008199885 -0.07379897 0.04282162)
    Schutte1993Muscle_Deprecated BIFEMSH: max_isometric_force=402 optimal_fiber_length=0.1817059
        tendon_slack_length=0.1050323 pennation_angle_at_optimal=0.4014257
      PathPoint P1: femur_r (0.005329837 -0.2250257 0.02494364)
      PathPoint P2: tibia_r (-0.01022455 -0.07339404 0.04110066)
    Schutte1993Muscle_Deprecated SAR: max_isometric_force=104 optimal_fiber_length=0.6124732
        tendon_slack_length=0.04231249 pennation_angle_at_optimal=0
      PathPoint P1: pelvis (-0.0182596 -0.001385758 0.1233719)
      PathPoint P2: femur_r (-0.003197902 -0.3803372 -0.04487723)
      PathPoint P3: tibia_r (-0.005669057 -0.04241669 -0.04039203)
      PathPoint P4: tibia_r (0.006073989 -0.05962633 -0.0387723)
      PathPoint P5: tibia_r (0.02459966 -0.08503585 -0.02551075)
    Schutte1993Muscle_Deprecated RF: max_isometric_force=779 optimal_fiber_length=0.0898279
        tendon_slack_length=0.3700054 pennation_angle_at_optimal=0.08726646
      PathPoint P1: pelvis (-0.03520641 -0.03315159 0.09615457)
      ConditionalPathPoint P2: femur_r (0.03560331 -0.4295849 0.002025338)
          socket_coordinate=/jointset/rfemoral-tibial/knee_angle_r range=(-2.61799 -1.45997) [radians]
      PathPoint P3: rpatella (0.0121 0.0437 -0.001)
    Schutte1993Muscle_Deprecated ADDLONG: max_isometric_force=418 optimal_fiber_length=0.146385
        tendon_slack_length=0.1166837 pennation_angle_at_optimal=0.1047198
      PathPoint P1: pelvis (-0.03771263 -0.08911488 0.01678732)
      PathPoint P2: femur_r (0.005329837 -0.2250257 0.02494364)
    Schutte1993Muscle_Deprecated ADDBREV: max_isometric_force=286 optimal_fiber_length=0.1385324
        tendon_slack_length=0.02083194 pennation_angle_at_optimal=0
      PathPoint P1: pelvis (-0.07005479 -0.09753603 0.01629065)
      PathPoint P2: femur_r (0.0009593707 -0.1274897 0.03133944)
    Schutte1993Muscle_Deprecated AMAG1: max_isometric_force=346 optimal_fiber_length=0.09022723
        tendon_slack_length=0.06222568 pennation_angle_at_optimal=0.08726646
      PathPoint P1: pelvis (-0.08735964 -0.1251446 0.02532997)
      PathPoint P2: femur_r (-0.004796854 -0.1290887 0.0361363)
    Schutte1993Muscle_Deprecated AMAG2: max_isometric_force=312 optimal_fiber_length=0.1281486
        tendon_slack_length=0.1376803 pennation_angle_at_optimal=0.05235988
      PathPoint P1: pelvis (-0.09917467 -0.1270633 0.03059464)
      PathPoint P2: femur_r (0.005756224 -0.2435736 0.02419746)
    Schutte1993Muscle_Deprecated AMAG3: max_isometric_force=444 optimal_fiber_length=0.1395238
        tendon_slack_length=0.2769174 pennation_angle_at_optimal=0.08726646
      PathPoint P1: pelvis (-0.09201404 -0.1258908 0.02741597)
      PathPoint P2: femur_r (0.007461772 -0.4090117 -0.02835474)
    Schutte1993Muscle_Deprecated TFL: max_isometric_force=155 optimal_fiber_length=0.100986
        tendon_slack_length=0.4517797 pennation_angle_at_optimal=0.05235988
      PathPoint P1: pelvis (-0.03711591 0.0228117 0.1232725)
      PathPoint P2: femur_r (0.03133944 -0.1060638 0.06363826)
      PathPoint P3: femur_r (0.005756224 -0.4316102 0.03805504)
      PathPoint P4: tibia_r (0.006073989 -0.04930055 0.03006625)
    Schutte1993Muscle_Deprecated PECT: max_isometric_force=177 optimal_fiber_length=0.1414246
        tendon_slack_length=0.001063343 pennation_angle_at_optimal=0
      PathPoint P1: pelvis (-0.05143716 -0.0818663 0.04479929)
      PathPoint P2: femur_r (-0.0130048 -0.08762253 0.02696898)
    Schutte1993Muscle_Deprecated GRA: max_isometric_force=108 optimal_fiber_length=0.3712367
        tendon_slack_length=0.147651 pennation_angle_at_optimal=0.05235988
      PathPoint P1: pelvis (-0.06719054 -0.1106474 0.007847325)
      PathPoint P2: tibia_r (-0.01558991 -0.04808575 -0.03624147)
      PathPoint P3: tibia_r (0.006073989 -0.08463092 -0.02308116)
    Schutte1993Muscle_Deprecated GMAX1: max_isometric_force=382 optimal_fiber_length=0.1521846
        tendon_slack_length=0.1339653 pennation_angle_at_optimal=0.08726646
      PathPoint P1: pelvis (-0.1426158 0.06523721 0.06953326)
      PathPoint P2: pelvis (-0.1540728 0.001279161 0.08800924)
      PathPoint P3: femur_r (-0.04871471 -0.02643599 0.04178593)
      PathPoint P4: femur_r (-0.0295273 -0.06033376 0.05010047)
    Schutte1993Muscle_Deprecated GMAX2: max_isometric_force=546 optimal_fiber_length=0.1582641
        tendon_slack_length=0.1367316 pennation_angle_at_optimal=0
      PathPoint P1: pelvis (-0.1609947 0.01876103 0.05592461)
      PathPoint P2: pelvis (-0.164217 -0.05543031 0.09079057)
      PathPoint P3: femur_r (-0.04541022 -0.05649628 0.03123285)
      PathPoint P4: femur_r (-0.01662909 -0.1083023 0.04466404)
    Schutte1993Muscle_Deprecated GMAX3: max_isometric_force=368 optimal_fiber_length=0.1554159
        tendon_slack_length=0.1564952 pennation_angle_at_optimal=0.08726646
      PathPoint P1: pelvis (-0.1856989 -0.03347138 0.005761327)
      PathPoint P2: pelvis (-0.1824766 -0.1121398 0.04003129)
      PathPoint P3: femur_r (-0.03187243 -0.1109672 0.01439056)
      PathPoint P4: femur_r (-0.006395805 -0.1512608 0.04381126)
    Schutte1993Muscle_Deprecated ILIACUS: max_isometric_force=429 optimal_fiber_length=0.1097466
        tendon_slack_length=0.09877194 pennation_angle_at_optimal=0.1221731
      PathPoint P1: pelvis (-0.0804377 0.03890781 0.08483058)
      PathPoint P2: pelvis (-0.02601694 -0.05862821 0.08453258)
      PathPoint P3: femur_r (0.001812145 -0.05788203 0.006076015)
      PathPoint P4: femur_r (-0.02057317 -0.06619658 0.01375098)
    Schutte1993Muscle_Deprecated PSOAS: max_isometric_force=371 optimal_fiber_length=0.1125058
        tendon_slack_length=0.1406322 pennation_angle_at_optimal=0.1396263
      PathPoint P1: pelvis (-0.07721542 0.09455132 0.0287073)
      PathPoint P2: pelvis (-0.02840382 -0.06076015 0.07539392)
      PathPoint P3: femur_r (0.001705548 -0.05404455 0.004050676)
      PathPoint P4: femur_r (-0.02004019 -0.06363826 0.01108606)
    Schutte1993Muscle_Deprecated QUADFEM: max_isometric_force=254 optimal_fiber_length=0.05634082
        tendon_slack_length=0.02504037 pennation_angle_at_optimal=0
      PathPoint P1: pelvis (-0.1364099 -0.1226929 0.05165328)
      PathPoint P2: femur_r (-0.04061336 -0.03826823 0.03901441)
    Schutte1993Muscle_Deprecated GLEM: max_isometric_force=109 optimal_fiber_length=0.02626211
        tendon_slack_length=0.04267593 pennation_angle_at_optimal=0
      PathPoint P1: pelvis (-0.1352165 -0.08740933 0.07092393)
      PathPoint P2: femur_r (-0.01513674 -0.003517693 0.04722236)
    Schutte1993Muscle_Deprecated PERI: max_isometric_force=296 optimal_fiber_length=0.02781298
        tendon_slack_length=0.123019 pennation_angle_at_optimal=0.1745329
      PathPoint P1: pelvis (-0.1666039 0.0003197902 0.02334331)
      PathPoint P2: pelvis (-0.1423771 -0.0294207 0.06526193)
      PathPoint P3: femur_r (-0.01577632 -0.003837483 0.04658278)
    Schutte1993Muscle_Deprecated VASMED: max_isometric_force=1294 optimal_fiber_length=0.09544624
        tendon_slack_length=0.1351261 pennation_angle_at_optimal=0.08726646
      PathPoint P1: femur_r (0.01492354 -0.2237466 0.02004019)
      PathPoint P2: femur_r (0.03794844 -0.2951664 0.0009593707)
      ConditionalPathPoint P3: femur_r (0.0394408 -0.4315036 -0.01332459)
          socket_coordinate=/jointset/rfemoral-tibial/knee_angle_r range=(-2.61799 -1.20986)
      ConditionalPathPoint P4: femur_r (0.02920751 -0.4535692 -0.01396417)
          socket_coordinate=/jointset/rfemoral-tibial/knee_angle_r range=(-2.61799 -1.78006)
      PathPoint P5: rpatella (0.0063 0.0445 -0.017)
    Schutte1993Muscle_Deprecated VASINT: max_isometric_force=1365 optimal_fiber_length=0.09352699
        tendon_slack_length=0.1462031 pennation_angle_at_optimal=0.05235988
      PathPoint P1: femur_r (0.03091306 -0.2050921 0.03304499)
      PathPoint P2: femur_r (0.03570991 -0.2221476 0.03038007)
      ConditionalPathPoint P3: femur_r (0.03656268 -0.4295849 0.005862821)
          socket_coordinate=/jointset/rfemoral-tibial/knee_angle_r range=(-2.61799 -1.42)
      PathPoint P4: rpatella (0.0058 0.048 -0.0006)
    Schutte1993Muscle_Deprecated VASLAT: max_isometric_force=1871 optimal_fiber_length=0.08996376
        tendon_slack_length=0.1681465 pennation_angle_at_optimal=0.08726646
      PathPoint P1: femur_r (0.005116644 -0.1976304 0.03720227)
      PathPoint P2: femur_r (0.02867453 -0.2761922 0.04359807)
      ConditionalPathPoint P3: femur_r (0.03848143 -0.4295849 0.02185233)
          socket_coordinate=/jointset/rfemoral-tibial/knee_angle_r range=(-2.61799 -1.20986)
      ConditionalPathPoint P4: femur_r (0.02696898 -0.45229 0.0196138)
          socket_coordinate=/jointset/rfemoral-tibial/knee_angle_r range=(-2.61799 -1.91986)
      PathPoint P5: rpatella (0.0103 0.0423 0.0141)
    Schutte1993Muscle_Deprecated MEDGAS: max_isometric_force=1113 optimal_fiber_length=0.04535699
        tendon_slack_length=0.4112367 pennation_angle_at_optimal=0.296706
      PathPoint P1: femur_r (-0.01353779 -0.4188186 -0.02505024)
      ConditionalPathPoint P2: femur_r (-0.02547662 -0.4287321 -0.02750196)
          socket_coordinate=/jointset/rfemoral-tibial/knee_angle_r range=(-0.770039 0.100007)
      PathPoint P3: tibia_r (-0.02196759 -0.04930055 -0.02986378)
      PathPoint P4: calcn_r (0.004606479 0.02472489 -0.00606406)
    Schutte1993Muscle_Deprecated LATGAS: max_isometric_force=488 optimal_fiber_length=0.06454848
        tendon_slack_length=0.3882994 pennation_angle_at_optimal=0.1396263
      PathPoint P1: femur_r (-0.0165225 -0.4206308 0.02899432)
      ConditionalPathPoint P2: femur_r (-0.02707557 -0.4283057 0.02920751)
          socket_coordinate=/jointset/rfemoral-tibial/knee_angle_r range=(-0.770039 0.100007)
      PathPoint P3: tibia_r (-0.02449842 -0.04869315 0.02378979)
      PathPoint P4: calcn_r (0.004606479 0.02472489 -0.00606406)
    Schutte1993Muscle_Deprecated SOL: max_isometric_force=2839 optimal_fiber_length=0.03015188
        tendon_slack_length=0.2693568 pennation_angle_at_optimal=0.4363323
      PathPoint P1: tibia_r (-0.002429596 -0.1551904 0.007187554)
      PathPoint P2: calcn_r (0.004606479 0.02472489 -0.00606406)
    Schutte1993Muscle_Deprecated SOLSTIF: max_isometric_force=2839 optimal_fiber_length=0.03015188
        tendon_slack_length=0.2693568 pennation_angle_at_optimal=0.4363323
      PathPoint P1: tibia_r (-0.002429596 -0.1551904 0.007187554)
      PathPoint P2: calcn_r (0.004606479 0.02472489 -0.00606406)
      tendon_force_length_curve: SimmSpline: x=(-10 -0.002 -0.001 0 0.00131 0.00281 0.00431 0.00581 0.00731 0.00881 0.0103 0.0118 0.0123 9.2 9.201 9.202 20)
          y=(0 0 0 0 1.08 2.57 4.35 6.52 9.15 12.3 16.1 20.8 22.7 34500 34500 34500 34500)
    Schutte1993Muscle_Deprecated TIBPOST: max_isometric_force=1270 optimal_fiber_length=0.03129959
        tendon_slack_length=0.3129959 pennation_angle_at_optimal=0.2094395
      PathPoint P1: tibia_r (-0.009515916 -0.1364623 0.00192343)
      PathPoint P2: tibia_r (-0.01457757 -0.4100955 -0.02318239)
      PathPoint P3: calcn_r (0.04365686 0.02663908 -0.03272304)
      PathPoint P4: calcn_r (0.08082277 0.01268148 -0.03215096)
    Schutte1993Muscle_Deprecated FLEXDIG: max_isometric_force=310 optimal_fiber_length=0.03383524
        tendon_slack_length=0.3980617 pennation_angle_at_optimal=0.1221731
      PathPoint P1: tibia_r (-0.008402352 -0.207123 -0.001822197)
      PathPoint P2: tibia_r (-0.01558991 -0.4100955 -0.0198417)
      PathPoint P3: calcn_r (0.04564602 0.02512368 -0.03203654)
      PathPoint P4: calcn_r (0.07412244 0.01403736 -0.03009147)
      PathPoint P5: calcn_r (0.1735805 -0.006460375 0.01327228)
      PathPoint P6: digits_r (-0.001274436 -0.005231894 0.01952978)
      PathPoint P7: digits_r (0.01911654 -0.004762365 0.02856397)
      PathPoint P8: digits_r (0.02958032 -0.004024534 0.03215107)
    Schutte1993Muscle_Deprecated FLEXHAL: max_isometric_force=322 optimal_fiber_length=0.0423728
        tendon_slack_length=0.3744573 pennation_angle_at_optimal=0.1745329
      PathPoint P1: tibia_r (-0.007997419 -0.2362782 0.02470089)
      PathPoint P2: tibia_r (-0.01882937 -0.41293 -0.01761457)
      PathPoint P3: calcn_r (0.03915507 0.02201313 -0.02757431)
      PathPoint P4: calcn_r (0.108671 0.005423525 -0.02929055)
      PathPoint P5: calcn_r (0.1806996 -0.004227159 -0.03077796)
      PathPoint P6: digits_r (0.01039671 -0.004292836 -0.03520675)
      PathPoint P7: digits_r (0.03769647 -0.006841707 -0.02404687)
    Schutte1993Muscle_Deprecated TIBANT: max_isometric_force=603 optimal_fiber_length=0.09910733
        tendon_slack_length=0.2255198 pennation_angle_at_optimal=0.08726646
      PathPoint P1: tibia_r (0.01812073 -0.1644026 0.01164181)
      PathPoint P2: tibia_r (0.03330571 -0.3999722 -0.01791827)
      PathPoint P3: calcn_r (0.1220717 0.01419687 -0.03489695)
    Schutte1993Muscle_Deprecated PERBREV: max_isometric_force=348 optimal_fiber_length=0.05077225
        tendon_slack_length=0.1634867 pennation_angle_at_optimal=0.08726646
      PathPoint P1: tibia_r (-0.007086321 -0.2678629 0.03290077)
      PathPoint P2: tibia_r (-0.02004416 -0.4235595 0.02864898)
      PathPoint P3: tibia_r (-0.01457757 -0.4347964 0.02925638)
      PathPoint P4: calcn_r (0.04931027 0.02153458 0.02665898)
      PathPoint P5: calcn_r (0.07087696 0.01746694 0.03924476)
    Schutte1993Muscle_Deprecated PERLONG: max_isometric_force=754 optimal_fiber_length=0.05011935
        tendon_slack_length=0.3528812 pennation_angle_at_optimal=0.1745329
      PathPoint P1: tibia_r (0.0005061658 -0.1587336 0.0366464)
      PathPoint P2: tibia_r (-0.02095526 -0.4256854 0.02895268)
      PathPoint P3: tibia_r (-0.01639977 -0.437226 0.02925638)
      PathPoint P4: calcn_r (0.04585541 0.01834427 0.02528599)
      PathPoint P5: calcn_r (0.07129574 0.008454318 0.03249421)
      PathPoint P6: calcn_r (0.08919819 0.005503282 0.01350111)
      PathPoint P7: calcn_r (0.1259453 0.006779406 -0.02105259)
    Schutte1993Muscle_Deprecated PERTERT: max_isometric_force=90 optimal_fiber_length=0.07998476
        tendon_slack_length=0.1012465 pennation_angle_at_optimal=0.2268928
      PathPoint P1: tibia_r (0.001012332 -0.2838578 0.02338486)
      PathPoint P2: tibia_r (0.02318239 -0.4119177 0.01609607)
      PathPoint P3: calcn_r (0.08972165 0.01818476 0.03421045)
    Schutte1993Muscle_Deprecated EXTDIG: max_isometric_force=341 optimal_fiber_length=0.1013669
        tendon_slack_length=0.3428586 pennation_angle_at_optimal=0.1396263
      PathPoint P1: tibia_r (0.003239461 -0.139803 0.02794035)
      PathPoint P2: tibia_r (0.02925638 -0.4056412 0.007288787)
      PathPoint P3: calcn_r (0.09652668 0.03094599 -0.0001144162)
      PathPoint P4: calcn_r (0.1691834 0.004386674 0.01487411)
      PathPoint P5: digits_r (0.0002012267 0.003152551 0.02032692)
      PathPoint P6: digits_r (0.02971447 -0.0002683023 0.03321391)
    Schutte1993Muscle_Deprecated EXTHAL: max_isometric_force=108 optimal_fiber_length=0.1090823
        tendon_slack_length=0.2997306 pennation_angle_at_optimal=0.1047198
      PathPoint P1: tibia_r (0.001214798 -0.178879 0.02308116)
      PathPoint P2: tibia_r (0.03300201 -0.4034141 -0.008604818)
      PathPoint P3: calcn_r (0.1015519 0.03102575 -0.02414182)
      PathPoint P4: calcn_r (0.1353677 0.02464513 -0.02940497)
      PathPoint P5: calcn_r (0.1815372 0.01108632 -0.03203654)
      PathPoint P6: digits_r (0.01998852 0.002750098 -0.03254964)
      PathPoint P7: digits_r (0.03776354 0.002280569 -0.02471115)
    Schutte1993Muscle_Deprecated LIGPAT: max_isometric_force=100 optimal_fiber_length=0.05059782
        tendon_slack_length=0.005059782 pennation_angle_at_optimal=0
      PathPoint P1: tibia_r (0.03948093 -0.08321365 0)
      PathPoint P2: rpatella (0.0021 0.0015 0.0001)
    Schutte1993Muscle_Deprecated TPOST2: max_isometric_force=1270 optimal_fiber_length=0.03143063
        tendon_slack_length=0.3143063 pennation_angle_at_optimal=0.2094395
      PathPoint P1: tibia_r (-0.009515916 -0.1364623 0.00192343)
      PathPoint P2: tibia_r (0.006377689 -0.3548222 0.01478004)
      PathPoint P3: tibia_r (0.01670347 -0.3952142 0.01781703)
      PathPoint P4: calcn_r (0.09547975 0.03692782 0.009839795)
      PathPoint P5: calcn_r (0.1099273 0.02592126 0.01064071)
    Schutte1993Muscle_Deprecated LGMED1: max_isometric_force=546 optimal_fiber_length=0.05749099
        tendon_slack_length=0.08381864 pennation_angle_at_optimal=0.1396263
      PathPoint P1: pelvis (-0.04869226 0.03240541 -0.1200939)
      PathPoint P2: femur_l (-0.02244655 -0.012047 -0.05714604)
    Schutte1993Muscle_Deprecated LGMED2: max_isometric_force=382 optimal_fiber_length=0.08912232
        tendon_slack_length=0.05589921 pennation_angle_at_optimal=0
      PathPoint P1: pelvis (-0.1020389 0.04743555 -0.07608925)
      PathPoint P2: femur_l (-0.02656519 -0.005972019 -0.054263)
    Schutte1993Muscle_Deprecated LGMED3: max_isometric_force=435 optimal_fiber_length=0.0685914
        tendon_slack_length=0.05627467 pennation_angle_at_optimal=0.3316126
      PathPoint P1: pelvis (-0.1459574 0.01119266 -0.06436793)
      PathPoint P2: femur_l (-0.03181645 -0.004839395 -0.05333631)
    Schutte1993Muscle_Deprecated LGMIN1: max_isometric_force=180 optimal_fiber_length=0.07299032
        tendon_slack_length=0.01717419 pennation_angle_at_optimal=0.1745329
      PathPoint P1: pelvis (-0.05573354 -0.00852774 -0.1048959)
      PathPoint P2: femur_l (-0.007413541 -0.01070845 -0.05766087)
    Schutte1993Muscle_Deprecated LGMIN2: max_isometric_force=190 optimal_fiber_length=0.05926509
        tendon_slack_length=0.02751593 pennation_angle_at_optimal=0
      PathPoint P1: pelvis (-0.0755446 -0.006928789 -0.09843923)
      PathPoint P2: femur_l (-0.009884721 -0.01070845 -0.05766087)
    Schutte1993Muscle_Deprecated LGMIN3: max_isometric_force=215 optimal_fiber_length=0.03990933
        tendon_slack_length=0.05356252 pennation_angle_at_optimal=0.3665191
      PathPoint P1: pelvis (-0.0995327 -0.006715595 -0.08502925)
      PathPoint P2: femur_l (-0.01390039 -0.008546165 -0.05663121)
    Schutte1993Muscle_Deprecated LSEMIMEM: max_isometric_force=1030 optimal_fiber_length=0.08221239
        tendon_slack_length=0.3689281 pennation_angle_at_optimal=0.2617994
      PathPoint P1: pelvis (-0.1422578 -0.1081957 -0.0690366)
      PathPoint P2: tibia_l (-0.02502449 -0.05519805 0.0199784)
    Schutte1993Muscle_Deprecated LSEMITEN: max_isometric_force=328 optimal_fiber_length=0.2065531
        tendon_slack_length=0.2692383 pennation_angle_at_optimal=0.08726646
      PathPoint P1: pelvis (-0.1476282 -0.1111804 -0.05989794)
      PathPoint P2: tibia_l (-0.03233617 -0.05612488 0.01503529)
      PathPoint P3: tibia_l (-0.0116369 -0.07682415 0.02523045)
      PathPoint P4: tibia_l (0.002780499 -0.09845025 0.01987542)
    Schutte1993Muscle_Deprecated LBIFEMLH: max_isometric_force=717 optimal_fiber_length=0.1121348
        tendon_slack_length=0.3508069 pennation_angle_at_optimal=0
      PathPoint P1: pelvis (-0.1484636 -0.1067033 -0.06615593)
      PathPoint P2: tibia_l (-0.008341496 -0.07507347 -0.04356115)
    Schutte1993Muscle_Deprecated LBIFEMSH: max_isometric_force=402 optimal_fiber_length=0.1781388
        tendon_slack_length=0.1029704 pennation_angle_at_optimal=0.4014257
      PathPoint P1: femur_l (0.005148292 -0.2173609 -0.02409401)
      PathPoint P2: tibia_l (-0.01040112 -0.07466154 -0.04181046)
    Schutte1993Muscle_Deprecated LSAR: max_isometric_force=104 optimal_fiber_length=0.5995588
        tendon_slack_length=0.0414203 pennation_angle_at_optimal=0
      PathPoint P1: pelvis (-0.0182596 -0.001385758 -0.1233719)
      PathPoint P2: femur_l (-0.003088975 -0.3673821 0.04334862)
      PathPoint P3: tibia_l (-0.00576696 -0.04314922 0.04108959)
      PathPoint P4: tibia_l (0.006178886 -0.06065607 0.03944189)
      PathPoint P5: tibia_l (0.02502449 -0.08650441 0.02595132)
    Schutte1993Muscle_Deprecated LRF: max_isometric_force=779 optimal_fiber_length=0.08697199
        tendon_slack_length=0.3582418 pennation_angle_at_optimal=0.08726646
      PathPoint P1: pelvis (-0.03520641 -0.03315159 -0.09615457)
      ConditionalPathPoint P2: femur_l (0.03439059 -0.4149523 -0.001956351)
          socket_coordinate=/jointset/lfemoral-tibial/knee_angle_l range=(-2.61799 -1.45997)
      PathPoint P3: lpatella (0.0121 0.0437 0.001)
    Schutte1993Muscle_Deprecated LADDLONG: max_isometric_force=418 optimal_fiber_length=0.141799
        tendon_slack_length=0.1130282 pennation_angle_at_optimal=0.1047198
      PathPoint P1: pelvis (-0.03771263 -0.08911488 -0.01678732)
      PathPoint P2: femur_l (0.005148292 -0.2173609 -0.02409401)
    Schutte1993Muscle_Deprecated LADDBREV: max_isometric_force=286 optimal_fiber_length=0.1347838
        tendon_slack_length=0.02026825 pennation_angle_at_optimal=0
      PathPoint P1: pelvis (-0.07005479 -0.09753603 -0.01629065)
      PathPoint P2: femur_l (0.0009266926 -0.1231471 -0.03027196)
    Schutte1993Muscle_Deprecated LAMAG1: max_isometric_force=346 optimal_fiber_length=0.0874619
        tendon_slack_length=0.06031855 pennation_angle_at_optimal=0.08726646
      PathPoint P1: pelvis (-0.08735964 -0.1251446 -0.02532997)
      PathPoint P2: femur_l (-0.004633463 -0.1246916 -0.03490542)
    Schutte1993Muscle_Deprecated LAMAG2: max_isometric_force=312 optimal_fiber_length=0.1231295
        tendon_slack_length=0.1322879 pennation_angle_at_optimal=0.05235988
      PathPoint P1: pelvis (-0.09917467 -0.1270633 -0.03059464)
      PathPoint P2: femur_l (0.005560155 -0.2352769 -0.02337325)
    Schutte1993Muscle_Deprecated LAMAG3: max_isometric_force=444 optimal_fiber_length=0.1340957
        tendon_slack_length=0.2661441 pennation_angle_at_optimal=0.08726646
      PathPoint P1: pelvis (-0.09201404 -0.1258908 -0.02741597)
      PathPoint P2: femur_l (0.007207609 -0.3950799 0.02738891)
    Schutte1993Muscle_Deprecated LTFL: max_isometric_force=155 optimal_fiber_length=0.09848521
        tendon_slack_length=0.4405917 pennation_angle_at_optimal=0.05235988
      PathPoint P1: pelvis (-0.03711591 0.0228117 -0.1232725)
      PathPoint P2: femur_l (0.03027196 -0.102451 -0.06147061)
      PathPoint P3: femur_l (0.005560155 -0.4169087 -0.03675881)
      PathPoint P4: tibia_l (0.006178886 -0.05015196 -0.03058549)
    Schutte1993Muscle_Deprecated LPECT: max_isometric_force=177 optimal_fiber_length=0.1378594
        tendon_slack_length=0.001036537 pennation_angle_at_optimal=0
      PathPoint P1: pelvis (-0.05143716 -0.0818663 -0.04479929)
      PathPoint P2: femur_l (-0.01256183 -0.08463792 -0.02605036)
    Schutte1993Muscle_Deprecated LGRA: max_isometric_force=108 optimal_fiber_length=0.3613577
        tendon_slack_length=0.1437218 pennation_angle_at_optimal=0.05235988
      PathPoint P1: pelvis (-0.06719054 -0.1106474 -0.007847325)
      PathPoint P2: tibia_l (-0.01585914 -0.04891618 0.03686735)
      PathPoint P3: tibia_l (0.006178886 -0.08609248 0.02347977)
    Schutte1993Muscle_Deprecated LGMAX1: max_isometric_force=382 optimal_fiber_length=0.1505332
        tendon_slack_length=0.1325117 pennation_angle_at_optimal=0.08726646
      PathPoint P1: pelvis (-0.1426158 0.06523721 -0.06953326)
      PathPoint P2: pelvis (-0.1540728 0.001279161 -0.08800924)
      PathPoint P3: femur_l (-0.04705539 -0.02553553 -0.04036261)
      PathPoint P4: femur_l (-0.02852154 -0.05827867 -0.04839395)
    Schutte1993Muscle_Deprecated LGMAX2: max_isometric_force=546 optimal_fiber_length=0.155909
        tendon_slack_length=0.1346969 pennation_angle_at_optimal=0
      PathPoint P1: pelvis (-0.1609947 0.01876103 -0.05592461)
      PathPoint P2: pelvis (-0.164217 -0.05543031 -0.09079057)
      PathPoint P3: femur_l (-0.04386345 -0.0545719 -0.03016899)
      PathPoint P4: femur_l (-0.01606267 -0.1046133 -0.04314269)
    Schutte1993Muscle_Deprecated LGMAX3: max_isometric_force=368 optimal_fiber_length=0.1530825
        tendon_slack_length=0.1541456 pennation_angle_at_optimal=0.08726646
      PathPoint P1: pelvis (-0.1856989 -0.03347138 -0.005761327)
      PathPoint P2: pelvis (-0.1824766 -0.1121398 -0.04003129)
      PathPoint P3: femur_l (-0.03078679 -0.1071874 -0.01390039)
      PathPoint P4: femur_l (-0.006177951 -0.1461085 -0.04231896)
    Schutte1993Muscle_Deprecated LILIACUS: max_isometric_force=429 optimal_fiber_length=0.1086108
        tendon_slack_length=0.09774973 pennation_angle_at_optimal=0.1221731
      PathPoint P1: pelvis (-0.0804377 0.03890781 -0.08483058)
      PathPoint P2: pelvis (-0.02601694 -0.05862821 -0.08453258)
      PathPoint P3: femur_l (0.001750419 -0.05591045 -0.005869053)
      PathPoint P4: femur_l (-0.01987241 -0.06394179 -0.01328259)
    Schutte1993Muscle_Deprecated LPSOAS: max_isometric_force=371 optimal_fiber_length=0.1116155
        tendon_slack_length=0.1395194 pennation_angle_at_optimal=0.1396263
      PathPoint P1: pelvis (-0.07721542 0.09455132 -0.0287073)
      PathPoint P2: pelvis (-0.02840382 -0.06076015 -0.07539392)
      PathPoint P3: femur_l (0.001647453 -0.05220368 -0.003912702)
      PathPoint P4: femur_l (-0.01935758 -0.06147061 -0.01070845)
    Schutte1993Muscle_Deprecated LQUADFEM: max_isometric_force=254 optimal_fiber_length=0.05573073
        tendon_slack_length=0.02476921 pennation_angle_at_optimal=0
      PathPoint P1: pelvis (-0.1364099 -0.1226929 -0.05165328)
      PathPoint P2: femur_l (-0.03922999 -0.03696474 -0.0376855)
    Schutte1993Muscle_Deprecated LGLEM: max_isometric_force=109 optimal_fiber_length=0.02586858
        tendon_slack_length=0.04203644 pennation_angle_at_optimal=0
      PathPoint P1: pelvis (-0.1352165 -0.08740933 -0.07092393)
      PathPoint P2: femur_l (-0.01462115 -0.003397873 -0.04561387)
    Schutte1993Muscle_Deprecated LPERI: max_isometric_force=296 optimal_fiber_length=0.02763269
        tendon_slack_length=0.1222215 pennation_angle_at_optimal=0.1745329
      PathPoint P1: pelvis (-0.1666039 0.0003197902 -0.02334331)
      PathPoint P2: pelvis (-0.1423771 -0.0294207 -0.06526193)
      PathPoint P3: femur_l (-0.01523894 -0.00370677 -0.04499607)
    Schutte1993Muscle_Deprecated lVASMED: max_isometric_force=1294 optimal_fiber_length=0.09225361
        tendon_slack_length=0.1306062 pennation_angle_at_optimal=0.08726646
      PathPoint P1: femur_l (0.01441522 -0.2161253 -0.01935758)
      PathPoint P2: femur_l (0.03665584 -0.2851124 -0.0009266926)
      ConditionalPathPoint P3: femur_l (0.03809736 -0.4168057 0.01287073)
          socket_coordinate=/jointset/lfemoral-tibial/knee_angle_l range=(-2.61799 -1.20986)
      ConditionalPathPoint P4: femur_l (0.02821264 -0.4381197 0.01348853)
          socket_coordinate=/jointset/lfemoral-tibial/knee_angle_l range=(-2.61799 -1.78006)
      PathPoint P5: lpatella (0.0063 0.0445 0.017)
    Schutte1993Muscle_Deprecated LVASINT: max_isometric_force=1365 optimal_fiber_length=0.09024022
        tendon_slack_length=0.1410652 pennation_angle_at_optimal=0.05235988
      PathPoint P1: femur_l (0.02986009 -0.1981063 -0.03191941)
      PathPoint P2: femur_l (0.03449356 -0.2145808 -0.02934527)
      ConditionalPathPoint P3: femur_l (0.03531728 -0.4149523 -0.005663121)
          socket_coordinate=/jointset/lfemoral-tibial/knee_angle_l range=(-2.61799 -1.42)
      PathPoint P4: lpatella (0.0058 0.048 0.0006)
    Schutte1993Muscle_Deprecated LVASLAT: max_isometric_force=1871 optimal_fiber_length=0.08700168
        tendon_slack_length=0.1626103 pennation_angle_at_optimal=0.08726646
      PathPoint P1: femur_l (0.00494236 -0.1908987 -0.03593508)
      PathPoint P2: femur_l (0.02769781 -0.2667845 -0.04211303)
      ConditionalPathPoint P3: femur_l (0.03717067 -0.4149523 -0.021108)
          socket_coordinate=/jointset/lfemoral-tibial/knee_angle_l range=(-2.61799 -1.20986)
      ConditionalPathPoint P4: femur_l (0.02605036 -0.4368841 -0.01894572)
          socket_coordinate=/jointset/lfemoral-tibial/knee_angle_l range=(-2.61799 -1.91986)
      PathPoint P5: lpatella (0.0103 0.0423 -0.0141)
    Schutte1993Muscle_Deprecated LMEDGAS: max_isometric_force=1113 optimal_fiber_length=0.04621057
        tendon_slack_length=0.4189758 pennation_angle_at_optimal=0.296706
      PathPoint P1: femur_l (-0.01307666 -0.4045528 0.02419697)
      ConditionalPathPoint P2: femur_l (-0.02460884 -0.4141286 0.02656519)
          socket_coordinate=/jointset/lfemoral-tibial/knee_angle_l range=(-0.770039 0.100007)
      PathPoint P3: tibia_l (-0.02234697 -0.05015196 0.03037952)
      PathPoint P4: calcn_l (0.004526291 0.02821619 0.0060341)
    Schutte1993Muscle_Deprecated LLATGAS: max_isometric_force=488 optimal_fiber_length=0.06574144
        tendon_slack_length=0.3954758 pennation_angle_at_optimal=0.1396263
      PathPoint P1: femur_l (-0.01595971 -0.4063032 -0.02800671)
      ConditionalPathPoint P2: femur_l (-0.02615332 -0.4137168 -0.02821264)
          socket_coordinate=/jointset/lfemoral-tibial/knee_angle_l range=(-0.770039 0.100007)
      PathPoint P3: tibia_l (-0.02492151 -0.04953407 -0.02420064)
      PathPoint P4: calcn_l (0.004526291 0.02821619 0.0060341)
    Schutte1993Muscle_Deprecated LSOL: max_isometric_force=2839 optimal_fiber_length=0.03077541
        tendon_slack_length=0.274927 pennation_angle_at_optimal=0.4363323
      PathPoint P1: tibia_l (-0.002471554 -0.1578705 -0.007311682)
      PathPoint P2: calcn_l (0.004526291 0.02821619 0.0060341)
    Schutte1993Muscle_Deprecated LSOLSTIF: max_isometric_force=2839 optimal_fiber_length=0.03077541
        tendon_slack_length=0.274927 pennation_angle_at_optimal=0.4363323
      PathPoint P1: tibia_l (-0.002471554 -0.1578705 -0.007311682)
      PathPoint P2: calcn_l (0.004526291 0.02821619 0.0060341)
      tendon_force_length_curve: SimmSpline: x=(-10 -0.002 -0.001 0 0.00131 0.00281 0.00431 0.00581 0.00731 0.00881 0.0103 0.0118 0.0123 9.2 9.201 9.202 20)
          y=(0 0 0 0 1.08 2.57 4.35 6.52 9.15 12.3 16.1 20.8 22.7 34500 34500 34500 34500)
    Schutte1993Muscle_Deprecated LTIBPOST: max_isometric_force=1270 optimal_fiber_length=0.03173707
        tendon_slack_length=0.3173707 pennation_angle_at_optimal=0.2094395
      PathPoint P1: tibia_l (-0.009680255 -0.138819 -0.001956647)
      PathPoint P2: tibia_l (-0.01482933 -0.4171778 0.02358275)
      PathPoint P3: calcn_l (0.04289689 0.03040067 0.03256137)
      PathPoint P4: calcn_l (0.07941582 0.01447217 0.03199212)
    Schutte1993Muscle_Deprecated LFLEXDIG: max_isometric_force=310 optimal_fiber_length=0.0358023
        tendon_slack_length=0.4212035 pennation_angle_at_optimal=0.1221731
      PathPoint P1: tibia_l (-0.008547459 -0.2107 0.001853666)
      PathPoint P2: tibia_l (-0.01585914 -0.4171778 0.02018436)
      PathPoint P3: calcn_l (0.04485142 0.02867129 0.03187826)
      PathPoint P4: calcn_l (0.07283213 0.01601951 0.0299428)
      PathPoint P5: calcn_l (0.1705589 -0.007372617 -0.01320671)
      PathPoint P6: digits_l (-0.001695125 -0.006958935 -0.01930545)
      PathPoint P7: digits_l (0.02542688 -0.006334415 -0.02823586)
      PathPoint P8: digits_l (0.03934475 -0.005353027 -0.03178176)
    Schutte1993Muscle_Deprecated LFLEXHAL: max_isometric_force=322 optimal_fiber_length=0.04505721
        tendon_slack_length=0.39818 pennation_angle_at_optimal=0.1745329
      PathPoint P1: tibia_l (-0.008135533 -0.2403587 -0.02512747)
      PathPoint P2: tibia_l (-0.01915455 -0.4200613 0.01791877)
      PathPoint P3: calcn_l (0.03847347 0.02512151 0.02743808)
      PathPoint P4: calcn_l (0.1067793 0.006189357 0.02914584)
      PathPoint P5: calcn_l (0.177554 -0.004824058 0.0306259)
      PathPoint P6: digits_l (0.01382865 -0.005709895 0.03480234)
      PathPoint P7: digits_l (0.05014002 -0.009100145 0.02377066)
    Schutte1993Muscle_Deprecated LTIBANT: max_isometric_force=603 optimal_fiber_length=0.1002427
        tendon_slack_length=0.2281034 pennation_angle_at_optimal=0.08726646
      PathPoint P1: tibia_l (0.01843368 -0.1672418 -0.01184286)
      PathPoint P2: tibia_l (0.03388089 -0.4068796 0.01822771)
      PathPoint P3: calcn_l (0.1199467 0.01620155 0.03472454)
    Schutte1993Muscle_Deprecated LPERBREV: max_isometric_force=348 optimal_fiber_length=0.0512671
        tendon_slack_length=0.1650801 pennation_angle_at_optimal=0.08726646
      PathPoint P1: tibia_l (-0.0072087 -0.2724889 -0.03346897)
      PathPoint P2: tibia_l (-0.02039032 -0.4308743 -0.02914375)
      PathPoint P3: tibia_l (-0.01482933 -0.4423053 -0.02976163)
      PathPoint P4: calcn_l (0.04845188 0.02457539 -0.02652727)
      PathPoint P5: calcn_l (0.06964315 0.01993337 -0.03905087)
    Schutte1993Muscle_Deprecated LPERLONG: max_isometric_force=754 optimal_fiber_length=0.05059462
        tendon_slack_length=0.3562274 pennation_angle_at_optimal=0.1745329
      PathPoint P1: tibia_l (0.0005149072 -0.1614749 -0.03727928)
      PathPoint P2: tibia_l (-0.02131716 -0.4330369 -0.02945269)
      PathPoint P3: tibia_l (-0.01668299 -0.4447768 -0.02976163)
      PathPoint P4: calcn_l (0.04505716 0.02093459 -0.02516106)
      PathPoint P5: calcn_l (0.07005463 0.009648116 -0.03233367)
      PathPoint P6: calcn_l (0.08764544 0.006280377 -0.01343441)
      PathPoint P7: calcn_l (0.1237529 0.007736697 0.02094857)
    Schutte1993Muscle_Deprecated LPERTERT: max_isometric_force=90 optimal_fiber_length=0.08081909
        tendon_slack_length=0.1023026 pennation_angle_at_optimal=0.2268928
      PathPoint P1: tibia_l (0.001029814 -0.2887599 -0.02378871)
      PathPoint P2: tibia_l (0.02358275 -0.4190315 -0.01637405)
      PathPoint P3: calcn_l (0.0881598 0.02075255 -0.03404143)
    Schutte1993Muscle_Deprecated LEXTDIG: max_isometric_force=341 optimal_fiber_length=0.1065535
        tendon_slack_length=0.3604017 pennation_angle_at_optimal=0.1396263
      PathPoint P1: tibia_l (0.003295406 -0.1422174 -0.02842288)
      PathPoint P2: tibia_l (0.02976163 -0.4126466 -0.007414663)
      PathPoint P3: calcn_l (0.09484636 0.03531574 0.0001138509)
      PathPoint P4: calcn_l (0.1662383 0.005006098 -0.01480062)
      PathPoint P5: digits_l (0.0002676513 0.004193204 -0.02009343)
      PathPoint P6: digits_l (0.03952318 -0.0003568684 -0.0328324)
    Schutte1993Muscle_Deprecated LEXTHAL: max_isometric_force=108 optimal_fiber_length=0.112871
        tendon_slack_length=0.310141 pennation_angle_at_optimal=0.1047198
      PathPoint P1: tibia_l (0.001235777 -0.1819682 -0.02347977)
      PathPoint P2: tibia_l (0.03357195 -0.410381 0.008753422)
      PathPoint P3: calcn_l (0.09978413 0.03540676 0.02402255)
      PathPoint P4: calcn_l (0.1330112 0.02812517 0.02925969)
      PathPoint P5: calcn_l (0.178377 0.01265177 0.03187826)
      PathPoint P6: digits_l (0.0265867 0.003657902 0.03217575)
      PathPoint P7: digits_l (0.05022923 0.003033382 0.0244273)
    Schutte1993Muscle_Deprecated LLIGPAT: max_isometric_force=100 optimal_fiber_length=0.05144539
        tendon_slack_length=0.005144539 pennation_angle_at_optimal=0
      PathPoint P1: tibia_l (0.04016276 -0.08465074 0)
      PathPoint P2: lpatella (0.0021 0.0015 -0.0001)
    Schutte1993Muscle_Deprecated LTPOST2: max_isometric_force=1270 optimal_fiber_length=0.03175427
        tendon_slack_length=0.3175427 pennation_angle_at_optimal=0.2094395
      PathPoint P1: tibia_l (-0.009680255 -0.138819 -0.001956647)
      PathPoint P2: tibia_l (0.00648783 -0.3609499 -0.01503529)
      PathPoint P3: tibia_l (0.01699194 -0.4020395 -0.01812473)
      PathPoint P4: calcn_l (0.09381766 0.04214224 -0.009791181)
      PathPoint P5: calcn_l (0.1080138 0.02958149 -0.01058814)
    ObjectGroup r rhip abductors: members=(GMAX1 GMED1 GMED2 GMED3 GMIN1 GMIN2 GMIN3 PERI SAR TFL)
    ObjectGroup r rhip flexors: members=(ADDBREV ADDLONG GMED1 GMIN1 GRA ILIACUS PECT PSOAS RF SAR TFL)
    ObjectGroup r rhip int rotators: members=(GMED1 GMIN1 ILIACUS PSOAS TFL)
    ObjectGroup r rhip ext rotators: members=(GLEM GMED3 GMIN3 PERI QUADFEM)
    ObjectGroup r rhip extensors: members=(ADDLONG AMAG1 AMAG2 AMAG3 BIFEMLH GMAX1 GMAX2 GMAX3 GMED3 GMIN3 HAMSTRINGS SEMIMEM SEMITEN)
    ObjectGroup r rhip adductors: members=(ADDBREV ADDLONG AMAG1 AMAG2 AMAG3 BIFEMLH GRA HAMSTRINGS PECT SEMIMEM SEMITEN)
    ObjectGroup r knee flexors: members=(BIFEMLH BIFEMSH GRA HAMSTRINGS LATGAS MEDGAS SAR SEMIMEM SEMITEN)
    ObjectGroup r knee extensors: members=(LIGPAT RF VASINT VASLAT VASMED)
    ObjectGroup r rankle plantar flexors: members=(FLEXDIG FLEXHAL LATGAS MEDGAS PERBREV PERLONG SOL TIBPOST)
    ObjectGroup r rankle dorsiflexors: members=(EXTDIG EXTHAL PERTERT TIBANT TPOST2)
    ObjectGroup r invertors: members=(EXTHAL FLEXDIG FLEXHAL TIBANT TIBPOST)
    ObjectGroup r evertors: members=(EXTDIG PERBREV PERLONG PERTERT TPOST2)
    ObjectGroup l rhip abductors: members=(LGMAX1 LGMED1 LGMED2 LGMED3 LGMIN1 LGMIN2 LGMIN3 LPERI LTFL LSAR)
    ObjectGroup l rhip flexors: members=(LADDBREV LADDLONG LGMED1 LGMIN1 LGRA LILIACUS LPECT LPSOAS LRF LTFL LSAR)
    ObjectGroup l rhip int rotators: members=(LGMED1 LGMIN1 LILIACUS LPSOAS LTFL)
    ObjectGroup l rhip ext rotators: members=(LGLEM LGMED3 LGMIN3 LPERI LQUADFEM)
    ObjectGroup l rhip extensors: members=(LADDLONG LAMAG1 LAMAG2 LAMAG3 LBIFEMLH LGMAX1 LGMAX2 LGMAX3 LGMED3 LGMIN3 LSEMIMEM LSEMITEN)
    ObjectGroup l rhip adductors: members=(LADDBREV LADDLONG LAMAG1 LAMAG2 LAMAG3 LBIFEMLH LGRA LPECT LSEMIMEM LSEMITEN)
    ObjectGroup l knee flexors: members=(LBIFEMLH LBIFEMSH LGRA LLATGAS LMEDGAS LSEMIMEM LSEMITEN LSAR)
    ObjectGroup l knee extensors: members=(LLIGPAT LRF LVASINT LVASLAT lVASMED)
    ObjectGroup l rankle plantar flexors: members=(LFLEXDIG LFLEXHAL LLATGAS LMEDGAS LPERBREV LPERLONG LSOL LTIBPOST)
    ObjectGroup l rankle dorsiflexors: members=(LEXTDIG LEXTHAL LPERTERT LTIBANT LTPOST2)
    ObjectGroup l invertors: members=(LEXTHAL LFLEXDIG LFLEXHAL LTIBANT LTIBPOST)
    ObjectGroup l evertors: members=(LEXTDIG LPERBREV LPERLONG LPERTERT LTPOST2)
  MarkerSet:
    Marker RASIS: pelvis (0.01066681 0.007045395 0.1173563) fixed=true
    Marker LASIS: pelvis (-0.000239838 0.01143656 -0.1195398)
    Marker RPSIS: pelvis (-0.1743497 0.03631882 0.04805711)
    Marker LPSIS: pelvis (-0.1830127 0.0355277 -0.04565566)
    Marker RT1: femur_r (0.08206543 -0.1464209 0.09120491)
    Marker RT2: femur_r (0.004105364 -0.1507883 0.1067803)
    Marker RT3: femur_r (0.08471222 -0.2223093 0.08827969)
    Marker RT4: femur_r (0.005375207 -0.2261465 0.1040033)
    Marker RMKN: femur_r (0.003049826 -0.4332749 -0.04748878)
    Marker RLKN: femur_r (0.005549385 -0.4392502 0.08225685)
    Marker RMM: tibia_r (0.00333086 -0.4155875 -0.03087411)
    Marker RLM: tibia_r (-0.01592385 -0.43291 0.05292526)
    Marker RDC: calcn_r (-0.04997957 -0.01584864 -0.001386649)
    Marker RLC: calcn_r (0.009785727 0.004912378 0.04571009)
    Marker RMC: calcn_r (0.01849378 0.01741382 -0.03490052)
    Marker RNAV: midfoot_r (0.005933129 -0.004406824 -0.04009375)
    Marker RMB1: midfoot_r (0.0464746 0.004523906 -0.03545206)
    Marker RMB2: midfoot_r (0.0712621 0.01694271 0.01944935)
    Marker RMB5: midfoot_r (0.01032598 -0.03120164 0.06430578)
    Marker RMH1: forefoot_r (0.05418223 -0.008716864 -0.04855403)
    Marker RMH2: forefoot_r (0.06460507 0.01082061 0.005940219)
    Marker RMH5: forefoot_r (0.02984067 -0.01920174 0.07070378)
    Marker RD1: digits_r (0.02671352 0.02052301 -0.04020303)
    Marker LT1: femur_l (0.04686366 -0.1194325 -0.1017703)
    Marker LT2: femur_l (-0.03465185 -0.1249055 -0.09852401)
    Marker LT3: femur_l (0.05136189 -0.1951012 -0.09719251)
    Marker LT4: femur_l (-0.02942832 -0.1988172 -0.09836648)
    Marker LMKN: femur_l (-0.01266883 -0.4260869 0.03963968)
    Marker LLKN: femur_l (-0.01629268 -0.415889 -0.07849584)
    Marker LMM: tibia_l (0.0004733034 -0.4261626 0.03945179)
    Marker LLM: tibia_l (-0.02142002 -0.4353085 -0.04581271)
    Marker LDC: calcn_l (-0.05178403 -0.005300163 0.01327233)
    Marker LLC: calcn_l (0.0101842 0.01275336 -0.03749815)
    Marker LMC: calcn_l (0.01919239 0.02629353 0.04302352)
    Marker LNAV: midfoot_l (0.003721196 0.0004345784 0.04099392)
    Marker LMB1: midfoot_l (0.04379676 0.004552848 0.03974356)
    Marker LMB2: midfoot_l (0.07417904 0.02621033 -0.01600605)
    Marker LMB5: midfoot_l (0.01238238 -0.02715969 -0.06236467)
    Marker LMH1: forefoot_l (0.06557176 0.007346858 0.03366915)
    Marker LMH2: forefoot_l (0.07632203 0.01925532 -0.01831864)
    Marker LMH5: forefoot_l (0.03665773 -0.01608164 -0.08646704)
    Marker LD1: digits_l (0.05791075 0.03399258 0.02931288)
