# OpenSim document version 30000
Model Lower_Extemity_Model-scaled-S2:
  credits: Arnab Sikidar, Marieswaran M, Dinesh Kalyanasundaram
  publications: List of publications related to model...
  length_units: meters
  force_units: N
  gravity: 0 -9.80665 0
  BodySet:
    Body ground: mass=0 mass_center=(0 0 0) inertia_xx=0 inertia_yy=0 inertia_zz=0 meshes=treadmill.vtp
    Body pelvis: mass=11.777 mass_center=(-0.0707 0 0) inertia_xx=0.1028 inertia_yy=0.0871 inertia_zz=0.0579
        meshes=(sacrum.vtp pelvis.vtp l_pelvis.vtp)
      CustomJoint ground_pelvis: parent_body=ground location_in_parent=(0 0 0) location=(0 0 0)
        Coordinate pelvis_tilt: motion_type=rotational default_value=0 range=(-1.570796 1.570796) clamped=false
            locked=true
        Coordinate pelvis_list: motion_type=rotational default_value=0 range=(-1.570796 1.570796) clamped=false
            locked=true
        Coordinate pelvis_rotation: motion_type=rotational default_value=0 range=(-3.14 3.14) clamped=true
        Coordinate pelvis_tx: motion_type=translational default_value=0 range=(-5 5) clamped=true
        Coordinate pelvis_ty: motion_type=translational default_value=0 range=(-1 2) clamped=true
        Coordinate pelvis_tz: motion_type=translational default_value=0 range=(-3 3) clamped=true
        SpatialTransform:
          TransformAxis rotation1: coordinates=pelvis_tilt axis=(0 0 1) LinearFunction(coefficients=1 0)
          TransformAxis rotation2: coordinates=pelvis_list axis=(1 0 0) LinearFunction(coefficients=1 0)
          TransformAxis rotation3: coordinates=pelvis_rotation axis=(0 1 0) LinearFunction(coefficients=1 0)
          TransformAxis translation1: coordinates=pelvis_tx axis=(1 0 0) LinearFunction(coefficients=1 0)
          TransformAxis translation2: coordinates=pelvis_ty axis=(0 1 0) LinearFunction(coefficients=1 0)
          TransformAxis translation3: coordinates=pelvis_tz axis=(0 0 1) LinearFunction(coefficients=1 0)
      WrapCylinder Gmax1_at_pelvis_r: xyz_body_rotation=(-0.6 0.45 0) translation=(-0.077 -0.099 0.061) quadrant=-x
          radius=0.04 length=0.15
      WrapCylinder Gmax2_at_pelvis_r: xyz_body_rotation=(-0.75 0.39 0) translation=(-0.08 -0.083 0.068) quadrant=all
          radius=0.04 length=0.1
      WrapCylinder Gmax3_at_pelvis_r: xyz_body_rotation=(-0.1 0 0) translation=(-0.083 -0.088 0.068) quadrant=all
          radius=0.04 length=0.1
      WrapCylinder Gmax1_at_pelvis_l: xyz_body_rotation=(0.6 -0.45 0) translation=(-0.077 -0.099 -0.061) quadrant=-x
          radius=0.04 length=0.15
      WrapCylinder Gmax2_at_pelvis_l: xyz_body_rotation=(0.75 -0.39 0) translation=(-0.08 -0.083 -0.068) quadrant=all
          radius=0.04 length=0.1
      WrapCylinder Gmax3_at_pelvis_l: xyz_body_rotation=(0.1 0 0) translation=(-0.083 -0.088 -0.068) quadrant=all
          radius=0.04 length=0.1
      WrapCylinder PS_at_brim_r: xyz_body_rotation=(-0.25 -0.27 0.1) translation=(-0.074 -0.06 0.0656) quadrant=-y
          radius=0.05 length=0.1
      WrapCylinder PS_at_brim_l: xyz_body_rotation=(0.25 0.27 0.1) translation=(-0.074 -0.06 -0.0656) quadrant=-y
          radius=0.05 length=0.1
      WrapCylinder IL_at_brim_r: xyz_body_rotation=(-0.32 -0.24 0.9) translation=(-0.071 -0.065 0.0756) quadrant=-y
          radius=0.0549 length=0.1
      WrapCylinder IL_at_brim_l: xyz_body_rotation=(0.32 0.24 0.9) translation=(-0.071 -0.065 -0.0756) quadrant=-y
          radius=0.0549 length=0.1
    Body femur_r: mass=9.3014 mass_center=(0 -0.17 0) inertia_xx=0.1339 inertia_yy=0.0351 inertia_zz=0.1412
        meshes=(r_femur.vtp .\Geometry\femur_cartilage_lat_r.obj .\Geometry\femur_cartilage_med_r.obj)
      CustomJoint hip_r: parent_body=pelvis location_in_parent=(-0.069993 -0.065439 0.082665) location=(0 0 0)
        Coordinate hip_flexion_r: motion_type=rotational default_value=0 range=(-2.094395 2.094395) clamped=true
        Coordinate hip_adduction_r: motion_type=rotational default_value=0 range=(-2.094395 2.094395) clamped=true
        Coordinate hip_rotation_r: motion_type=rotational default_value=0 range=(-2.094395 2.094395) clamped=true
        SpatialTransform: axes_held_at_zero=(translation1 translation2 translation3)
          TransformAxis rotation1: coordinates=hip_flexion_r axis=(0 0 1) LinearFunction(coefficients=1 0)
          TransformAxis rotation2: coordinates=hip_adduction_r axis=(1 0 0) LinearFunction(coefficients=1 0)
          TransformAxis rotation3: coordinates=hip_rotation_r axis=(0 1 0) LinearFunction(coefficients=1 0)
      WrapCylinder Gastroc_at_condyles_r: translation=(0.005 -0.41 0) quadrant=all radius=0.025 length=0.1
      WrapCylinder KnExt_at_fem_r: xyz_body_rotation=(-0.0623366 0.0507601 0)
          translation=(0.00358828 -0.402732 0.00209111) quadrant=all radius=0.025 length=0.1
      WrapCylinder AB_at_femshaft_r: xyz_body_rotation=(1.66157 0.186644 0) translation=(0.0146434 -0.112595 0.023365)
          quadrant=all radius=0.0165 length=0.07
      WrapCylinder AL_at_femshaft_r: xyz_body_rotation=(1.77711 0.136489 0) translation=(0.0307327 -0.231909 0.0151137)
          quadrant=all radius=0.0201 length=0.1
      WrapCylinder AMprox_at_femshaft_r: xyz_body_rotation=(1.61126 0.18656 0)
          translation=(0.00518299 -0.0728948 0.025403) quadrant=all radius=0.0211 length=0.07
      WrapCylinder AMmid_at_femshaft_r: xyz_body_rotation=(1.61139 0.13656 0)
          translation=(0.0230125 -0.160711 0.0205842) quadrant=all radius=0.0214 length=0.12
      WrapCylinder AMdist_at_femshaft_r: xyz_body_rotation=(1.71188 0.186636 0)
          translation=(0.0316065 -0.260736 0.0093646) quadrant=all radius=0.0218 length=0.2
      WrapCylinder AMisch_at_condyles_r: xyz_body_rotation=(1.71115 -0.463363 0)
          translation=(-0.0226511 -0.376831 -0.00315437) quadrant=all radius=0.04 length=0.24
      WrapCylinder PECT_at_femshaft_r: xyz_body_rotation=(1.81295 0.276344 0)
          translation=(0.00608573 -0.0845029 0.0304405) quadrant=all radius=0.015 length=0.05
    Body tibia_r: mass=3.7075 mass_center=(0 -0.1867 0) inertia_xx=0.0504 inertia_yy=0.0051 inertia_zz=0.0511
        meshes=(r_tibia.vtp fibula.vtp .\Geometry\med_meniscus_r.obj .\Geometry\lat_meniscus_r.obj .\Geometry\tibial_talus_cartilage_r.stl)
      CustomJoint knee_r: parent_body=femur_r location_in_parent=(0 0 0) location=(0 0 0)
        Coordinate knee_angle_r: motion_type=rotational default_value=3.432333e-10 range=(-2.094395 0.1745329)
            clamped=false
        Coordinate knee_rotation_r: motion_type=rotational default_value=2.588678e-30 range=(-0.7853982 0.5235988)
            clamped=true locked=true
        Coordinate knee_adduction_r: motion_type=rotational default_value=-1.765715e-27 range=(-0.2617993 0.2617993)
            clamped=true locked=true
        Coordinate knee_tz_r: motion_type=translational default_value=0 range=(-0.02 0.02) clamped=true locked=true
        SpatialTransform:
          TransformAxis rotation1: coordinates=knee_angle_r axis=(0 0 1) LinearFunction(coefficients=1 0)
          TransformAxis rotation2: coordinates=knee_rotation_r axis=(0 1 0) LinearFunction(coefficients=1 0)
          TransformAxis rotation3: coordinates=knee_adduction_r axis=(1 0 0) LinearFunction(coefficients=1 0)
          TransformAxis translation1: coordinates=knee_angle_r axis=(1 0 0)
            MultiplierFunction: scale=0.99
              SimmSpline: x=(-2.0944 -1.74533 -1.39626 -1.0472 -0.698132 -0.349066 -0.174533 0.197344 0.337395 0.490178 1.52146 2.0944)
                  y=(-0.0032 0.00179 0.00411 0.0041 0.00212 -0.001 -0.0031 -0.005227 -0.005435 -0.005574 -0.005435 -0.00525)
          TransformAxis translation2: coordinates=knee_angle_r axis=(0 1 0)
            MultiplierFunction: scale=0.99
              SimmSpline: x=(-2.0944 -1.22173 -0.523599 -0.349066 -0.174533 0.159149 2.0944)
                  y=(-0.42 -0.402 -0.398 -0.397 -0.3966 -0.395264 -0.396)
          TransformAxis translation3: coordinates=knee_tz_r axis=(0 0 1) LinearFunction(coefficients=1 0)
      WrapCylinder CurveForPop_r: xyz_body_rotation=(2.96723 -0.279725 -1.47812) translation=(-0.0073 -0.074 -0.0034)
          quadrant=-y radius=0.03 length=0.1
      WrapCylinder GasLat_at_shank_r: xyz_body_rotation=(2.96723 -0.279725 -1.47812)
          translation=(-0.0074 -0.077 -0.0033) quadrant=-y radius=0.055 length=0.1
      WrapCylinder GasMed_at_shank_r: xyz_body_rotation=(2.96723 0.0279725 -1.47812)
          translation=(-0.0074 -0.074 -0.0033) quadrant=-y radius=0.055 length=0.1
      WrapCylinder GR_at_condyles_r: xyz_body_rotation=(0 -0.4 0) translation=(-0.003 -0.02 0) quadrant=all
          radius=0.036 length=0.1
      WrapCylinder SM_at_condyles_r: xyz_body_rotation=(0 -0.1 0) translation=(-0.001 -0.02 0) quadrant=all
          radius=0.0352 length=0.1
      WrapCylinder ST_at_condyles_r: xyz_body_rotation=(0 -0.2 0) translation=(-0.002 -0.0205 0) quadrant=all
          radius=0.0425 length=0.1
      WrapCylinder BF_at_gastroc_r: translation=(-0.058 -0.06 0) quadrant=y radius=0.03 length=0.15
    Body patella_r: mass=0.0862 mass_center=(0.0018 0.0264 0) inertia_xx=1.6e-5 inertia_yy=7.4e-5 inertia_zz=7.4e-5
        meshes=patella_r.vtp
      CustomJoint tib_pat_r: parent_body=tibia_r location_in_parent=(0 0 0) location=(0 0 0)
        Coordinate knee_angle_pat_r: motion_type=rotational default_value=0.1678309 range=(-2.094 10) clamped=true
        SpatialTransform: axes_held_at_zero=(rotation2 rotation3 translation3)
          TransformAxis rotation1: coordinates=knee_angle_pat_r axis=(0 0 1)
            SimmSpline: x=(-2.0944 -1.99997 -1.45752 -0.526391 0.0279253 0.174533)
                y=(0.308051 0.308051 0.306305 0.270177 -0.037001 -0.279951)
          TransformAxis translation1: coordinates=knee_angle_pat_r axis=(1 0 0)
            MultiplierFunction: scale=0.99
              SimmSpline: x=(-2.0944 -1.39626 -1.0472 -0.698132 -0.349066 -0.174533 0 0.00017453 0.00034907 0.0872665 2.0944)
                  y=(0.0173 0.0324 0.0381 0.043 0.0469 0.0484 0.0496 0.0496 0.0496 0.0496 0.0496)
          TransformAxis translation2: coordinates=knee_angle_pat_r axis=(0 1 0)
            MultiplierFunction: scale=0.99
              SimmSpline: x=(-2.0944 -1.5708 -1.39626 -1.0472 -0.698132 -0.349066 -0.174533 0 0.00017453 0.00034907 0.0872665 2.0944)
                  y=(-0.0219 -0.0202 -0.02 -0.0204 -0.0211 -0.0219 -0.0223 -0.0227 -0.0227 -0.0227 -0.0227 -0.0227)
    Body talus_r: mass=0.08128417 mass_center=(0.0139331 -0.00637782 -0.00622932) inertia_xx=0.001 inertia_yy=0.001
        inertia_zz=0.001 meshes=(.\Geometry\talus_r.stl .\Geometry\talus_cartilage_r.stl)
      CustomJoint Ankle_r: parent_body=tibia_r location_in_parent=(0 -0.415 0) location=(0 0 0)
        Coordinate ankle_pfdf_r: motion_type=rotational default_value=0 range=(-0.8726646 0.349066) clamped=true
        SpatialTransform: axes_held_at_zero=(rotation3 translation1 translation2 translation3)
          TransformAxis rotation1: coordinates=ankle_pfdf_r axis=(0 0 0.9902681)
            MultiplierFunction: scale=1
              SimmSpline: x=(-1 1) y=(-1 1)
          TransformAxis rotation2: coordinates=ankle_pfdf_r axis=(0.9510565 0 0)
            MultiplierFunction: scale=1
              SimmSpline: x=(-1 0 1) y=(-0.12222 0 0.24032)
    Body calcn_r: mass=0.289923 mass_center=(-0.0183999 -0.0127205 0.00168919) inertia_xx=0.001 inertia_yy=0.001
        inertia_zz=0.001 meshes=.\Geometry\calcaneus_r.vtp
      CustomJoint Subtalar_r: parent_body=talus_r location_in_parent=(0.01034703 -0.03163033 0.001346475)
          location=(0 0 0)
        Coordinate subtalar_inev_r: motion_type=rotational default_value=0 range=(-0.6108652 0.2094395) clamped=true
        SpatialTransform: axes_held_at_zero=(rotation2 rotation3 translation1 translation2 translation3)
          TransformAxis rotation1: coordinates=subtalar_inev_r axis=(-0.632764 -0.5888661 0.5028383)
              LinearFunction(coefficients=1 0)
    Body midfoot_r: mass=0.1398882 mass_center=(0.0136264 -0.00541573 -0.00226789) inertia_xx=0.001 inertia_yy=0.001
        inertia_zz=0.001 meshes=.\Geometry\midfoot_r.stl
      CustomJoint Chopart_r: parent_body=calcn_r location_in_parent=(0.02215092 0.005630519 -0.000938104)
          location=(0 0 0)
        Coordinate chopart_obl_r: motion_type=rotational default_value=0 range=(-0.174533 0.0523599) clamped=true
        Coordinate chopart_antpos_r: motion_type=rotational default_value=0 range=(-0.0698132 0.0698132) clamped=true
        SpatialTransform: axes_held_at_zero=(rotation3 translation1 translation2 translation3)
          TransformAxis rotation1: coordinates=chopart_obl_r axis=(-0.7099002 0.08849488 -0.6987205)
              LinearFunction(coefficients=1 0)
          TransformAxis rotation2: coordinates=chopart_antpos_r axis=(0.6814292 0.337078 -0.6496404)
              LinearFunction(coefficients=1 0)
      WrapCylinder foot_arc_r: xyz_body_rotation=(0.43633 0 1.57) translation=(-0.0074 -0.06 -0.03) quadrant=x
          radius=0.05 length=0.07
    Body metatarsal_thumb_r: mass=0.2361871 mass_center=(0.030362 -0.00692578 -0.000413788) inertia_xx=0.001
        inertia_yy=0.001 inertia_zz=0.001 meshes=.\Geometry\metatarsal_thumb_r2.stl
      CustomJoint Tarsometatarsal_thumb_r: parent_body=midfoot_r location_in_parent=(0 0 0) location=(0 0 0)
        Coordinate thumb_tarsometatarsal_f_r: motion_type=rotational default_value=0 range=(-0.0698132 0.0698132)
            clamped=true
        Coordinate thumb_tarsometatarsal_a_r: motion_type=rotational default_value=0 range=(-0.0698132 0.0698132)
            clamped=true
        SpatialTransform: axes_held_at_zero=(rotation3 translation1 translation2 translation3)
          TransformAxis rotation1: coordinates=thumb_tarsometatarsal_f_r axis=(-0.7099002 0.08849488 -0.6987205)
              LinearFunction(coefficients=1 0)
          TransformAxis rotation2: coordinates=thumb_tarsometatarsal_a_r axis=(-0.7560945 -0.3167572 0.5727006)
              LinearFunction(coefficients=1 0)
    Body metatarsal_index_r: mass=0.2361871 mass_center=(0.030362 -0.00692578 -0.000413788) inertia_xx=0.001
        inertia_yy=0.001 inertia_zz=0.001 meshes=.\Geometry\metatarsal_index_r2.stl
      CustomJoint Tarsometatarsal_index_r: parent_body=midfoot_r location_in_parent=(0 0 0) location=(0 0 0)
        Coordinate index_tarsometatarsal_f_r: motion_type=rotational default_value=0 range=(-0.0698132 0.0698132)
            clamped=true
        Coordinate index_tarsometatarsal_a_r: motion_type=rotational default_value=0 range=(-0.0698132 0.0698132)
            clamped=true
        SpatialTransform: axes_held_at_zero=(rotation3 translation1 translation2 translation3)
          TransformAxis rotation1: coordinates=index_tarsometatarsal_f_r axis=(-0.7099002 0.08849488 -0.6987205)
              LinearFunction(coefficients=1 0)
          TransformAxis rotation2: coordinates=index_tarsometatarsal_a_r axis=(-0.7560945 -0.3167572 0.5727006)
              LinearFunction(coefficients=1 0)
    Body metatarsal_middle_r: mass=0.2361871 mass_center=(0.030362 -0.00692578 -0.000413788) inertia_xx=0.001
        inertia_yy=0.001 inertia_zz=0.001 meshes=.\Geometry\metatarsal_middle_r2.stl
      CustomJoint Tarsometatarsal_middle_r: parent_body=midfoot_r location_in_parent=(0 0 0) location=(0 0 0)
        Coordinate middle_tarsometatarsal_f_r: motion_type=rotational default_value=0 range=(-0.122174 0.122174)
            clamped=true
        Coordinate middle_tarsometatarsal_a_r: motion_type=rotational default_value=0 range=(-0.122174 0.122174)
            clamped=true
        SpatialTransform: axes_held_at_zero=(rotation3 translation1 translation2 translation3)
          TransformAxis rotation1: coordinates=middle_tarsometatarsal_f_r axis=(-0.7099002 0.08849488 -0.6987205)
              LinearFunction(coefficients=1 0)
          TransformAxis rotation2: coordinates=middle_tarsometatarsal_a_r axis=(-0.7560945 -0.3167572 0.5727006)
              LinearFunction(coefficients=1 0)
    Body metatarsal_ring_r: mass=0.2361871 mass_center=(0.030362 -0.00692578 -0.000413788) inertia_xx=0.001
        inertia_yy=0.001 inertia_zz=0.001 meshes=.\Geometry\metatarsal_ring_r2.stl
      CustomJoint Tarsometatarsal_ring_r: parent_body=midfoot_r location_in_parent=(0 0 0) location=(0 0 0)
        Coordinate ring_tarsometatarsal_f_r: motion_type=rotational default_value=0 range=(-0.226893 0.226893)
            clamped=true
        Coordinate ring_tarsometatarsal_a_r: motion_type=rotational default_value=0 range=(-0.226893 0.226893)
            clamped=true
        SpatialTransform: axes_held_at_zero=(rotation3 translation1 translation2 translation3)
          TransformAxis rotation1: coordinates=ring_tarsometatarsal_f_r axis=(-0.7099002 0.08849488 -0.6987205)
              LinearFunction(coefficients=1 0)
          TransformAxis rotation2: coordinates=ring_tarsometatarsal_a_r axis=(-0.7560945 -0.3167572 0.5727006)
              LinearFunction(coefficients=1 0)
    Body metatarsal_tiny_r: mass=0.2361871 mass_center=(0.030362 -0.00692578 -0.000413788) inertia_xx=0.001
        inertia_yy=0.001 inertia_zz=0.001 meshes=.\Geometry\metatarsal_tiny_r2.stl
      CustomJoint Tarsometatarsal_tiny_r: parent_body=midfoot_r location_in_parent=(0 0 0) location=(0 0 0)
        Coordinate tiny_tarsometatarsal_f_r: motion_type=rotational default_value=0 range=(-0.15708 0.15708)
            clamped=true
        Coordinate tiny_tarsometatarsal_a_r: motion_type=rotational default_value=0 range=(-0.15708 0.15708)
            clamped=true
        SpatialTransform: axes_held_at_zero=(rotation3 translation1 translation2 translation3)
          TransformAxis rotation1: coordinates=tiny_tarsometatarsal_f_r axis=(-0.7099002 0.08849488 -0.6987205)
              LinearFunction(coefficients=1 0)
          TransformAxis rotation2: coordinates=tiny_tarsometatarsal_a_r axis=(-0.7560945 -0.3167572 0.5727006)
              LinearFunction(coefficients=1 0)
    Body toes_thumb_r: mass=0.1298378 mass_center=(0.03 -0.0135 -0.0266) inertia_xx=0.001 inertia_yy=0.001
        inertia_zz=0.001 meshes=.\Geometry\toes_thumb_r3.stl
      CustomJoint Metatarsophalangeal_thumb_r: parent_body=metatarsal_thumb_r location_in_parent=(0.087 -0.024 -0.025)
          location=(0 0 0)
        Coordinate thumb_metatarsophalangeal_pfdf_r: motion_type=rotational default_value=0 range=(-0.872665 1.570796)
            clamped=true
        Coordinate thumb_metatarsophalangeal_abad_r: motion_type=rotational default_value=0
            range=(-0.0872665 0.0872665) clamped=true
        SpatialTransform: axes_held_at_zero=(rotation3 translation1 translation2 translation3)
          TransformAxis rotation1: coordinates=thumb_metatarsophalangeal_pfdf_r axis=(-0.2829966 0.04242228 0.9581823)
              LinearFunction(coefficients=1 0)
          TransformAxis rotation2: coordinates=thumb_metatarsophalangeal_abad_r axis=(0.1961543 0.9804655 0.01452481)
              LinearFunction(coefficients=1 0)
    Body toes_index_r: mass=0.1298378 mass_center=(0.03 -0.01 -0.001) inertia_xx=0.001 inertia_yy=0.001
        inertia_zz=0.001 meshes=.\Geometry\toes_index_r3.stl
      CustomJoint Metatarsophalangeal_index_r: parent_body=metatarsal_index_r location_in_parent=(0.087 -0.024 0)
          location=(0 0 0)
        Coordinate index_metatarsophalangeal_pfdf_r: motion_type=rotational default_value=0 range=(-0.698132 0.698132)
            clamped=true
        Coordinate index_metatarsophalangeal_abad_r: motion_type=rotational default_value=0
            range=(-0.0349066 0.0349066) clamped=true
        SpatialTransform: axes_held_at_zero=(rotation3 translation1 translation2 translation3)
          TransformAxis rotation1: coordinates=index_metatarsophalangeal_pfdf_r axis=(-0.2829966 0.04242228 0.9581823)
              LinearFunction(coefficients=1 0)
          TransformAxis rotation2: coordinates=index_metatarsophalangeal_abad_r axis=(0.1961543 0.9804655 0.01452481)
              LinearFunction(coefficients=1 0)
    Body toes_middle_r: mass=0.1298378 mass_center=(0.03 -0.011 0.013) inertia_xx=0.001 inertia_yy=0.001
        inertia_zz=0.001 meshes=.\Geometry\toes_middle_r3.stl
      CustomJoint Metatarsophalangeal_middle_r: parent_body=metatarsal_middle_r location_in_parent=(0.085 -0.028 0.015)
          location=(0 0 0)
        Coordinate middle_metatarsophalangeal_pfdf_r: motion_type=rotational default_value=0 range=(-0.698132 0.698132)
            clamped=true
        Coordinate middle_metatarsophalangeal_abad_r: motion_type=rotational default_value=0
            range=(-0.0872665 0.0872665) clamped=true
        SpatialTransform: axes_held_at_zero=(rotation3 translation1 translation2 translation3)
          TransformAxis rotation1: coordinates=middle_metatarsophalangeal_pfdf_r axis=(-0.2829966 0.04242228 0.9581823)
              LinearFunction(coefficients=1 0)
          TransformAxis rotation2: coordinates=middle_metatarsophalangeal_abad_r axis=(0.1961543 0.9804655 0.01452481)
              LinearFunction(coefficients=1 0)
    Body toes_ring_r: mass=0.1298378 mass_center=(0.025 -0.011 0.025) inertia_xx=0.001 inertia_yy=0.001
        inertia_zz=0.001 meshes=.\Geometry\toes_ring_r3.stl
      CustomJoint Metatarsophalangeal_ring_r: parent_body=metatarsal_ring_r location_in_parent=(0.078 -0.024 0.026)
          location=(0 0 0)
        Coordinate ring_metatarsophalangeal_pfdf_r: motion_type=rotational default_value=0 range=(-0.698132 0.698132)
            clamped=true
        Coordinate ring_metatarsophalangeal_abad_r: motion_type=rotational default_value=0 range=(-0.0872665 0.0872665)
            clamped=true
        SpatialTransform: axes_held_at_zero=(rotation3 translation1 translation2 translation3)
          TransformAxis rotation1: coordinates=ring_metatarsophalangeal_pfdf_r axis=(-0.2829966 0.04242228 0.9581823)
              LinearFunction(coefficients=1 0)
          TransformAxis rotation2: coordinates=ring_metatarsophalangeal_abad_r axis=(0.1961543 0.9804655 0.01452481)
              LinearFunction(coefficients=1 0)
    Body toes_tiny_r: mass=0.1298378 mass_center=(0.001 -0.01 0.04) inertia_xx=0.001 inertia_yy=0.001 inertia_zz=0.001
        meshes=.\Geometry\toes_tiny_r3.stl
      CustomJoint Metatarsophalangeal_tiny_r: parent_body=metatarsal_tiny_r location_in_parent=(0.0665 -0.024 0.04)
          location=(0 0 0)
        Coordinate tiny_metatarsophalangeal_pfdf_r: motion_type=rotational default_value=0 range=(-0.698132 0.698132)
            clamped=true
        Coordinate tiny_metatarsophalangeal_abad_r: motion_type=rotational default_value=0 range=(-0.0872665 0.0872665)
            clamped=true
        SpatialTransform: axes_held_at_zero=(rotation3 translation1 translation2 translation3)
          TransformAxis rotation1: coordinates=tiny_metatarsophalangeal_pfdf_r axis=(-0.2829966 0.04242228 0.9581823)
              LinearFunction(coefficients=1 0)
          TransformAxis rotation2: coordinates=tiny_metatarsophalangeal_abad_r axis=(0.1961543 0.9804655 0.01452481)
              LinearFunction(coefficients=1 0)
    Body femur_l: mass=9.3014 mass_center=(0 -0.17 0) inertia_xx=0.1339 inertia_yy=0.0351 inertia_zz=0.1412
        meshes=(l_femur.vtp .\Geometry\femur_cartilage_lat_l.obj .\Geometry\femur_cartilage_med_l.obj)
      CustomJoint hip_l: parent_body=pelvis location_in_parent=(-0.069993 -0.065439 -0.082665) location=(0 0 0)
        Coordinate hip_flexion_l: motion_type=rotational default_value=0 range=(-2.094395 2.094395) clamped=true
        Coordinate hip_adduction_l: motion_type=rotational default_value=0 range=(-2.094395 2.094395) clamped=true
        Coordinate hip_rotation_l: motion_type=rotational default_value=0 range=(-2.094395 2.094395) clamped=true
        SpatialTransform: axes_held_at_zero=(translation1 translation2 translation3)
          TransformAxis rotation1: coordinates=hip_flexion_l axis=(0 0 1) LinearFunction(coefficients=1 0)
          TransformAxis rotation2: coordinates=hip_adduction_l axis=(-1 0 0) LinearFunction(coefficients=1 0)
          TransformAxis rotation3: coordinates=hip_rotation_l axis=(0 -1 0) LinearFunction(coefficients=1 0)
      WrapCylinder Gastroc_at_condyles_l: translation=(0.005 -0.41 0) quadrant=all radius=0.025 length=0.1
      WrapCylinder KnExt_at_fem_l: xyz_body_rotation=(0.0623366 -0.0507601 0)
          translation=(0.00358828 -0.402732 -0.00209111) quadrant=all radius=0.025 length=0.1
      WrapCylinder AB_at_femshaft_l: xyz_body_rotation=(-1.66157 -0.186644 0)
          translation=(0.0146434 -0.112595 -0.023365) quadrant=all radius=0.0165 length=0.07
      WrapCylinder AL_at_femshaft_l: xyz_body_rotation=(-1.77711 -0.136489 0)
          translation=(0.0307327 -0.231909 -0.0151137) quadrant=all radius=0.0201 length=0.1
      WrapCylinder AMprox_at_femshaft_l: xyz_body_rotation=(-1.61126 -0.18656 0)
          translation=(0.00518299 -0.0728948 -0.025403) quadrant=all radius=0.0211 length=0.07
      WrapCylinder AMmid_at_femshaft_l: xyz_body_rotation=(-1.61139 -0.13656 0)
          translation=(0.0230125 -0.160711 -0.0205842) quadrant=all radius=0.0214 length=0.12
      WrapCylinder AMdist_at_femshaft_l: xyz_body_rotation=(-1.71188 -0.186636 0)
          translation=(0.0316065 -0.260736 -0.0093646) quadrant=all radius=0.0218 length=0.2
      WrapCylinder AMisch_at_condyles_l: xyz_body_rotation=(-1.71115 0.463363 0)
          translation=(-0.0226511 -0.376831 0.00315437) quadrant=all radius=0.04 length=0.24
      WrapCylinder PECT_at_femshaft_l: xyz_body_rotation=(-1.81295 -0.276344 0)
          translation=(0.00608573 -0.0845029 -0.0304405) quadrant=all radius=0.015 length=0.05
    Body tibia_l: mass=3.7075 mass_center=(0 -0.1867 0) inertia_xx=0.0504 inertia_yy=0.0051 inertia_zz=0.0511
        meshes=(l_tibia.vtp l_fibula.vtp .\Geometry\med_meniscus_l.obj .\Geometry\lat_meniscus_l.obj)
      CustomJoint knee_l: parent_body=femur_l location_in_parent=(0 0 0) location=(0 0 0)
        Coordinate knee_angle_l: motion_type=rotational default_value=3.432317e-10 range=(-2.094395 0.1745329)
            clamped=true
        Coordinate knee_rotation_l: motion_type=rotational default_value=0 range=(-0.7853982 0.5235988) clamped=false
            locked=true
        Coordinate knee_adduction_l: motion_type=rotational default_value=0 range=(-0.2617994 0.2617994) clamped=false
            locked=true
        Coordinate knee_tz_l: motion_type=translational default_value=0 range=(-0.02 0.02) clamped=false locked=true
        SpatialTransform:
          TransformAxis rotation1: coordinates=knee_angle_l axis=(0 0 1) LinearFunction(coefficients=1 0)
          TransformAxis rotation2: coordinates=knee_rotation_l axis=(0 -1 0) LinearFunction(coefficients=1 0)
          TransformAxis rotation3: coordinates=knee_adduction_l axis=(-1 0 0) LinearFunction(coefficients=1 0)
          TransformAxis translation1: coordinates=knee_angle_l axis=(1 0 0)
            MultiplierFunction: scale=0.99
              SimmSpline: x=(-2.0944 -1.74533 -1.39626 -1.0472 -0.698132 -0.349066 -0.174533 0.197344 0.337395 0.490178 1.52146 2.0944)
                  y=(-0.0032 0.00179 0.00411 0.0041 0.00212 -0.001 -0.0031 -0.005227 -0.005435 -0.005574 -0.005435 -0.00525)
          TransformAxis translation2: coordinates=knee_angle_l axis=(0 1 0)
            MultiplierFunction: scale=0.99
              SimmSpline: x=(-2.0944 -1.22173 -0.523599 -0.349066 -0.174533 0.159149 2.0944)
                  y=(-0.4226 -0.4082 -0.399 -0.3976 -0.3966 -0.395264 -0.396)
          TransformAxis translation3: coordinates=knee_tz_l axis=(0 0 1) LinearFunction(coefficients=1 0)
      WrapCylinder CurveForPop_l: xyz_body_rotation=(-2.96723 0.279725 -1.47812) translation=(-0.0073 -0.074 0.0034)
          quadrant=-y radius=0.03 length=0.1
      WrapCylinder GasLat_at_shank_l: xyz_body_rotation=(-2.96723 0.279725 -1.47812)
          translation=(-0.0074 -0.074 0.0033) quadrant=-y radius=0.055 length=0.1
      WrapCylinder GasMed_at_shank_l: xyz_body_rotation=(-2.96723 -0.0279725 -1.47812)
          translation=(-0.0074 -0.074 0.0033) quadrant=-y radius=0.055 length=0.1
      WrapCylinder GR_at_condyles_l: xyz_body_rotation=(0 0.4 0) translation=(-0.003 -0.02 0) quadrant=all radius=0.036
          length=0.1
      WrapCylinder SM_at_condyles_l: xyz_body_rotation=(0 0.1 0) translation=(-0.001 -0.02 0) quadrant=all
          radius=0.0352 length=0.1
      WrapCylinder ST_at_condyles_l: xyz_body_rotation=(0 0.2 0) translation=(-0.002 -0.0205 0) quadrant=all
          radius=0.0425 length=0.1
      WrapCylinder BF_at_gastroc_l: translation=(-0.058 -0.06 0) quadrant=all radius=0.03 length=0.15
    Body patella_l: mass=0.0862 mass_center=(0.0018 0.0264 0) inertia_xx=1.6e-5 inertia_yy=7.4e-5 inertia_zz=7.4e-5
        meshes=patella_l.vtp
      CustomJoint tib_pat_l: parent_body=tibia_l location_in_parent=(0 0 0) location=(0 0 0)
        Coordinate knee_angle_pat_l: motion_type=rotational default_value=0.1745329 range=(-2.094 10) clamped=true
        SpatialTransform: axes_held_at_zero=(rotation2 rotation3 translation3)
          TransformAxis rotation1: coordinates=knee_angle_pat_l axis=(0 0 1)
            SimmSpline: x=(-2.0944 -1.99997 -1.45752 -0.526391 0.0279253 0.174533)
                y=(0.308051 0.308051 0.306305 0.270177 -0.037001 -0.279951)
          TransformAxis translation1: coordinates=knee_angle_pat_l axis=(1 0 0)
            MultiplierFunction: scale=0.99
              SimmSpline: x=(-2.0944 -1.39626 -1.0472 -0.698132 -0.349066 -0.174533 0 0.00017453 0.00034907 0.0872665 2.0944)
                  y=(0.0173 0.0324 0.0381 0.043 0.0469 0.0484 0.0496 0.0496 0.0496 0.0496 0.0496)
          TransformAxis translation2: coordinates=knee_angle_pat_l axis=(0 1 0)
            MultiplierFunction: scale=0.99
              SimmSpline: x=(-2.0944 -1.5708 -1.39626 -1.0472 -0.698132 -0.349066 -0.174533 0 0.00017453 0.00034907 0.0872665 2.0944)
                  y=(-0.0219 -0.0202 -0.02 -0.0204 -0.0211 -0.0219 -0.0223 -0.0227 -0.0227 -0.0227 -0.0227 -0.0227)
    Body talus_l: mass=0.08128417 mass_center=(0.0139331 -0.00637782 0.00622932) inertia_xx=0.001 inertia_yy=0.001
        inertia_zz=0.001 meshes=.\Geometry\talus_l.stl
      CustomJoint Ankle_l: parent_body=tibia_l location_in_parent=(0 -0.415 0) location=(0 0 0)
        Coordinate ankle_pfdf_l: motion_type=rotational default_value=0 range=(-0.8726646 0.349066) clamped=true
        SpatialTransform: axes_held_at_zero=(rotation3 translation1 translation2 translation3)
          TransformAxis rotation1: coordinates=ankle_pfdf_l axis=(0 0 0.9587762) LinearFunction(coefficients=1 0)
          TransformAxis rotation2: coordinates=ankle_pfdf_l axis=(1 0 0)
            MultiplierFunction: scale=1
              SimmSpline: x=(-1 0 1) y=(-0.12222 0 0.24032)
    Body calcn_l: mass=0.289923 mass_center=(-0.0183999 -0.0127205 -0.00168919) inertia_xx=0.001 inertia_yy=0.001
        inertia_zz=0.001 meshes=.\Geometry\calcaneus_l.vtp
      CustomJoint Subtalar_l: parent_body=talus_l location_in_parent=(0.01034703 -0.03163033 -0.001346475)
          location=(0 0 0)
        Coordinate subtalar_inev_l: motion_type=rotational default_value=0 range=(-0.6108652 0.2094395) clamped=true
        SpatialTransform: axes_held_at_zero=(rotation2 rotation3 translation1 translation2 translation3)
          TransformAxis rotation1: coordinates=subtalar_inev_l axis=(0.632764 0.5888661 0.5028383)
              LinearFunction(coefficients=1 0)
    Body midfoot_l: mass=0.1398882 mass_center=(0.0136264 -0.00541573 0.00226789) inertia_xx=0.001 inertia_yy=0.001
        inertia_zz=0.001 meshes=.\Geometry\midfoot_l.stl
      CustomJoint Chopart_l: parent_body=calcn_l location_in_parent=(0.02215092 0.005630519 0.000938104)
          location=(0 0 0)
        Coordinate chopart_obl_l: motion_type=rotational default_value=0 range=(-0.174533 0.0523599) clamped=true
        Coordinate chopart_antpos_l: motion_type=rotational default_value=0 range=(-0.0698132 0.0698132) clamped=true
        SpatialTransform: axes_held_at_zero=(rotation3 translation1 translation2 translation3)
          TransformAxis rotation1: coordinates=chopart_obl_l axis=(0.7099002 -0.08849488 -0.6987205)
              LinearFunction(coefficients=1 0)
          TransformAxis rotation2: coordinates=chopart_antpos_l axis=(-0.6814292 -0.337078 -0.6496404)
              LinearFunction(coefficients=1 0)
      WrapCylinder foot_arc_l: xyz_body_rotation=(-0.43633 0 1.57) translation=(-0.0074 -0.06 0.03) quadrant=x
          radius=0.05 length=0.07
    Body metatarsal_thumb_l: mass=0.2361871 mass_center=(0.030362 -0.00692578 0.000413788) inertia_xx=0.001
        inertia_yy=0.001 inertia_zz=0.001 meshes=.\Geometry\metatarsal_thumb_l.stl
      CustomJoint Tarsometatarsal_thumb_l: parent_body=midfoot_l location_in_parent=(0 0 0) location=(0 0 0)
        Coordinate thumb_tarsometatarsal_f_l: motion_type=rotational default_value=0 range=(-0.0698132 0.0698132)
            clamped=true
        Coordinate thumb_tarsometatarsal_a_l: motion_type=rotational default_value=0 range=(-0.0698132 0.0698132)
            clamped=true
        SpatialTransform: axes_held_at_zero=(rotation3 translation1 translation2 translation3)
          TransformAxis rotation1: coordinates=thumb_tarsometatarsal_f_l axis=(0.7099002 -0.08849488 -0.6987205)
              LinearFunction(coefficients=1 0)
          TransformAxis rotation2: coordinates=thumb_tarsometatarsal_a_l axis=(0.7560945 0.3167572 0.5727006)
              LinearFunction(coefficients=1 0)
    Body metatarsal_index_l: mass=0.2361871 mass_center=(0.030362 -0.00692578 -0.000413788) inertia_xx=0.001
        inertia_yy=0.001 inertia_zz=0.001 meshes=.\Geometry\metatarsal_index_l.stl
      CustomJoint Tarsometatarsal_index_l: parent_body=midfoot_l location_in_parent=(0 0 0) location=(0 0 0)
        Coordinate index_tarsometatarsal_f_l: motion_type=rotational default_value=0 range=(-0.0698132 0.0698132)
            clamped=true
        Coordinate index_tarsometatarsal_a_l: motion_type=rotational default_value=0 range=(-0.0698132 0.0698132)
            clamped=true
        SpatialTransform: axes_held_at_zero=(rotation3 translation1 translation2 translation3)
          TransformAxis rotation1: coordinates=index_tarsometatarsal_f_l axis=(0.7099002 -0.08849488 -0.6987205)
              LinearFunction(coefficients=1 0)
          TransformAxis rotation2: coordinates=index_tarsometatarsal_a_l axis=(0.7560945 0.3167572 0.5727006)
              LinearFunction(coefficients=1 0)
    Body metatarsal_middle_l: mass=0.2361871 mass_center=(0.030362 -0.00692578 -0.000413788) inertia_xx=0.001
        inertia_yy=0.001 inertia_zz=0.001 meshes=.\Geometry\metatarsal_middle_l.stl
      CustomJoint Tarsometatarsal_middle_l: parent_body=midfoot_l location_in_parent=(0 0 0) location=(0 0 0)
        Coordinate middle_tarsometatarsal_f_l: motion_type=rotational default_value=0 range=(-0.122174 0.122174)
            clamped=true
        Coordinate middle_tarsometatarsal_a_l: motion_type=rotational default_value=0 range=(-0.122174 0.122174)
            clamped=true
        SpatialTransform: axes_held_at_zero=(rotation3 translation1 translation2 translation3)
          TransformAxis rotation1: coordinates=middle_tarsometatarsal_f_l axis=(0.7099002 -0.08849488 -0.6987205)
              LinearFunction(coefficients=1 0)
          TransformAxis rotation2: coordinates=middle_tarsometatarsal_a_l axis=(0.7560945 0.3167572 0.5727006)
              LinearFunction(coefficients=1 0)
    Body metatarsal_ring_l: mass=0.2361871 mass_center=(0.030362 -0.00692578 0.000413788) inertia_xx=0.001
        inertia_yy=0.001 inertia_zz=0.001 meshes=.\Geometry\metatarsal_ring_l.stl
      CustomJoint Tarsometatarsal_ring_r: parent_body=midfoot_l location_in_parent=(0 0 0) location=(0 0 0)
        Coordinate ring_tarsometatarsal_f_l: motion_type=rotational default_value=0 range=(-0.226893 0.226893)
            clamped=true
        Coordinate ring_tarsometatarsal_a_l: motion_type=rotational default_value=0 range=(-0.226893 0.226893)
            clamped=true
        SpatialTransform: axes_held_at_zero=(rotation3 translation1 translation2 translation3)
          TransformAxis rotation1: coordinates=ring_tarsometatarsal_f_l axis=(0.7099002 -0.08849488 -0.6987205)
              LinearFunction(coefficients=1 0)
          TransformAxis rotation2: coordinates=ring_tarsometatarsal_a_l axis=(0.7560945 0.3167572 0.5727006)
              LinearFunction(coefficients=1 0)
    Body metatarsal_tiny_l: mass=0.2361871 mass_center=(0.030362 -0.00692578 0.000413788) inertia_xx=0.001
        inertia_yy=0.001 inertia_zz=0.001 meshes=.\Geometry\metatarsal_tiny_l.stl
      CustomJoint Tarsometatarsal_tiny_r: parent_body=midfoot_l location_in_parent=(0 0 0) location=(0 0 0)
        Coordinate tiny_tarsometatarsal_f_l: motion_type=rotational default_value=0 range=(-0.15708 0.15708)
            clamped=true
        Coordinate tiny_tarsometatarsal_a_l: motion_type=rotational default_value=0 range=(-0.15708 0.15708)
            clamped=true
        SpatialTransform: axes_held_at_zero=(rotation3 translation1 translation2 translation3)
          TransformAxis rotation1: coordinates=tiny_tarsometatarsal_f_l axis=(0.7099002 -0.08849488 -0.6987205)
              LinearFunction(coefficients=1 0)
          TransformAxis rotation2: coordinates=tiny_tarsometatarsal_a_l axis=(0.7560945 0.3167572 0.5727006)
              LinearFunction(coefficients=1 0)
    Body toes_thumb_l: mass=0.02813135 mass_center=(0.03 -0.015 0.022) inertia_xx=0.001 inertia_yy=0.001
        inertia_zz=0.001 meshes=.\Geometry\toes_thumb_l.stl
      CustomJoint Metatarsophalangeal_thumb_l: parent_body=metatarsal_thumb_l
          location_in_parent=(0.06048624 -0.01408783 0.002868271) location=(0 0 0)
        Coordinate thumb_metatarsophalangeal_pfdf_l: motion_type=rotational default_value=0 range=(-0.872665 1.570796)
            clamped=true
        Coordinate thumb_metatarsophalangeal_abad_l: motion_type=rotational default_value=0
            range=(-0.0872665 0.0872665) clamped=true
        SpatialTransform: axes_held_at_zero=(rotation3 translation1 translation2 translation3)
          TransformAxis rotation1: coordinates=thumb_metatarsophalangeal_pfdf_l axis=(0.2829966 -0.04242228 0.9581823)
              LinearFunction(coefficients=1 0)
          TransformAxis rotation2: coordinates=thumb_metatarsophalangeal_abad_l axis=(-0.1961543 -0.9804655 0.01452481)
              LinearFunction(coefficients=1 0)
      WrapCylinder metatarsal_thumb_shaft_l: xyz_body_rotation=(-1.5708 0.349066 0) translation=(0.035 -0.0135 0.022)
          quadrant=all radius=0.012 length=0.012
    Body toes_index_l: mass=0.02163967 mass_center=(0.03 -0.01 -0.005) inertia_xx=0.001 inertia_yy=0.001
        inertia_zz=0.001 meshes=.\Geometry\toes_index_l.stl
      CustomJoint Metatarsophalangeal_index_l: parent_body=metatarsal_index_l
          location_in_parent=(0.06048624 -0.01408783 0.002868271) location=(0 0 0)
        Coordinate index_metatarsophalangeal_pfdf_l: motion_type=rotational default_value=0 range=(-0.698132 0.698132)
            clamped=true
        Coordinate index_metatarsophalangeal_abad_l: motion_type=rotational default_value=0
            range=(-0.0349066 0.0349066) clamped=true
        SpatialTransform: axes_held_at_zero=(rotation3 translation1 translation2 translation3)
          TransformAxis rotation1: coordinates=index_metatarsophalangeal_pfdf_l axis=(0.2829966 -0.04242228 0.9581823)
              LinearFunction(coefficients=1 0)
          TransformAxis rotation2: coordinates=index_metatarsophalangeal_abad_l axis=(-0.1961543 -0.9804655 0.01452481)
              LinearFunction(coefficients=1 0)
      WrapCylinder metatarsal_index_shaft_l: xyz_body_rotation=(-1.5708 0.349066 0) translation=(0.035 -0.012 -0.005)
          quadrant=all radius=0.007 length=0.01
    Body toes_middle_l: mass=0.02166131 mass_center=(0.025 -0.012 -0.0176) inertia_xx=0.001 inertia_yy=0.001
        inertia_zz=0.001 meshes=.\Geometry\toes_middle_l.stl
      CustomJoint Metatarsophalangeal_middle_l: parent_body=metatarsal_middle_l
          location_in_parent=(0.06048624 -0.01408783 0.002868271) location=(0 0 0)
        Coordinate middle_metatarsophalangeal_pfdf_l: motion_type=rotational default_value=0 range=(-0.698132 0.698132)
            clamped=true
        Coordinate middle_metatarsophalangeal_abad_l: motion_type=rotational default_value=0
            range=(-0.0872665 0.0872665) clamped=true
        SpatialTransform: axes_held_at_zero=(rotation3 translation1 translation2 translation3)
          TransformAxis rotation1: coordinates=middle_metatarsophalangeal_pfdf_l axis=(0.2829966 -0.04242228 0.9581823)
              LinearFunction(coefficients=1 0)
          TransformAxis rotation2: coordinates=middle_metatarsophalangeal_abad_l
              axis=(-0.1961543 -0.9804655 0.01452481) LinearFunction(coefficients=1 0)
      WrapCylinder metatarsal_middle_shaft_l: xyz_body_rotation=(-1.5708 0.349066 0) translation=(0.031 -0.012 -0.0176)
          quadrant=all radius=0.007 length=0.01
    Body toes_ring_l: mass=0.02163967 mass_center=(0.03 -0.01 -0.032) inertia_xx=0.001 inertia_yy=0.001
        inertia_zz=0.001 meshes=.\Geometry\toes_ring_l.stl
      CustomJoint Metatarsophalangeal_ring_r: parent_body=metatarsal_ring_l
          location_in_parent=(0.06048624 -0.01408783 0.002868271) location=(0 0 0)
        Coordinate ring_metatarsophalangeal_pfdf_l: motion_type=rotational default_value=0 range=(-0.698132 0.698132)
            clamped=true
        Coordinate ring_metatarsophalangeal_abad_l: motion_type=rotational default_value=0 range=(-0.0872665 0.0872665)
            clamped=true
        SpatialTransform: axes_held_at_zero=(rotation3 translation1 translation2 translation3)
          TransformAxis rotation1: coordinates=ring_metatarsophalangeal_pfdf_l axis=(0.2829966 -0.04242228 0.9581823)
              LinearFunction(coefficients=1 0)
          TransformAxis rotation2: coordinates=ring_metatarsophalangeal_abad_l axis=(-0.1961543 -0.9804655 0.01452481)
              LinearFunction(coefficients=1 0)
      WrapCylinder metatarsal_ring_shaft_l: xyz_body_rotation=(-1.5708 0.349066 0) translation=(0.027 -0.01 -0.032)
          quadrant=all radius=0.007 length=0.01
    Body toes_tiny_l: mass=0.0151456 mass_center=(0.005 -0.008 -0.0485) inertia_xx=0.001 inertia_yy=0.001
        inertia_zz=0.001 meshes=.\Geometry\toes_tiny_l.stl
      CustomJoint Metatarsophalangeal_tiny_l: parent_body=metatarsal_tiny_l
          location_in_parent=(0.06048624 -0.01408783 0.002868271) location=(0 0 0)
        Coordinate tiny_metatarsophalangeal_pfdf_l: motion_type=rotational default_value=0 range=(-0.698132 0.698132)
            clamped=true
        Coordinate tiny_metatarsophalangeal_abad_l: motion_type=rotational default_value=0 range=(-0.0872665 0.0872665)
            clamped=true
        SpatialTransform: axes_held_at_zero=(rotation3 translation1 translation2 translation3)
          TransformAxis rotation1: coordinates=tiny_metatarsophalangeal_pfdf_l axis=(0.2829966 -0.04242228 0.9581823)
              LinearFunction(coefficients=1 0)
          TransformAxis rotation2: coordinates=tiny_metatarsophalangeal_abad_l axis=(-0.1961543 -0.9804655 0.01452481)
              LinearFunction(coefficients=1 0)
      WrapCylinder metatarsal_tiny_shaft_l: xyz_body_rotation=(-1.5708 0.349066 0) translation=(0.01 -0.008 -0.045)
          quadrant=all radius=0.0067 length=0.01
    Body torso: mass=34.2366 mass_center=(-0.03 0.32 0) inertia_xx=1.4745 inertia_yy=0.7555 inertia_zz=1.4314
        meshes=(hat_spine.vtp hat_jaw.vtp hat_skull.vtp hat_ribs.vtp)
      CustomJoint back: parent_body=pelvis location_in_parent=(-0.099693 0.080685 0) location=(0 0 0)
        Coordinate lumbar_extension: motion_type=rotational default_value=0 range=(-1.570796 1.570796) clamped=true
        Coordinate lumbar_bending: motion_type=rotational default_value=0 range=(-1.570796 1.570796) clamped=true
        Coordinate lumbar_rotation: motion_type=rotational default_value=0 range=(-1.570796 1.570796) clamped=true
        SpatialTransform: axes_held_at_zero=(translation1 translation2 translation3)
          TransformAxis rotation1: coordinates=lumbar_extension axis=(0 0 1) LinearFunction(coefficients=1 0)
          TransformAxis rotation2: coordinates=lumbar_bending axis=(1 0 0) LinearFunction(coefficients=1 0)
          TransformAxis rotation3: coordinates=lumbar_rotation axis=(0 1 0) LinearFunction(coefficients=1 0)
  ConstraintSet:
    CoordinateCouplerConstraint pat_angle_r: independent_coordinate_names=knee_angle_r
        dependent_coordinate_name=knee_angle_pat_r scale_factor=1
        coupled_coordinates_function=LinearFunction(coefficients=1 0)
    CoordinateCouplerConstraint pat_angle_l: independent_coordinate_names=knee_angle_l
        dependent_coordinate_name=knee_angle_pat_l scale_factor=1
        coupled_coordinates_function=LinearFunction(coefficients=1 0)
  ForceSet:
    Ligament aIlFL_r: resting_length=0.02126 pcsa_force=1032.846
      PathPoint IlliofemoralLigament_r_P1: pelvis (0 0 0)
      PathPoint IlliofemoralLigament_r_P2: femur_r (0 0 0)
      force_length_curve: SimmSpline: x=(-5 0.998 0.999 1 1.015 1.03 1.045 1.06 1.075 1.09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)
          y=(0 0 0 0 0.015 0.03 0.045 0.06 0.075 0.09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)
    Ligament PFL_r: resting_length=0.01518 pcsa_force=1620
      PathPoint PFL-P1: femur_r (-0.00833164 -0.404319 0.0331808)
      PathPoint PFL-P2: tibia_r (-0.0107709 -0.0574388 0.0310803)
      force_length_curve: SimmSpline: x=(0.99 0.995 1 1.005 1.01 1.015 1.02 1.025 1.03 1.04 1.09 1.14 1.19 1.24 1.29)
          y=(0 0 0 0.000208333 0.000833333 0.001875 0.00333333 0.00520833 0.0075 0.0133333 0.06 0.11 0.16 0.21 0.26)
    Ligament PFL_l: resting_length=0.01518 pcsa_force=1620
      PathPoint PFL-P1: femur_l (-0.00833164 -0.404319 -0.0331808)
      PathPoint PFL-P2: tibia_l (-0.0107709 -0.0574388 -0.0310803)
      force_length_curve: SimmSpline: x=(0.99 0.995 1 1.005 1.01 1.015 1.02 1.025 1.03 1.04 1.09 1.14 1.19 1.24 1.29)
          y=(0 0 0 0.000208333 0.000833333 0.001875 0.00333333 0.00520833 0.0075 0.0133333 0.06 0.11 0.16 0.21 0.26)
    Ligament TL_r: resting_length=0.00462 pcsa_force=1020
      PathPoint TL-P1: tibia_r (0.0165 -0.0297 -0.0033)
      PathPoint TL-P2: tibia_r (0.0130802 -0.0307569 -0.0168982)
      force_length_curve: SimmSpline: x=(0.99 0.995 1 1.005 1.01 1.015 1.02 1.025 1.03 1.04 1.09 1.14 1.19 1.24 1.29)
          y=(0 0 0 0.000208333 0.000833333 0.001875 0.00333333 0.00520833 0.0075 0.0133333 0.06 0.11 0.16 0.21 0.26)
    Ligament TL_l: resting_length=0.00462 pcsa_force=1020
      PathPoint TL-P1: tibia_l (0.0165 -0.0297 0.0033)
      PathPoint TL-P2: tibia_l (0.0130802 -0.0307569 0.0168982)
      force_length_curve: SimmSpline: x=(0.99 0.995 1 1.005 1.01 1.015 1.02 1.025 1.03 1.04 1.09 1.14 1.19 1.24 1.29)
          y=(0 0 0 0.000208333 0.000833333 0.001875 0.00333333 0.00520833 0.0075 0.0133333 0.06 0.11 0.16 0.21 0.26)
    Ligament MPFL_r: resting_length=0.018777 pcsa_force=1965
      PathPoint MPFL-P1: patella_r (-0.00351717 0.0260812 -0.0175555)
      ConditionalPathPoint default: femur_r (0.00919047 -0.394093 -0.0388126) range=(-2.0944 0.174533)
          coordinate=knee_angle_r
      PathPoint MPFL-P2: femur_r (-0.00444652 -0.397125 -0.03673)
      force_length_curve: SimmSpline: x=(0.99 0.995 1 1.005 1.01 1.015 1.02 1.025 1.03 1.04 1.09 1.14 1.19 1.24 1.29)
          y=(0 0 0 0.000208333 0.000833333 0.001875 0.00333333 0.00520833 0.0075 0.0133333 0.06 0.11 0.16 0.21 0.26)
    Ligament MPFL_l: resting_length=0.018777 pcsa_force=1965
      PathPoint MPFL-P1: patella_l (-0.00351717 0.0260812 0.0175555)
      ConditionalPathPoint default: femur_l (0.00919047 -0.394093 0.0388126) range=(-2.0944 0.174533)
          coordinate=knee_angle_r
      PathPoint MPFL-P2: femur_l (-0.00444652 -0.397125 0.03673)
      force_length_curve: SimmSpline: x=(0.99 0.995 1 1.005 1.01 1.015 1.02 1.025 1.03 1.04 1.09 1.14 1.19 1.24 1.29)
          y=(0 0 0 0.000208333 0.000833333 0.001875 0.00333333 0.00520833 0.0075 0.0133333 0.06 0.11 0.16 0.21 0.26)
    Ligament LPFL_r: resting_length=0.007656 pcsa_force=1159
      PathPoint LPFL-P1: patella_r (-0.00111966 0.020982 0.0201826)
      PathPoint LPFL-P2: femur_r (0.018125 -0.402468 0.031518)
      force_length_curve: SimmSpline: x=(0.99 0.995 1 1.005 1.01 1.015 1.02 1.025 1.03 1.04 1.09 1.14 1.19 1.24 1.29)
          y=(0 0 0 0.000208333 0.000833333 0.001875 0.00333333 0.00520833 0.0075 0.0133333 0.06 0.11 0.16 0.21 0.26)
    Ligament LPFL_l: resting_length=0.007656 pcsa_force=1159
      PathPoint LPFL-P1: patella_l (-0.00111966 0.020982 -0.0201826)
      PathPoint LPFL-P2: femur_l (0.018125 -0.402468 -0.031518)
      force_length_curve: SimmSpline: x=(0.99 0.995 1 1.005 1.01 1.015 1.02 1.025 1.03 1.04 1.09 1.14 1.19 1.24 1.29)
          y=(0 0 0 0.000208333 0.000833333 0.001875 0.00333333 0.00520833 0.0075 0.0133333 0.06 0.11 0.16 0.21 0.26)
    Ligament aFL_r: resting_length=0.0066 pcsa_force=1034
      PathPoint aFL-P1: tibia_r (0.01155 -0.05445 0.02442)
      PathPoint aFL-P2: tibia_r (0.00759 -0.07359 0.02805)
      force_length_curve: SimmSpline: x=(0.99 0.995 1 1.005 1.01 1.015 1.02 1.025 1.03 1.04 1.09 1.14 1.19 1.24 1.29)
          y=(0 0 0 0.000208333 0.000833333 0.001875 0.00333333 0.00520833 0.0075 0.0133333 0.06 0.11 0.16 0.21 0.26)
    Ligament aFL_l: resting_length=0.0066 pcsa_force=1034
      PathPoint aFL-P1: tibia_l (0.01155 -0.05445 -0.02442)
      PathPoint aFL-P2: tibia_l (0.00759 -0.07359 -0.02805)
      force_length_curve: SimmSpline: x=(0.99 0.995 1 1.005 1.01 1.015 1.02 1.025 1.03 1.04 1.09 1.14 1.19 1.24 1.29)
          y=(0 0 0 0.000208333 0.000833333 0.001875 0.00333333 0.00520833 0.0075 0.0133333 0.06 0.11 0.16 0.21 0.26)
    Ligament pFL_r: resting_length=0.0066 pcsa_force=644
      PathPoint pFL-P1: tibia_r (-0.021108 -0.0573071 0.0139594)
      PathPoint pFL-P2: tibia_r (-0.01815 -0.0722287 0.02673)
      force_length_curve: SimmSpline: x=(0.99 0.995 1 1.005 1.01 1.015 1.02 1.025 1.03 1.04 1.09 1.14 1.19 1.24 1.29)
          y=(0 0 0 0.000208333 0.000833333 0.001875 0.00333333 0.00520833 0.0075 0.0133333 0.06 0.11 0.16 0.21 0.26)
    Ligament pFL_l: resting_length=0.0066 pcsa_force=644
      PathPoint pFL-P1: tibia_l (-0.021108 -0.0573071 -0.0139594)
      PathPoint pFL-P2: tibia_l (-0.01815 -0.0722287 -0.02673)
      force_length_curve: SimmSpline: x=(0.99 0.995 1 1.005 1.01 1.015 1.02 1.025 1.03 1.04 1.09 1.14 1.19 1.24 1.29)
          y=(0 0 0 0.000208333 0.000833333 0.001875 0.00333333 0.00520833 0.0075 0.0133333 0.06 0.11 0.16 0.21 0.26)
    Ligament aMFL_r: resting_length=0.00891 pcsa_force=810
      PathPoint aMFL-P1: femur_r (-0.00552083 -0.400465 -0.010093)
      PathPoint aMFL-P2: tibia_r (-0.00725422 -0.0321129 -0.000903596)
      force_length_curve: SimmSpline: x=(0.99 0.995 1 1.005 1.01 1.015 1.02 1.025 1.03 1.04 1.09 1.14 1.19 1.24 1.29)
          y=(0 0 0 0.000208333 0.000833333 0.001875 0.00333333 0.00520833 0.0075 0.0133333 0.06 0.11 0.16 0.21 0.26)
    Ligament aMFL_l: resting_length=0.00891 pcsa_force=810
      PathPoint aMFL-P1: femur_l (-0.00552083 -0.400465 0.010093)
      PathPoint aMFL-P2: tibia_l (-0.00725422 -0.0321129 0.000903596)
      force_length_curve: SimmSpline: x=(0.99 0.995 1 1.005 1.01 1.015 1.02 1.025 1.03 1.04 1.09 1.14 1.19 1.24 1.29)
          y=(0 0 0 0.000208333 0.000833333 0.001875 0.00333333 0.00520833 0.0075 0.0133333 0.06 0.11 0.16 0.21 0.26)
    Ligament pMFL_r: resting_length=0.01023 pcsa_force=936.2
      PathPoint pMFL-P1: femur_r (-0.0223796 -0.399363 -0.0190346)
      PathPoint pMFL-P2: tibia_r (-0.0160943 -0.0309759 0.00160705)
      force_length_curve: SimmSpline: x=(0.99 0.995 1 1.005 1.01 1.015 1.02 1.025 1.03 1.04 1.09 1.14 1.19 1.24 1.29)
          y=(0 0 0 0.000208333 0.000833333 0.001875 0.00333333 0.00520833 0.0075 0.0133333 0.06 0.11 0.16 0.21 0.26)
    Ligament pMFL_l: resting_length=0.01023 pcsa_force=936.2
      PathPoint pMFL-P1: femur_l (-0.0223796 -0.399363 0.0190346)
      PathPoint pMFL-P2: tibia_l (-0.0160943 -0.0309759 -0.00160705)
      force_length_curve: SimmSpline: x=(0.99 0.995 1 1.005 1.01 1.015 1.02 1.025 1.03 1.04 1.09 1.14 1.19 1.24 1.29)
          y=(0 0 0 0.000208333 0.000833333 0.001875 0.00333333 0.00520833 0.0075 0.0133333 0.06 0.11 0.16 0.21 0.26)
    Ligament CAPa_r: resting_length=0.01848 pcsa_force=1350
      PathPoint CAPa-P1: femur_r (-0.0240425 -0.403699 -0.0215905)
      PathPoint CAPa-P2: tibia_r (-0.0213771 -0.0505778 0.0171105)
      force_length_curve: SimmSpline: x=(0.99 0.995 1 1.005 1.01 1.015 1.02 1.025 1.03 1.04 1.09 1.14 1.19 1.24 1.29)
          y=(0 0 0 0.000208333 0.000833333 0.001875 0.00333333 0.00520833 0.0075 0.0133333 0.06 0.11 0.16 0.21 0.26)
    Ligament CAPa_l: resting_length=0.01848 pcsa_force=1350
      PathPoint CAPa-P1: femur_l (-0.0240425 -0.403699 0.0215905)
      PathPoint CAPa-P2: tibia_l (-0.0213771 -0.0505778 -0.0171105)
      force_length_curve: SimmSpline: x=(0.99 0.995 1 1.005 1.01 1.015 1.02 1.025 1.03 1.04 1.09 1.14 1.19 1.24 1.29)
          y=(0 0 0 0.000208333 0.000833333 0.001875 0.00333333 0.00520833 0.0075 0.0133333 0.06 0.11 0.16 0.21 0.26)
    Ligament CAPl_r: resting_length=0.01188 pcsa_force=2000
      PathPoint CAPl-P1: femur_r (-0.0231 -0.403798 0.0172942)
      PathPoint CAPl-P2: tibia_r (-0.0211208 -0.0471256 0.0171409)
      force_length_curve: SimmSpline: x=(0.99 0.995 1 1.005 1.01 1.015 1.02 1.025 1.03 1.04 1.09 1.14 1.19 1.24 1.29)
          y=(0 0 0 0.000208333 0.000833333 0.001875 0.00333333 0.00520833 0.0075 0.0133333 0.06 0.11 0.16 0.21 0.26)
    Ligament CAPl_l: resting_length=0.01188 pcsa_force=2000
      PathPoint CAPl-P1: femur_l (-0.0231 -0.403798 -0.0172942)
      PathPoint CAPl-P2: tibia_l (-0.0211208 -0.0471256 -0.0171409)
      force_length_curve: SimmSpline: x=(0.99 0.995 1 1.005 1.01 1.015 1.02 1.025 1.03 1.04 1.09 1.14 1.19 1.24 1.29)
          y=(0 0 0 0.000208333 0.000833333 0.001875 0.00333333 0.00520833 0.0075 0.0133333 0.06 0.11 0.16 0.21 0.26)
    Ligament CAPo_r: resting_length=0.0198 pcsa_force=1500
      PathPoint CAPo-P1: femur_r (-0.0235849 -0.402151 0.0178109)
      PathPoint CAPo-P2: tibia_r (-0.0199829 -0.0557931 -0.0213609)
      force_length_curve: SimmSpline: x=(0.99 0.995 1 1.005 1.01 1.015 1.02 1.025 1.03 1.04 1.09 1.14 1.19 1.24 1.29)
          y=(0 0 0 0.000208333 0.000833333 0.001875 0.00333333 0.00520833 0.0075 0.0133333 0.06 0.11 0.16 0.21 0.26)
    Ligament CAPo_l: resting_length=0.0198 pcsa_force=1500
      PathPoint CAPo-P1: femur_l (-0.0235849 -0.402151 -0.0178109)
      PathPoint CAPo-P2: tibia_l (-0.0199829 -0.0557931 0.0213609)
      force_length_curve: SimmSpline: x=(0.99 0.995 1 1.005 1.01 1.015 1.02 1.025 1.03 1.04 1.09 1.14 1.19 1.24 1.29)
          y=(0 0 0 0.000208333 0.000833333 0.001875 0.00333333 0.00520833 0.0075 0.0133333 0.06 0.11 0.16 0.21 0.26)
    Ligament CAPm_r: resting_length=0.01188 pcsa_force=2000
      PathPoint CAPm-P1: femur_r (-0.0239865 -0.403775 -0.0220125)
      PathPoint CAPm-P2: tibia_r (-0.0197648 -0.0477639 -0.0217336)
      force_length_curve: SimmSpline: x=(0.99 0.995 1 1.005 1.01 1.015 1.02 1.025 1.03 1.04 1.09 1.14 1.19 1.24 1.29)
          y=(0 0 0 0.000208333 0.000833333 0.001875 0.00333333 0.00520833 0.0075 0.0133333 0.06 0.11 0.16 0.21 0.26)
    Ligament CAPm_l: resting_length=0.01188 pcsa_force=2000
      PathPoint CAPm-P1: femur_l (-0.0239865 -0.403775 0.0220125)
      PathPoint CAPm-P2: tibia_l (-0.0197648 -0.0477639 0.0217336)
      force_length_curve: SimmSpline: x=(0.99 0.995 1 1.005 1.01 1.015 1.02 1.025 1.03 1.04 1.09 1.14 1.19 1.24 1.29)
          y=(0 0 0 0.000208333 0.000833333 0.001875 0.00333333 0.00520833 0.0075 0.0133333 0.06 0.11 0.16 0.21 0.26)
    Ligament aACL_r: resting_length=0.0313929 pcsa_force=1500
      PathPoint P1: tibia_r (0.016434 -0.029799 -0.000693)
      PathPoint P2: femur_r (-0.007128 -0.396396 0.004059)
      force_length_curve: SimmSpline: x=(-1 -0.5 -0.2 0 0.01 0.02 0.03 0.04 0.05 0.06 0.07 0.1 0.13 0.15 0.2 0.4 0.7 1)
          y=(0 0 0 0 0.00083333 0.00333333 0.0075 0.0133333 0.0208333 0.03 0.04 0.07 0.1 0.12 0.17 0.37 0.67 0.97)
    Ligament aACL_l: resting_length=0.0313929 pcsa_force=1500
      PathPoint P1: tibia_l (0.016434 -0.029799 0.000693)
      PathPoint P2: femur_l (-0.007128 -0.396396 -0.004059)
      force_length_curve: SimmSpline: x=(-1 -0.5 -0.2 0 0.01 0.02 0.03 0.04 0.05 0.06 0.07 0.1 0.13 0.15 0.2 0.4 0.7 1)
          y=(0 0 0 0 0.00083333 0.00333333 0.0075 0.0133333 0.0208333 0.03 0.04 0.07 0.1 0.12 0.17 0.37 0.67 0.97)
    Ligament pACL_r: resting_length=0.0242154 pcsa_force=1600
      PathPoint P1: tibia_r (0.002475 -0.032175 0)
      PathPoint P2: femur_r (-0.01485 -0.405702 0.0099)
      force_length_curve: SimmSpline: x=(-1 -0.5 -0.2 0 0.01 0.02 0.03 0.04 0.05 0.06 0.07 0.1 0.13 0.15 0.2 0.4 0.7 1)
          y=(0 0 0 0 0.00083333 0.00333333 0.0075 0.0133333 0.0208333 0.03 0.04 0.07 0.1 0.12 0.17 0.37 0.67 0.97)
    Ligament pACL_l: resting_length=0.0242154 pcsa_force=1600
      PathPoint P1: tibia_l (0.002475 -0.032175 0)
      PathPoint P2: femur_l (-0.01485 -0.405702 -0.0099)
      force_length_curve: SimmSpline: x=(-1 -0.5 -0.2 0 0.01 0.02 0.03 0.04 0.05 0.06 0.07 0.1 0.13 0.15 0.2 0.4 0.7 1)
          y=(0 0 0 0 0.00083333 0.00333333 0.0075 0.0133333 0.0208333 0.03 0.04 0.07 0.1 0.12 0.17 0.37 0.67 0.97)
    Ligament aPCL_r: resting_length=0.0331551 pcsa_force=2600
      PathPoint P1: tibia_r (-0.0202161 -0.0320787 0.00365703)
      PathPoint P2: femur_r (-0.00752499 -0.408299 -0.0108191)
      force_length_curve: SimmSpline: x=(-1 -0.5 -0.2 0 0.01 0.02 0.03 0.04 0.05 0.06 0.07 0.1 0.13 0.15 0.2 0.4 0.7 1)
          y=(0 0 0 0 0.00083333 0.00333333 0.0075 0.0133333 0.0208333 0.03 0.04 0.07 0.1 0.12 0.17 0.37 0.67 0.97)
    Ligament aPCL_l: resting_length=0.0331551 pcsa_force=2600
      PathPoint P1: tibia_l (-0.020295 -0.032769 -0.003267)
      PathPoint P2: femur_l (-0.008613 -0.409266 0.009207)
      force_length_curve: SimmSpline: x=(-1 -0.5 -0.2 0 0.01 0.02 0.03 0.04 0.05 0.06 0.07 0.1 0.13 0.15 0.2 0.4 0.7 1)
          y=(0 0 0 0 0.00083333 0.00333333 0.0075 0.0133333 0.0208333 0.03 0.04 0.07 0.1 0.12 0.17 0.37 0.67 0.97)
    Ligament pPCL_r: resting_length=0.0244926 pcsa_force=1900
      PathPoint P1: tibia_r (-0.014553 -0.031482 -0.004059)
      PathPoint P2: femur_r (-0.015741 -0.401643 -0.016137)
      force_length_curve: SimmSpline: x=(-1 -0.5 -0.2 0 0.01 0.02 0.03 0.04 0.05 0.06 0.07 0.1 0.13 0.15 0.2 0.4 0.7 1)
          y=(0 0 0 0 0.00083333 0.00333333 0.0075 0.0133333 0.0208333 0.03 0.04 0.07 0.1 0.12 0.17 0.37 0.67 0.97)
    Ligament pPCL_l: resting_length=0.0244926 pcsa_force=1900
      PathPoint P1: tibia_l (-0.014553 -0.031482 0.004059)
      PathPoint P2: femur_l (-0.015741 -0.401643 0.016137)
      force_length_curve: SimmSpline: x=(-1 -0.5 -0.2 0 0.01 0.02 0.03 0.04 0.05 0.06 0.07 0.1 0.13 0.15 0.2 0.4 0.7 1)
          y=(0 0 0 0 0.00083333 0.00333333 0.0075 0.0133333 0.0208333 0.03 0.04 0.07 0.1 0.12 0.17 0.37 0.67 0.97)
    Ligament LCL_r: resting_length=0.0542718 pcsa_force=2000
      PathPoint P1: tibia_r (-0.00699181 -0.0606619 0.0365201)
      PathPoint P2: femur_r (-0.009702 -0.396594 0.034155)
      force_length_curve: SimmSpline: x=(-1 -0.5 -0.2 0 0.01 0.02 0.03 0.04 0.05 0.06 0.07 0.1 0.13 0.15 0.2 0.4 0.7 1)
          y=(0 0 0 0 0.00083333 0.00333333 0.0075 0.0133333 0.0208333 0.03 0.04 0.07 0.1 0.12 0.17 0.37 0.67 0.97)
    Ligament LCL_l: resting_length=0.0542718 pcsa_force=2000
      PathPoint P1: tibia_l (-0.007029 -0.059994 -0.036927)
      PathPoint P2: femur_l (-0.009702 -0.396594 -0.034155)
      force_length_curve: SimmSpline: x=(-1 -0.5 -0.2 0 0.01 0.02 0.03 0.04 0.05 0.06 0.07 0.1 0.13 0.15 0.2 0.4 0.7 1)
          y=(0 0 0 0 0.00083333 0.00333333 0.0075 0.0133333 0.0208333 0.03 0.04 0.07 0.1 0.12 0.17 0.37 0.67 0.97)
    Ligament aMCL_r: resting_length=0.0701118 pcsa_force=2500
      PathPoint P1: tibia_r (0.00832382 -0.0794432 -0.02838)
      PathPoint P2: femur_r (-0.007326 -0.400356 -0.0363)
      force_length_curve: SimmSpline: x=(-1 -0.5 -0.2 0 0.01 0.02 0.03 0.04 0.05 0.06 0.07 0.1 0.13 0.15 0.2 0.4 0.7 1)
          y=(0 0 0 0 0.00083333 0.00333333 0.0075 0.0133333 0.0208333 0.03 0.04 0.07 0.1 0.12 0.17 0.37 0.67 0.97)
    Ligament aMCL_l: resting_length=0.0701118 pcsa_force=2500
      PathPoint P1: tibia_l (0.007623 -0.078804 0.027324)
      PathPoint P2: femur_l (-0.007326 -0.400356 0.03465)
      force_length_curve: SimmSpline: x=(-1 -0.5 -0.2 0 0.01 0.02 0.03 0.04 0.05 0.06 0.07 0.1 0.13 0.15 0.2 0.4 0.7 1)
          y=(0 0 0 0 0.00083333 0.00333333 0.0075 0.0133333 0.0208333 0.03 0.04 0.07 0.1 0.12 0.17 0.37 0.67 0.97)
    Ligament iMCL_r: resting_length=0.069597 pcsa_force=3000
      PathPoint P1: tibia_r (0.002475 -0.081774 -0.028809)
      PathPoint P2: femur_r (-0.013545 -0.402521 -0.0342458)
      force_length_curve: SimmSpline: x=(-1 -0.5 -0.2 0 0.01 0.02 0.03 0.04 0.05 0.06 0.07 0.1 0.13 0.15 0.2 0.4 0.7 1)
          y=(0 0 0 0 0.00083333 0.00333333 0.0075 0.0133333 0.0208333 0.03 0.04 0.07 0.1 0.12 0.17 0.37 0.67 0.97)
    Ligament iMCL_l: resting_length=0.069597 pcsa_force=3000
      PathPoint iMCL_r-P1: tibia_l (0.002475 -0.081774 0.028809)
      PathPoint P2: femur_l (-0.012573 -0.402138 0.033165)
      force_length_curve: SimmSpline: x=(-1 -0.5 -0.2 0 0.01 0.02 0.03 0.04 0.05 0.06 0.07 0.1 0.13 0.15 0.2 0.4 0.7 1)
          y=(0 0 0 0 0.00083333 0.00333333 0.0075 0.0133333 0.0208333 0.03 0.04 0.07 0.1 0.12 0.17 0.37 0.67 0.97)
    Ligament pMCL_r: resting_length=0.0853677 pcsa_force=2500
      PathPoint P1: tibia_r (0.002475 -0.09306 -0.026136)
      PathPoint P2: femur_r (-0.017622 -0.399564 -0.033165)
      force_length_curve: SimmSpline: x=(-1 -0.5 -0.2 0 0.01 0.02 0.03 0.04 0.05 0.06 0.07 0.1 0.13 0.15 0.2 0.4 0.7 1)
          y=(0 0 0 0 0.00083333 0.00333333 0.0075 0.0133333 0.0208333 0.03 0.04 0.07 0.1 0.12 0.17 0.37 0.67 0.97)
    Ligament pMCL_l: resting_length=0.0853677 pcsa_force=2500
      PathPoint P1: tibia_l (0.002475 -0.09306 0.026136)
      PathPoint P2: femur_l (-0.017622 -0.399564 0.033165)
      force_length_curve: SimmSpline: x=(-1 -0.5 -0.2 0 0.01 0.02 0.03 0.04 0.05 0.06 0.07 0.1 0.13 0.15 0.2 0.4 0.7 1)
          y=(0 0 0 0 0.00083333 0.00333333 0.0075 0.0133333 0.0208333 0.03 0.04 0.07 0.1 0.12 0.17 0.37 0.67 0.97)
    Ligament aDMCL_r: resting_length=0.0390456 pcsa_force=2000
      PathPoint P1: tibia_r (0.00482731 -0.0435587 -0.0352262)
      PathPoint P2: femur_r (-0.00720799 -0.39998 -0.03637)
      force_length_curve: SimmSpline: x=(-1 -0.5 -0.2 0 0.01 0.02 0.03 0.04 0.05 0.06 0.07 0.1 0.13 0.15 0.2 0.4 0.7 1)
          y=(0 0 0 0 0.00083333 0.00333333 0.0075 0.0133333 0.0208333 0.03 0.04 0.07 0.1 0.12 0.17 0.37 0.67 0.97)
    Ligament aDMCL_l: resting_length=0.0390456 pcsa_force=2000
      PathPoint P1: tibia_l (0.004653 -0.04356 0.03465)
      PathPoint P2: femur_l (-0.007326 -0.400356 0.03465)
      force_length_curve: SimmSpline: x=(-1 -0.5 -0.2 0 0.01 0.02 0.03 0.04 0.05 0.06 0.07 0.1 0.13 0.15 0.2 0.4 0.7 1)
          y=(0 0 0 0 0.00083333 0.00333333 0.0075 0.0133333 0.0208333 0.03 0.04 0.07 0.1 0.12 0.17 0.37 0.67 0.97)
    Ligament pDMCL_r: resting_length=0.0357291 pcsa_force=4500
      PathPoint P1: tibia_r (-0.00537009 -0.0429719 -0.0314771)
      PathPoint P2: femur_r (-0.017622 -0.399564 -0.033165)
      force_length_curve: SimmSpline: x=(-1 -0.5 -0.2 0 0.01 0.02 0.03 0.04 0.05 0.06 0.07 0.1 0.13 0.15 0.2 0.4 0.7 1)
          y=(0 0 0 0 0.00083333 0.00333333 0.0075 0.0133333 0.0208333 0.03 0.04 0.07 0.1 0.12 0.17 0.37 0.67 0.97)
    Ligament pDMCL_l: resting_length=0.0357291 pcsa_force=4500
      PathPoint P1: tibia_l (-0.00495 -0.04356 0.03465)
      PathPoint P2: femur_l (-0.017622 -0.399564 0.033165)
      force_length_curve: SimmSpline: x=(-1 -0.5 -0.2 0 0.01 0.02 0.03 0.04 0.05 0.06 0.07 0.1 0.13 0.15 0.2 0.4 0.7 1)
          y=(0 0 0 0 0.00083333 0.00333333 0.0075 0.0133333 0.0208333 0.03 0.04 0.07 0.1 0.12 0.17 0.37 0.67 0.97)
    Ligament cPT_r: resting_length=0.01584 pcsa_force=6000
      PathPoint cPT_f: patella_r (0 0 0)
      PathPoint cPT_t: tibia_r (0.0382087 -0.0713057 -0.000621357)
      force_length_curve: SimmSpline: x=(0.99 0.995 1 1.005 1.01 1.015 1.02 1.025 1.03 1.04 1.09 1.14 1.19 1.24 1.29)
          y=(0 0 0 0.000208333 0.000833333 0.001875 0.00333333 0.00520833 0.0075 0.0133333 0.06 0.11 0.16 0.21 0.26)
    Ligament cPT_l: resting_length=0.01584 pcsa_force=6000
      PathPoint cPT_f: patella_l (0 0 0)
      PathPoint cPT_t: tibia_l (0.0382087 -0.0713057 0.000621357)
      force_length_curve: SimmSpline: x=(0.99 0.995 1 1.005 1.01 1.015 1.02 1.025 1.03 1.04 1.09 1.14 1.19 1.24 1.29)
          y=(0 0 0 0.000208333 0.000833333 0.001875 0.00333333 0.00520833 0.0075 0.0133333 0.06 0.11 0.16 0.21 0.26)
    Ligament mPT_r: resting_length=0.01749 pcsa_force=6000
      PathPoint mPT_f: patella_r (0 0.00495 -0.00792)
      PathPoint mPT_t: tibia_r (0.0380738 -0.0713057 -0.00450767)
      force_length_curve: SimmSpline: x=(0.99 0.995 1 1.005 1.01 1.015 1.02 1.025 1.03 1.04 1.09 1.14 1.19 1.24 1.29)
          y=(0 0 0 0.000208333 0.000833333 0.001875 0.00333333 0.00520833 0.0075 0.0133333 0.06 0.11 0.16 0.21 0.26)
    Ligament mPT_l: resting_length=0.01749 pcsa_force=6000
      PathPoint mPT_f: patella_l (0 0.00495 0.00792)
      PathPoint mPT_t: tibia_l (0.0380738 -0.0713057 0.00450767)
      force_length_curve: SimmSpline: x=(0.99 0.995 1 1.005 1.01 1.015 1.02 1.025 1.03 1.04 1.09 1.14 1.19 1.24 1.29)
          y=(0 0 0 0.000208333 0.000833333 0.001875 0.00333333 0.00520833 0.0075 0.0133333 0.06 0.11 0.16 0.21 0.26)
    Ligament lPT_r: resting_length=0.01749 pcsa_force=6000
      PathPoint lPT_f: patella_r (0 0.00495 0.00792)
      PathPoint lPT_t: tibia_r (0.0380738 -0.0713057 0.00341237)
      force_length_curve: SimmSpline: x=(0.99 0.995 1 1.005 1.01 1.015 1.02 1.025 1.03 1.04 1.09 1.14 1.19 1.24 1.29)
          y=(0 0 0 0.000208333 0.000833333 0.001875 0.00333333 0.00520833 0.0075 0.0133333 0.06 0.11 0.16 0.21 0.26)
    Ligament lPT_l: resting_length=0.01749 pcsa_force=6000
      PathPoint lPT_f: patella_l (0 0.00495 -0.00792)
      PathPoint lPT_t: tibia_l (0.0380738 -0.0713057 -0.00341237)
      force_length_curve: SimmSpline: x=(0.99 0.995 1 1.005 1.01 1.015 1.02 1.025 1.03 1.04 1.09 1.14 1.19 1.24 1.29)
          y=(0 0 0 0.000208333 0.000833333 0.001875 0.00333333 0.00520833 0.0075 0.0133333 0.06 0.11 0.16 0.21 0.26)
    NonLinearLigament [values shared by the 132 below unless stated]: eta_a=70 alphaa_a=1.148 beta_a=2 ka_a=1000
        areaa_a=40 max_strain=0.45
    NonLinearLigament CAPmtp_r: resting_length=0.066 pcsa_force=6274.039
      PathPoint MtTransverProfund_r_P1: metatarsal_thumb_r (0.0755012 -0.0295004 -0.021845)
      PathPoint MtTransverProfund_r_P2: metatarsal_index_r (0.0816651 -0.0284413 -0.000933754)
      PathPoint MtTransverProfund_r_P3: metatarsal_middle_r (0.0774145 -0.0296557 0.0107754)
      PathPoint MtTransverProfund_r_P4: metatarsal_ring_r (0.0683727 -0.0312215 0.0234744)
      PathPoint MtTransverProfund_r_P5: metatarsal_tiny_r (0.0595995 -0.0333453 0.0366874)
    Millard2012EquilibriumMuscle [values shared by the 173 below unless stated]: fiber_damping=0.01
        default_activation=0.01 minimum_activation=0.01
      ActiveForceLengthCurve: min_norm_active_fiber_length=0.25 transition_norm_fiber_length=0.77
          max_norm_active_fiber_length=1.9 shallow_ascending_slope=0.75 minimum_value=0
      ForceVelocityCurve: concentric_slope_at_vmax=0 concentric_slope_near_vmax=0.25 isometric_slope=5
          eccentric_slope_at_vmax=0 eccentric_slope_near_vmax=0.15 max_eccentric_velocity_force_multiplier=1.4
      FiberForceLengthCurve: strain_at_zero_force=0 strain_at_one_norm_force=0.7
      TendonForceLengthCurve
    Millard2012EquilibriumMuscle CAPmtp_r_muscle: max_isometric_force=0 optimal_fiber_length=0.1031
        tendon_slack_length=0.03545029 pennation_angle_at_optimal=0.1147809 [radians] ignore_tendon_compliance=true
      PathPoint MtTransverProfund_r_P1: metatarsal_thumb_r (0.0755012 -0.0295004 -0.021845)
      PathPoint MtTransverProfund_r_P2: metatarsal_index_r (0.0816651 -0.0284413 -0.000933754)
      PathPoint MtTransverProfund_r_P3: metatarsal_middle_r (0.0774145 -0.0296557 0.0107754)
      PathPoint MtTransverProfund_r_P4: metatarsal_ring_r (0.0683727 -0.0312215 0.0234744)
      PathPoint MtTransverProfund_r_P5: metatarsal_tiny_r (0.0595995 -0.0333453 0.0366874)
    NonLinearLigament pTTL_r: resting_length=0.02 pcsa_force=39.1422
      PathPoint TibioTalarPost_r_P1: tibia_r (-0.00223578 -0.409222 -0.0203256)
      PathPoint TibioTalarPost_r_P2: talus_r (-0.0144299 -0.00976515 -0.0154393)
    Millard2012EquilibriumMuscle pTTL_r_muscle: max_isometric_force=0 optimal_fiber_length=0.1031
        tendon_slack_length=0.03545029 pennation_angle_at_optimal=0.1147809 ignore_tendon_compliance=true
      PathPoint TibioTalarPost_r_P1: tibia_r (-0.00223578 -0.409222 -0.0203256)
      PathPoint TibioTalarPost_r_P2: talus_r (-0.0144299 -0.00976515 -0.0154393)
    NonLinearLigament aTTL_r: resting_length=0.025 pcsa_force=19.56111
      PathPoint TibioTalarAnt_r_P1: tibia_r (0.011459 -0.410674 -0.0225584)
      PathPoint TibioTalarAnt_r_P2: talus_r (0.0314666 -0.00888865 -0.016316)
    Millard2012EquilibriumMuscle aTTL_r_muscle: max_isometric_force=0 optimal_fiber_length=0.1031
        tendon_slack_length=0.03545029 pennation_angle_at_optimal=0.1147809 ignore_tendon_compliance=true
      PathPoint TibioTalarAnt_r_P1: tibia_r (0.011459 -0.410674 -0.0225584)
      PathPoint TibioTalarAnt_r_P2: talus_r (0.0314666 -0.00888865 -0.016316)
    NonLinearLigament TCL_r: resting_length=0.031 pcsa_force=18.97472
      PathPoint TibioCalcaneal_r_P1: tibia_r (0.00167908 -0.409674 -0.0215768)
      PathPoint TibioCalcaneal_r_P2: calcn_r (-0.00264082 0.00710307 -0.02031)
    Millard2012EquilibriumMuscle TCL_r_muscle: max_isometric_force=0 optimal_fiber_length=0.1031
        tendon_slack_length=0.03545029 pennation_angle_at_optimal=0.1147809 ignore_tendon_compliance=true
      PathPoint TibioCalcaneal_r_P1: tibia_r (0.00167908 -0.409674 -0.0215768)
      PathPoint TibioCalcaneal_r_P2: calcn_r (-0.00264082 0.00710307 -0.02031)
    NonLinearLigament TNL_r: resting_length=0.04 pcsa_force=450
      PathPoint TibioNavicular_r_P1: tibia_r (0.00342368 -0.409868 -0.0220181)
      PathPoint TibioNavicular_r_P2: midfoot_r (0.005044 0.00961017 -0.0229182)
    Millard2012EquilibriumMuscle TNL_r_muscle: max_isometric_force=0 optimal_fiber_length=0.1031
        tendon_slack_length=0.03545029 pennation_angle_at_optimal=0.1147809 ignore_tendon_compliance=true
      PathPoint TibioNavicular_r_P1: tibia_r (0.00342368 -0.409868 -0.0220181)
      PathPoint TibioNavicular_r_P2: midfoot_r (0.005044 0.00961017 -0.0229182)
    NonLinearLigament pTFL_r: resting_length=0.031 pcsa_force=4.530965
      PathPoint TaloFibularPost_r_P1: tibia_r (-0.00118659 -0.411202 0.0225417)
      PathPoint TaloFibularPost_r_P2: talus_r (-0.0184543 -0.0131749 0.00397602)
    Millard2012EquilibriumMuscle pTFL_r_muscle: max_isometric_force=0 optimal_fiber_length=0.1031
        tendon_slack_length=0.03545029 pennation_angle_at_optimal=0.1147809 ignore_tendon_compliance=true
      PathPoint TaloFibularPost_r_P1: tibia_r (-0.00118659 -0.411202 0.0225417)
      PathPoint TaloFibularPost_r_P2: talus_r (-0.0184543 -0.0131749 0.00397602)
    NonLinearLigament aTFL_r: resting_length=0.029 pcsa_force=47.52764
      PathPoint TaloFibularAnt_r_P1: tibia_r (0.0074568 -0.412098 0.0214746)
      PathPoint TaloFibularAnt_r_P2: talus_r (0.0310623 -0.00540934 0.00622887)
    Millard2012EquilibriumMuscle aTFL_r_muscle: max_isometric_force=0 optimal_fiber_length=0.1031
        tendon_slack_length=0.03545029 pennation_angle_at_optimal=0.1147809 ignore_tendon_compliance=true
      PathPoint TaloFibularAnt_r_P1: tibia_r (0.0074568 -0.412098 0.0214746)
      PathPoint TaloFibularAnt_r_P2: talus_r (0.0310623 -0.00540934 0.00622887)
    NonLinearLigament CFL_r: resting_length=0.036 pcsa_force=10.12472
      PathPoint CalcaneoFibular_r_P1: tibia_r (0.00268358 -0.41337 0.0223599)
      PathPoint CalcaneoFibular_r_P2: calcn_r (-0.0204502 1.11258e-5 0.0151569)
    Millard2012EquilibriumMuscle CFL_r_muscle: max_isometric_force=0 optimal_fiber_length=0.1031
        tendon_slack_length=0.03545029 pennation_angle_at_optimal=0.1147809 ignore_tendon_compliance=true
      PathPoint CalcaneoFibular_r_P1: tibia_r (0.00268358 -0.41337 0.0223599)
      PathPoint CalcaneoFibular_r_P2: calcn_r (-0.0204502 1.11258e-5 0.0151569)
    NonLinearLigament PF_1_r: resting_length=0.1546 pcsa_force=62.74039
      PathPoint PlantarFascia1Ph_r_P1: calcn_r (-0.0275355 -0.0366238 -0.00232531)
      PathPoint PlantarFascia1Ph_r_P2: metatarsal_thumb_r (0.0802705 -0.0336952 -0.020014)
      PathPoint PlantarFascia1Ph_r_P3: toes_thumb_r (0.00597683 -0.00776819 0.00157947)
      PathWrap: wrap_object=foot_arc_r method=hybrid range=(1 2)
    Millard2012EquilibriumMuscle PF_1_r_muscle: max_isometric_force=0 optimal_fiber_length=0.1031
        tendon_slack_length=0.03545029 pennation_angle_at_optimal=0.1147809 ignore_tendon_compliance=true
      PathPoint PlantarFascia1Ph_r_P1: calcn_r (-0.0275355 -0.0366238 -0.00232531)
      PathPoint PlantarFascia1Ph_r_P2: metatarsal_thumb_r (0.0802705 -0.0336952 -0.020014)
      PathPoint PlantarFascia1Ph_r_P3: toes_thumb_r (0.00597683 -0.00776819 0.00157947)
      PathWrap: wrap_object=foot_arc_r method=hybrid range=(1 2)
    NonLinearLigament PF_2_r: resting_length=0.158 pcsa_force=62.74039
      PathPoint PlantarFascia2Ph_r_P1: calcn_r (-0.0275355 -0.0366238 -0.00232531)
      PathPoint PlantarFascia2Ph_r_P2: metatarsal_index_r (0.084208 -0.0295263 -0.00166878)
      PathPoint PlantarFascia2Ph_r_P3: toes_index_r (0.0135602 -0.00577563 0.000176651)
      PathWrap: wrap_object=foot_arc_r method=hybrid range=(1 -1)
    Millard2012EquilibriumMuscle PF_2_r_muscle: max_isometric_force=0 optimal_fiber_length=0.1031
        tendon_slack_length=0.03545029 pennation_angle_at_optimal=0.1147809 ignore_tendon_compliance=true
      PathPoint PlantarFascia2Ph_r_P1: calcn_r (-0.0275355 -0.0366238 -0.00232531)
      PathPoint PlantarFascia2Ph_r_P2: metatarsal_index_r (0.084208 -0.0295263 -0.00166878)
      PathPoint PlantarFascia2Ph_r_P3: toes_index_r (0.0135602 -0.00577563 0.000176651)
      PathWrap: wrap_object=foot_arc_r method=hybrid range=(1 -1)
    NonLinearLigament PF_3_r: resting_length=0.1529 pcsa_force=50.19231
      PathPoint PlantarFascia3Ph_r_P1: calcn_r (-0.0275355 -0.0366238 -0.00232531)
      PathPoint PlantarFascia3Ph_r_P2: metatarsal_middle_r (0.0800839 -0.0307669 0.0102765)
      PathPoint PlantarFascia3Ph_r_P3: toes_middle_r (0.0104088 -0.00266471 -0.000904626)
      PathWrap: wrap_object=foot_arc_r method=hybrid range=(1 2)
    Millard2012EquilibriumMuscle PF_3_r_muscle: max_isometric_force=0 optimal_fiber_length=0.1031
        tendon_slack_length=0.03545029 pennation_angle_at_optimal=0.1147809 ignore_tendon_compliance=true
      PathPoint PlantarFascia3Ph_r_P1: calcn_r (-0.0275355 -0.0366238 -0.00232531)
      PathPoint PlantarFascia3Ph_r_P2: metatarsal_middle_r (0.0800839 -0.0307669 0.0102765)
      PathPoint PlantarFascia3Ph_r_P3: toes_middle_r (0.0104088 -0.00266471 -0.000904626)
      PathWrap: wrap_object=foot_arc_r method=hybrid range=(1 2)
    NonLinearLigament PF_4_r: resting_length=0.1458 pcsa_force=37.64423
      PathPoint PlantarFascia4Ph_r_P1: calcn_r (-0.0275355 -0.0366238 -0.00232531)
      PathPoint PlantarFascia4Ph_r_P2: metatarsal_ring_r (0.0697689 -0.0323867 0.0233028)
      PathPoint PlantarFascia4Ph_r_P3: toes_ring_r (0.00907499 -0.00656067 0.00206459)
      PathWrap: wrap_object=foot_arc_r method=hybrid range=(1 2)
    Millard2012EquilibriumMuscle PF_4_r_muscle: max_isometric_force=0 optimal_fiber_length=0.1031
        tendon_slack_length=0.03545029 pennation_angle_at_optimal=0.1147809 ignore_tendon_compliance=true
      PathPoint PlantarFascia4Ph_r_P1: calcn_r (-0.0275355 -0.0366238 -0.00232531)
      PathPoint PlantarFascia4Ph_r_P2: metatarsal_ring_r (0.0697689 -0.0323867 0.0233028)
      PathPoint PlantarFascia4Ph_r_P3: toes_ring_r (0.00907499 -0.00656067 0.00206459)
      PathWrap: wrap_object=foot_arc_r method=hybrid range=(1 2)
    NonLinearLigament PF_5_r: resting_length=0.141 pcsa_force=37.64423
      PathPoint PlantarFascia5Ph_r_P1: calcn_r (-0.0275355 -0.0366238 -0.00232531)
      PathPoint PlantarFascia5Ph_r_P2: metatarsal_tiny_r (0.0613046 -0.0345674 0.0339621)
      PathPoint PlantarFascia5Ph_r_P3: toes_tiny_r (0.0105 -0.0017945 0.00228521)
      PathWrap: wrap_object=foot_arc_r method=hybrid range=(1 2)
    Millard2012EquilibriumMuscle PF_5_r_muscle: max_isometric_force=0 optimal_fiber_length=0.1031
        tendon_slack_length=0.03545029 pennation_angle_at_optimal=0.1147809 ignore_tendon_compliance=true
      PathPoint PlantarFascia5Ph_r_P1: calcn_r (-0.0275355 -0.0366238 -0.00232531)
      PathPoint PlantarFascia5Ph_r_P2: metatarsal_tiny_r (0.0613046 -0.0345674 0.0339621)
      PathPoint PlantarFascia5Ph_r_P3: toes_tiny_r (0.0104777 -0.002 0.002)
      PathWrap: wrap_object=foot_arc_r method=hybrid range=(1 2)
    NonLinearLigament LP_1_r: resting_length=0.08 pcsa_force=5383.125
      PathPoint LongPlantar1_r_P1: calcn_r (-0.0181667 -0.0276516 0.00733001)
      PathPoint LongPlantar1_r_P2: midfoot_r (0.0104999 -0.0232265 0.00726157)
      PathPoint LongPlantar1_r_P3: metatarsal_index_r (0.0338695 -0.0104401 -0.000430524)
      PathWrap: wrap_object=foot_arc_r method=hybrid range=(1 -1)
    Millard2012EquilibriumMuscle LP_1_r_muscle: max_isometric_force=0 optimal_fiber_length=0.1031
        tendon_slack_length=0.03545029 pennation_angle_at_optimal=0.1147809 ignore_tendon_compliance=true
      PathPoint LongPlantar1_r_P1: calcn_r (-0.0181667 -0.0276516 0.00733001)
      PathPoint LongPlantar1_r_P2: midfoot_r (0.0104999 -0.0232265 0.00726157)
      PathPoint LongPlantar1_r_P3: metatarsal_index_r (0.0338695 -0.0104401 -0.000430524)
      PathWrap: wrap_object=foot_arc_r method=hybrid range=(1 -1)
    NonLinearLigament LP_2_r: resting_length=0.077 pcsa_force=4037.344
      PathPoint LongPlantar2_r_P1: calcn_r (-0.0181667 -0.0276516 0.00733001)
      PathPoint LongPlantar2_r_P2: midfoot_r (0.00598959 -0.0247439 0.0120359)
      PathPoint LongPlantar2_r_P3: metatarsal_middle_r (0.0324274 -0.0158619 0.00534792)
      PathWrap: wrap_object=foot_arc_r method=hybrid range=(1 -1)
    Millard2012EquilibriumMuscle LP_2_r_muscle: max_isometric_force=0 optimal_fiber_length=0.1031
        tendon_slack_length=0.03545029 pennation_angle_at_optimal=0.1147809 ignore_tendon_compliance=true
      PathPoint LongPlantar2_r_P1: calcn_r (-0.0181667 -0.0276516 0.00733001)
      PathPoint LongPlantar2_r_P2: midfoot_r (0.00598959 -0.0247439 0.0120359)
      PathPoint LongPlantar2_r_P3: metatarsal_middle_r (0.0324274 -0.0158619 0.00534792)
      PathWrap: wrap_object=foot_arc_r method=hybrid range=(1 -1)
    NonLinearLigament LP_3_r: resting_length=0.071 pcsa_force=2691.563
      PathPoint LongPlantar3_r_P1: calcn_r (-0.0181667 -0.0276516 0.00733001)
      PathPoint LongPlantar3_r_P2: midfoot_r (0.00234681 -0.0252825 0.0161043)
      PathPoint LongPlantar3_r_P3: metatarsal_ring_r (0.028156 -0.0202811 0.0125907)
      PathWrap: wrap_object=foot_arc_r method=hybrid range=(1 -1)
    Millard2012EquilibriumMuscle LP_3_r_muscle: max_isometric_force=0 optimal_fiber_length=0.1031
        tendon_slack_length=0.03545029 pennation_angle_at_optimal=0.1147809 ignore_tendon_compliance=true
      PathPoint LongPlantar3_r_P1: calcn_r (-0.0181667 -0.0276516 0.00733001)
      PathPoint LongPlantar3_r_P2: midfoot_r (0.00234681 -0.0252825 0.0161043)
      PathPoint LongPlantar3_r_P3: metatarsal_ring_r (0.028156 -0.0202811 0.0125907)
      PathWrap: wrap_object=foot_arc_r method=hybrid range=(1 -1)
    NonLinearLigament LP_4_r: resting_length=0.063 pcsa_force=1345.781
      PathPoint LongPlantar4_r_P1: calcn_r (-0.0181667 -0.0276516 0.00733001)
      PathPoint LongPlantar4_r_P2: midfoot_r (-0.000481492 -0.0253272 0.0200673)
      PathPoint LongPlantar4_r_P3: metatarsal_tiny_r (0.0195304 -0.0282905 0.0245642)
      PathWrap: wrap_object=foot_arc_r method=hybrid range=(1 -1)
    Millard2012EquilibriumMuscle LP_4_r_muscle: max_isometric_force=0 optimal_fiber_length=0.1031
        tendon_slack_length=0.03545029 pennation_angle_at_optimal=0.1147809 ignore_tendon_compliance=true
      PathPoint LongPlantar4_r_P1: calcn_r (-0.0181667 -0.0276516 0.00733001)
      PathPoint LongPlantar4_r_P2: midfoot_r (-0.000481492 -0.0253272 0.0200673)
      PathPoint LongPlantar4_r_P3: metatarsal_tiny_r (0.0195304 -0.0282905 0.0245642)
      PathWrap: wrap_object=foot_arc_r method=hybrid range=(1 -1)
    NonLinearLigament pCN_1_r: resting_length=0.017 pcsa_force=1032.846
      PathPoint CalcaneoNavicularPlantar1Mus_r_P1: calcn_r (0.00244355 0.00604883 -0.0176546)
      PathPoint CalcaneoNavicularPlantar1Mus_r_P2: midfoot_r (-0.00370625 0.00353066 -0.0196283)
    Millard2012EquilibriumMuscle pCN_1_r_muscle: max_isometric_force=0 optimal_fiber_length=0.1031
        tendon_slack_length=0.03545029 pennation_angle_at_optimal=0.1147809 ignore_tendon_compliance=true
      PathPoint CalcaneoNavicularPlantar1Mus_r_P1: calcn_r (0.00244355 0.00604883 -0.0176546)
      PathPoint CalcaneoNavicularPlantar1Mus_r_P2: midfoot_r (-0.00370625 0.00353066 -0.0196283)
    NonLinearLigament pCN_2_r : resting_length=0.012 pcsa_force=1200
      PathPoint CalcaneoNavicularPlantar2Mus_r _P1: calcn_r (0.00612203 0.00405856 -0.0137232)
      PathPoint CalcaneoNavicularPlantar2Mus_r _P2: midfoot_r (-0.00404604 0.000189331 -0.0120556)
    Millard2012EquilibriumMuscle pCN_2_r_muscle: max_isometric_force=0 optimal_fiber_length=0.1031
        tendon_slack_length=0.03545029 pennation_angle_at_optimal=0.1147809 ignore_tendon_compliance=true
      PathPoint CalcaneoNavicularPlantar2Mus_r _P1: calcn_r (0.00612203 0.00405856 -0.0137232)
      PathPoint CalcaneoNavicularPlantar2Mus_r _P2: midfoot_r (-0.00404604 0.000189331 -0.0120556)
    NonLinearLigament pCN_3_r: resting_length=0.01 pcsa_force=1200
      PathPoint CalcaneoNavicularPlantar3Mus_r_P1: calcn_r (0.00813067 0.00270494 -0.00851388)
      PathPoint CalcaneoNavicularPlantar3Mus_r_P2: midfoot_r (-0.0046 -0.000891338 -0.00396327)
    Millard2012EquilibriumMuscle pCN_3_r_muscle: max_isometric_force=0 optimal_fiber_length=0.1031
        tendon_slack_length=0.03545029 pennation_angle_at_optimal=0.1147809 ignore_tendon_compliance=true
      PathPoint CalcaneoNavicularPlantar3Mus_r_P1: calcn_r (0.00813067 0.00270494 -0.00851388)
      PathPoint CalcaneoNavicularPlantar3Mus_r_P2: midfoot_r (-0.0046 -0.000891338 -0.00396327)
    NonLinearLigament pCC_1_r: resting_length=0.017 pcsa_force=1500
      PathPoint CalcaneoCuboidPlantar1Mus_r_P1: calcn_r (0.00420444 -0.0164583 0.00932459)
      PathPoint CalcaneoCuboidPlantar1Mus_r_P2: midfoot_r (-0.00115008 -0.0210007 0.0122584)
    Millard2012EquilibriumMuscle pCC_1_r_muscle: max_isometric_force=0 optimal_fiber_length=0.1031
        tendon_slack_length=0.03545029 pennation_angle_at_optimal=0.1147809 ignore_tendon_compliance=true
      PathPoint CalcaneoCuboidPlantar1Mus_r_P1: calcn_r (0.00420444 -0.0164583 0.00932459)
      PathPoint CalcaneoCuboidPlantar1Mus_r_P2: midfoot_r (-0.00115008 -0.0210007 0.0122584)
    NonLinearLigament pCC_2_r: resting_length=0.021 pcsa_force=1500
      PathPoint CalcaneoCuboidPlantar2Mus_r_P1: calcn_r (0.00500508 -0.0131643 0.001273)
      PathPoint CalcaneoCuboidPlantar2Mus_r_P2: midfoot_r (0.00350242 -0.016266 0.00646454)
    Millard2012EquilibriumMuscle pCC_2_r_muscle: max_isometric_force=0 optimal_fiber_length=0.1031
        tendon_slack_length=0.03545029 pennation_angle_at_optimal=0.1147809 ignore_tendon_compliance=true
      PathPoint CalcaneoCuboidPlantar2Mus_r_P1: calcn_r (0.00500508 -0.0131643 0.001273)
      PathPoint CalcaneoCuboidPlantar2Mus_r_P2: midfoot_r (0.00350242 -0.016266 0.00646454)
    NonLinearLigament dCC_r: resting_length=0.025 pcsa_force=1032.846
      PathPoint CalcaneoCuboidDorsalMus_r_P1: calcn_r (0.00852641 -0.0013088 0.0230188)
      PathPoint CalcaneoCuboidDorsalMus_r_P2: midfoot_r (0.0110404 -0.00144174 0.0216943)
    Millard2012EquilibriumMuscle dCC_r_muscle: max_isometric_force=0 optimal_fiber_length=0.1031
        tendon_slack_length=0.03545029 pennation_angle_at_optimal=0.1147809 ignore_tendon_compliance=true
      PathPoint CalcaneoCuboidDorsalMus_r_P1: calcn_r (0.00852641 -0.0013088 0.0230188)
      PathPoint CalcaneoCuboidDorsalMus_r_P2: midfoot_r (0.0110404 -0.00144174 0.0216943)
    NonLinearLigament dTN_1_r: resting_length=0.012 pcsa_force=500
      PathPoint TaloNavicularDorsal1Mus_r_P1: talus_r (0.0292092 -0.000290281 0.000343318)
      PathPoint TaloNavicularDorsal1Mus_r_P2: midfoot_r (0.0075864 0.0220221 -0.00102434)
    Millard2012EquilibriumMuscle dTN_1_r_muscle: max_isometric_force=0 optimal_fiber_length=0.1031
        tendon_slack_length=0.03545029 pennation_angle_at_optimal=0.1147809 ignore_tendon_compliance=true
      PathPoint TaloNavicularDorsal1Mus_r_P1: talus_r (0.0292092 -0.000290281 0.000343318)
      PathPoint TaloNavicularDorsal1Mus_r_P2: midfoot_r (0.0075864 0.0220221 -0.00102434)
    NonLinearLigament dTN_2_r: resting_length=0.012 pcsa_force=500
      PathPoint TaloNavicularDorsal2Mus_r_P1: talus_r (0.0284216 -0.000515714 -0.00775697)
      PathPoint TaloNavicularDorsal2Mus_r_P2: midfoot_r (0.00679827 0.0217965 -0.0091305)
    Millard2012EquilibriumMuscle dTN_2_r_muscle: max_isometric_force=0 optimal_fiber_length=0.1031
        tendon_slack_length=0.03545029 pennation_angle_at_optimal=0.1147809 ignore_tendon_compliance=true
      PathPoint TaloNavicularDorsal2Mus_r_P1: talus_r (0.0284216 -0.000515714 -0.00775697)
      PathPoint TaloNavicularDorsal2Mus_r_P2: midfoot_r (0.00679827 0.0217965 -0.0091305)
    NonLinearLigament CNB_r: resting_length=0.016 pcsa_force=1032.846
      PathPoint CalcaneoNavicularBifurcateMus_r_P1: calcn_r (0.00945888 0.012521 0.0143526)
      PathPoint CalcaneoNavicularBifurcateMus_r_P2: midfoot_r (0.00181286 0.0115785 0.00919865)
    Millard2012EquilibriumMuscle CNB_r_muscle: max_isometric_force=0 optimal_fiber_length=0.1031
        tendon_slack_length=0.03545029 pennation_angle_at_optimal=0.1147809 ignore_tendon_compliance=true
      PathPoint CalcaneoNavicularBifurcateMus_r_P1: calcn_r (0.00945888 0.012521 0.0143526)
      PathPoint CalcaneoNavicularBifurcateMus_r_P2: midfoot_r (0.00181286 0.0115785 0.00919865)
    NonLinearLigament CCB_r: resting_length=0.014 pcsa_force=1032.846
      PathPoint CalcaneoCuboidBifurcateMus_r_P1: calcn_r (0.00945888 0.012521 0.0143526)
      PathPoint CalcaneoCuboidBifurcateMus_r_P2: midfoot_r (0.000186419 0.00229411 0.0189838)
    Millard2012EquilibriumMuscle CCB_r_muscle: max_isometric_force=0 optimal_fiber_length=0.1031
        tendon_slack_length=0.03545029 pennation_angle_at_optimal=0.1147809 ignore_tendon_compliance=true
      PathPoint CalcaneoCuboidBifurcateMus_r_P1: calcn_r (0.00945888 0.012521 0.0143526)
      PathPoint CalcaneoCuboidBifurcateMus_r_P2: midfoot_r (0.000186419 0.00229411 0.0189838)
    NonLinearLigament dTM_1_r: resting_length=0.012 pcsa_force=500
      PathPoint TarsoMetatarsalDorsal1Mus_r_P1: midfoot_r (0.0390058 0.010053 -0.00951474)
      PathPoint TarsoMetatarsalDorsal1Mus_r_P2: metatarsal_thumb_r (0.050188 0.0051235 -0.0119872)
    Millard2012EquilibriumMuscle dTM_1_r_muscle: max_isometric_force=0 optimal_fiber_length=0.1031
        tendon_slack_length=0.03545029 pennation_angle_at_optimal=0.1147809 ignore_tendon_compliance=true
      PathPoint TarsoMetatarsalDorsal1Mus_r_P1: midfoot_r (0.0390058 0.010053 -0.00951474)
      PathPoint TarsoMetatarsalDorsal1Mus_r_P2: metatarsal_thumb_r (0.050188 0.0051235 -0.0119872)
    NonLinearLigament dTM_2_r: resting_length=0.01 pcsa_force=500
      PathPoint TarsoMetatarsalDorsal3Mus_r_P1: midfoot_r (0.029294 0.0129735 0.00158232)
      PathPoint TarsoMetatarsalDorsal3Mus_r_P2: metatarsal_index_r (0.0376257 0.0090481 0.00418376)
    Millard2012EquilibriumMuscle dTM_2_r_muscle: max_isometric_force=0 optimal_fiber_length=0.1031
        tendon_slack_length=0.03545029 pennation_angle_at_optimal=0.1147809 ignore_tendon_compliance=true
      PathPoint TarsoMetatarsalDorsal3Mus_r_P1: midfoot_r (0.029294 0.0129735 0.00158232)
      PathPoint TarsoMetatarsalDorsal3Mus_r_P2: metatarsal_index_r (0.0376257 0.0090481 0.00418376)
    NonLinearLigament dTM_3_r: resting_length=0.007 pcsa_force=200
      PathPoint TarsoMetatarsalDorsal5Mus_r_P1: midfoot_r (0.0278987 0.00326289 0.0163474)
      PathPoint TarsoMetatarsalDorsal5Mus_r_P2: metatarsal_middle_r (0.0339175 0.000408797 0.0176699)
    Millard2012EquilibriumMuscle dTM_3_r_muscle: max_isometric_force=0 optimal_fiber_length=0.1031
        tendon_slack_length=0.03545029 pennation_angle_at_optimal=0.1147809 ignore_tendon_compliance=true
      PathPoint TarsoMetatarsalDorsal5Mus_r_P1: midfoot_r (0.0278987 0.00326289 0.0163474)
      PathPoint TarsoMetatarsalDorsal5Mus_r_P2: metatarsal_middle_r (0.0339175 0.000408797 0.0176699)
    NonLinearLigament dTM_4_r: resting_length=0.008 pcsa_force=500
      PathPoint TarsoMetatarsalDorsal7Mus_r_P1: midfoot_r (0.0166846 -0.00628082 0.0248664)
      PathPoint TarsoMetatarsalDorsal7Mus_r_P2: metatarsal_ring_r (0.0247783 -0.00873345 0.0253998)
    Millard2012EquilibriumMuscle dTM_4_r_muscle: max_isometric_force=0 optimal_fiber_length=0.1031
        tendon_slack_length=0.03545029 pennation_angle_at_optimal=0.1147809 ignore_tendon_compliance=true
      PathPoint TarsoMetatarsalDorsal7Mus_r_P1: midfoot_r (0.0166846 -0.00628082 0.0248664)
      PathPoint TarsoMetatarsalDorsal7Mus_r_P2: metatarsal_ring_r (0.0247783 -0.00873345 0.0253998)
    NonLinearLigament dTM_5_r: resting_length=0.007 pcsa_force=500
      PathPoint TarsoMetatarsalDorsal8Mus_r_P1: midfoot_r (0.0101285 -0.0129898 0.0297071)
      PathPoint TarsoMetatarsalDorsal8Mus_r_P2: metatarsal_tiny_r (0.0153747 -0.0173038 0.0324203)
    Millard2012EquilibriumMuscle dTM_5_r_muscle: max_isometric_force=0 optimal_fiber_length=0.1031
        tendon_slack_length=0.03545029 pennation_angle_at_optimal=0.1147809 ignore_tendon_compliance=true
      PathPoint TarsoMetatarsalDorsal8Mus_r_P1: midfoot_r (0.0101285 -0.0129898 0.0297071)
      PathPoint TarsoMetatarsalDorsal8Mus_r_P2: metatarsal_tiny_r (0.0153747 -0.0173038 0.0324203)
    NonLinearLigament pTM_1_r: resting_length=0.0089 pcsa_force=1032
      PathPoint TarsoMetatarsalPlantar1Mus_r_P1: midfoot_r (0.0291184 -0.0186954 -0.0108993)
      PathPoint TarsoMetatarsalPlantar1Mus_r_P2: metatarsal_thumb_r (0.0379767 -0.0197885 -0.0107877)
    Millard2012EquilibriumMuscle pTM_1_r_muscle: max_isometric_force=0 optimal_fiber_length=0.1031
        tendon_slack_length=0.03545029 pennation_angle_at_optimal=0.1147809 ignore_tendon_compliance=true
      PathPoint TarsoMetatarsalPlantar1Mus_r_P1: midfoot_r (0.0291184 -0.0186954 -0.0108993)
      PathPoint TarsoMetatarsalPlantar1Mus_r_P2: metatarsal_thumb_r (0.0379767 -0.0197885 -0.0107877)
    NonLinearLigament pTM_2_r: resting_length=0.0074 pcsa_force=20913.46
      PathPoint TarsoMetatarsalPlantar2Mus_r_P1: midfoot_r (0.0234495 -0.00879685 -0.00157792)
      PathPoint TarsoMetatarsalPlantar2Mus_r_P2: metatarsal_index_r (0.0304055 -0.0109011 -0.000399114)
    Millard2012EquilibriumMuscle pTM_2_r_muscle: max_isometric_force=0 optimal_fiber_length=0.1031
        tendon_slack_length=0.03545029 pennation_angle_at_optimal=0.1147809 ignore_tendon_compliance=true
      PathPoint TarsoMetatarsalPlantar2Mus_r_P1: midfoot_r (0.0234495 -0.00879685 -0.00157792)
      PathPoint TarsoMetatarsalPlantar2Mus_r_P2: metatarsal_index_r (0.0304055 -0.0109011 -0.000399114)
    NonLinearLigament pTM_3_r: resting_length=0.0069 pcsa_force=20913.46
      PathPoint TarsoMetatarsalPlantar3Mus_r_P1: midfoot_r (0.0231265 -0.0150134 0.0033194)
      PathPoint TarsoMetatarsalPlantar3Mus_r_P2: metatarsal_middle_r (0.0296081 -0.0159227 0.00547775)
    Millard2012EquilibriumMuscle pTM_3_r_muscle: max_isometric_force=0 optimal_fiber_length=0.1031
        tendon_slack_length=0.03545029 pennation_angle_at_optimal=0.1147809 ignore_tendon_compliance=true
      PathPoint TarsoMetatarsalPlantar3Mus_r_P1: midfoot_r (0.0231265 -0.0150134 0.0033194)
      PathPoint TarsoMetatarsalPlantar3Mus_r_P2: metatarsal_middle_r (0.0296081 -0.0159227 0.00547775)
    NonLinearLigament pTM_4_r: resting_length=0.0076 pcsa_force=500
      PathPoint TarsoMetatarsalPlantar4Mus_r_P1: midfoot_r (0.0181682 -0.0200681 0.0124725)
      PathPoint TarsoMetatarsalPlantar4Mus_r_P2: metatarsal_ring_r (0.0257273 -0.0200375 0.0135631)
    Millard2012EquilibriumMuscle pTM_4_r_muscle: max_isometric_force=0 optimal_fiber_length=0.1031
        tendon_slack_length=0.03545029 pennation_angle_at_optimal=0.1147809 ignore_tendon_compliance=true
      PathPoint TarsoMetatarsalPlantar4Mus_r_P1: midfoot_r (0.0181682 -0.0200681 0.0124725)
      PathPoint TarsoMetatarsalPlantar4Mus_r_P2: metatarsal_ring_r (0.0257273 -0.0200375 0.0135631)
    NonLinearLigament pTM_5_r: resting_length=0.009 pcsa_force=500
      PathPoint TarsoMetatarsalPlantar5Mus_r_P1: midfoot_r (0.0088541 -0.0235376 0.020535)
      PathPoint TarsoMetatarsalPlantar5Mus_r_P2: metatarsal_tiny_r (0.0164051 -0.027351 0.0235243)
    Millard2012EquilibriumMuscle pTM_5_r_muscle: max_isometric_force=0 optimal_fiber_length=0.1031
        tendon_slack_length=0.03545029 pennation_angle_at_optimal=0.1147809 ignore_tendon_compliance=true
      PathPoint TarsoMetatarsalPlantar5Mus_r_P1: midfoot_r (0.0088541 -0.0235376 0.020535)
      PathPoint TarsoMetatarsalPlantar5Mus_r_P2: metatarsal_tiny_r (0.0164051 -0.027351 0.0235243)
    NonLinearLigament dIC_1_r: resting_length=0.006 pcsa_force=500
      PathPoint DorsalIntercuniform_1_r_P1: midfoot_r (0.0319472 0.0147679 -0.0115791)
      PathPoint DorsalIntercuniform_1_r_P2: midfoot_r (0.030507 0.0162672 -0.00593917)
    Millard2012EquilibriumMuscle dIC_1_r_muscle: max_isometric_force=0 optimal_fiber_length=0.1031
        tendon_slack_length=0.03545029 pennation_angle_at_optimal=0.1147809 ignore_tendon_compliance=true
      PathPoint DorsalIntercuniform_1_r_P1: midfoot_r (0.0319472 0.0147679 -0.0115791)
      PathPoint DorsalIntercuniform_1_r_P2: midfoot_r (0.030507 0.0162672 -0.00593917)
    NonLinearLigament dIC_2_r: resting_length=0.0078 pcsa_force=500
      PathPoint DorsalIntercuniform_2_r_P1: midfoot_r (0.0257356 0.0127444 0.00354823)
      PathPoint DorsalIntercuniform_2_r_P2: midfoot_r (0.0218264 0.00817921 0.00848038)
    Millard2012EquilibriumMuscle dIC_2_r_muscle: max_isometric_force=0 optimal_fiber_length=0.1031
        tendon_slack_length=0.03545029 pennation_angle_at_optimal=0.1147809 ignore_tendon_compliance=true
      PathPoint DorsalIntercuniform_2_r_P1: midfoot_r (0.0257356 0.0127444 0.00354823)
      PathPoint DorsalIntercuniform_2_r_P2: midfoot_r (0.0218264 0.00817921 0.00848038)
    NonLinearLigament dCN_r: resting_length=0.0139 pcsa_force=1032.846
      PathPoint DorsalCuboideoNavicular_r_P1: midfoot_r (0.00285975 0.0113669 0.00975216)
      PathPoint DorsalCuboideoNavicular_r_P2: midfoot_r (0.00143 0.00192793 0.0198535)
    Millard2012EquilibriumMuscle dCN_r_muscle: max_isometric_force=0 optimal_fiber_length=0.1031
        tendon_slack_length=0.03545029 pennation_angle_at_optimal=0.1147809 ignore_tendon_compliance=true
      PathPoint DorsalCuboideoNavicular_r_P1: midfoot_r (0.00285975 0.0113669 0.00975216)
      PathPoint DorsalCuboideoNavicular_r_P2: midfoot_r (0.00143 0.00192793 0.0198535)
    NonLinearLigament dML_1_r: resting_length=0.0051 pcsa_force=1032.846
      PathPoint DorsalMetatarsal_1_r_P1: metatarsal_thumb_r (0.0491997 0.00771677 -0.00645745)
      PathPoint DorsalMetatarsal_1_r_P2: metatarsal_index_r (0.0466325 0.00860943 -0.00209145)
    Millard2012EquilibriumMuscle dML_1_r_muscle: max_isometric_force=0 optimal_fiber_length=0.1031
        tendon_slack_length=0.03545029 pennation_angle_at_optimal=0.1147809 ignore_tendon_compliance=true
      PathPoint DorsalMetatarsal_1_r_P1: metatarsal_thumb_r (0.0491997 0.00771677 -0.00645745)
      PathPoint DorsalMetatarsal_1_r_P2: metatarsal_index_r (0.0466325 0.00860943 -0.00209145)
    NonLinearLigament dML_2_r: resting_length=0.0047 pcsa_force=1032.846
      PathPoint DorsalMetatarsal_2_r_P1: metatarsal_index_r (0.041594 0.00626051 0.00734275)
      PathPoint DorsalMetatarsal_2_r_P2: metatarsal_middle_r (0.0402447 0.00413145 0.0112543)
    Millard2012EquilibriumMuscle dML_2_r_muscle: max_isometric_force=0 optimal_fiber_length=0.1031
        tendon_slack_length=0.03545029 pennation_angle_at_optimal=0.1147809 ignore_tendon_compliance=true
      PathPoint DorsalMetatarsal_2_r_P1: metatarsal_index_r (0.041594 0.00626051 0.00734275)
      PathPoint DorsalMetatarsal_2_r_P2: metatarsal_middle_r (0.0402447 0.00413145 0.0112543)
    NonLinearLigament dML_3_r: resting_length=0.0041 pcsa_force=1032.846
      PathPoint DorsalMetatarsal_3_r_P1: metatarsal_middle_r (0.0349343 -0.00183344 0.0183704)
      PathPoint DorsalMetatarsal_3_r_P2: metatarsal_ring_r (0.0321748 -0.00408147 0.020423)
    Millard2012EquilibriumMuscle dML_3_r_muscle: max_isometric_force=0 optimal_fiber_length=0.1031
        tendon_slack_length=0.03545029 pennation_angle_at_optimal=0.1147809 ignore_tendon_compliance=true
      PathPoint DorsalMetatarsal_3_r_P1: metatarsal_middle_r (0.0349343 -0.00183344 0.0183704)
      PathPoint DorsalMetatarsal_3_r_P2: metatarsal_ring_r (0.0321748 -0.00408147 0.020423)
    NonLinearLigament dML_4_r: resting_length=0.0055 pcsa_force=1032.846
      PathPoint DorsalMetatarsal_4_r_P1: metatarsal_ring_r (0.0252339 -0.0102739 0.0256174)
      PathPoint DorsalMetatarsal_4_r_P2: metatarsal_tiny_r (0.021191 -0.0129912 0.0280654)
    Millard2012EquilibriumMuscle dML_4_r_muscle: max_isometric_force=0 optimal_fiber_length=0.1031
        tendon_slack_length=0.03545029 pennation_angle_at_optimal=0.1147809 ignore_tendon_compliance=true
      PathPoint DorsalMetatarsal_4_r_P1: metatarsal_ring_r (0.0252339 -0.0102739 0.0256174)
      PathPoint DorsalMetatarsal_4_r_P2: metatarsal_tiny_r (0.021191 -0.0129912 0.0280654)
    NonLinearLigament dCNL_1_r: resting_length=0.0122 pcsa_force=1032.846
      PathPoint DorsalCunoNavicular_1_r_P1: midfoot_r (0.025999 0.0108388 -0.0187366)
      PathPoint DorsalCunoNavicular_1_r_P2: midfoot_r (0.0142807 0.014084 -0.0189745)
    Millard2012EquilibriumMuscle dCNL_1_r_muscle: max_isometric_force=0 optimal_fiber_length=0.1031
        tendon_slack_length=0.03545029 pennation_angle_at_optimal=0.1147809 ignore_tendon_compliance=true
      PathPoint DorsalCunoNavicular_1_r_P1: midfoot_r (0.025999 0.0108388 -0.0187366)
      PathPoint DorsalCunoNavicular_1_r_P2: midfoot_r (0.0142807 0.014084 -0.0189745)
    NonLinearLigament dCNL_2_r: resting_length=0.009 pcsa_force=1032.846
      PathPoint DorsalCunoNavicular_2_r_P1: midfoot_r (0.0247808 0.0177889 -0.00190732)
      PathPoint DorsalCunoNavicular_2_r_P2: midfoot_r (0.0164874 0.0198218 -0.00467995)
    Millard2012EquilibriumMuscle dCNL_2_r_muscle: max_isometric_force=0 optimal_fiber_length=0.1031
        tendon_slack_length=0.03545029 pennation_angle_at_optimal=0.1147809 ignore_tendon_compliance=true
      PathPoint DorsalCunoNavicular_2_r_P1: midfoot_r (0.0247808 0.0177889 -0.00190732)
      PathPoint DorsalCunoNavicular_2_r_P2: midfoot_r (0.0164874 0.0198218 -0.00467995)
    NonLinearLigament dCNL_3_r: resting_length=0.0101 pcsa_force=1032.846
      PathPoint DorsalCunoNavicular_3_r_P1: midfoot_r (0.0168627 0.0090386 0.00813969)
      PathPoint DorsalCunoNavicular_3_r_P2: midfoot_r (0.0120569 0.0153445 0.00184975)
    Millard2012EquilibriumMuscle dCNL_3_r_muscle: max_isometric_force=0 optimal_fiber_length=0.1031
        tendon_slack_length=0.03545029 pennation_angle_at_optimal=0.1147809 ignore_tendon_compliance=true
      PathPoint DorsalCunoNavicular_3_r_P1: midfoot_r (0.0168627 0.0090386 0.00813969)
      PathPoint DorsalCunoNavicular_3_r_P2: midfoot_r (0.0120569 0.0153445 0.00184975)
    NonLinearLigament dCCL_1_r: resting_length=0.0053 pcsa_force=1032.846
      PathPoint DorsalCunoCuboid_1_r_P1: midfoot_r (0.0146517 0.00586964 0.0129033)
      PathPoint DorsalCunoCuboid_1_r_P2: midfoot_r (0.0109795 0.00304673 0.0154069)
    Millard2012EquilibriumMuscle dCCL_1_r_muscle: max_isometric_force=0 optimal_fiber_length=0.1031
        tendon_slack_length=0.03545029 pennation_angle_at_optimal=0.1147809 ignore_tendon_compliance=true
      PathPoint DorsalCunoCuboid_1_r_P1: midfoot_r (0.0146517 0.00586964 0.0129033)
      PathPoint DorsalCunoCuboid_1_r_P2: midfoot_r (0.0109795 0.00304673 0.0154069)
    NonLinearLigament dCCL_2_r: resting_length=0.0049 pcsa_force=1032.846
      PathPoint DorsalCunoCuboid_2_r_P1: midfoot_r (0.0208831 0.00330777 0.0164184)
      PathPoint DorsalCunoCuboid_2_r_P2: midfoot_r (0.0191557 -7.98929e-5 0.0194493)
    Millard2012EquilibriumMuscle dCCL_2_r_muscle: max_isometric_force=0 optimal_fiber_length=0.1031
        tendon_slack_length=0.03545029 pennation_angle_at_optimal=0.1147809 ignore_tendon_compliance=true
      PathPoint DorsalCunoCuboid_2_r_P1: midfoot_r (0.0208831 0.00330777 0.0164184)
      PathPoint DorsalCunoCuboid_2_r_P2: midfoot_r (0.0191557 -7.98929e-5 0.0194493)
    NonLinearLigament ITC_1_r: resting_length=0.0112 pcsa_force=1032.846
      PathPoint InterosseousTaloCalcaneal_1_r_P1: midfoot_r (-0.0208559 0.0158616 0.0134466)
      PathPoint InterosseousTaloCalcaneal_1_r_P2: midfoot_r (-0.0195425 0.00538704 0.0173027)
    Millard2012EquilibriumMuscle ITC_1_r_muscle: max_isometric_force=0 optimal_fiber_length=0.1031
        tendon_slack_length=0.03545029 pennation_angle_at_optimal=0.1147809 ignore_tendon_compliance=true
      PathPoint InterosseousTaloCalcaneal_1_r_P1: midfoot_r (-0.0208559 0.0158616 0.0134466)
      PathPoint InterosseousTaloCalcaneal_1_r_P2: midfoot_r (-0.0195425 0.00538704 0.0173027)
    NonLinearLigament ITC_2_r: resting_length=0.0077 pcsa_force=1032.846
      PathPoint InterosseousTaloCalcaneal_2_r_P1: midfoot_r (-0.0295937 0.0118128 0.0158348)
      PathPoint InterosseousTaloCalcaneal_2_r_P2: midfoot_r (-0.0301284 0.00474451 0.0188918)
    Millard2012EquilibriumMuscle ITC_2_r_muscle: max_isometric_force=0 optimal_fiber_length=0.1031
        tendon_slack_length=0.03545029 pennation_angle_at_optimal=0.1147809 ignore_tendon_compliance=true
      PathPoint InterosseousTaloCalcaneal_2_r_P1: midfoot_r (-0.0295937 0.0118128 0.0158348)
      PathPoint InterosseousTaloCalcaneal_2_r_P2: midfoot_r (-0.0301284 0.00474451 0.0188918)
    NonLinearLigament lTC_r: resting_length=0.0075 pcsa_force=1032.846
      PathPoint LateralTaloCalcaneal_r_P1: midfoot_r (-0.0375988 0.016105 0.0126995)
      PathPoint LateralTaloCalcaneal_r_P2: midfoot_r (-0.0414851 0.0104599 0.015651)
    Millard2012EquilibriumMuscle lTC_r_muscle: max_isometric_force=0 optimal_fiber_length=0.1031
        tendon_slack_length=0.03545029 pennation_angle_at_optimal=0.1147809 ignore_tendon_compliance=true
      PathPoint LateralTaloCalcaneal_r_P1: midfoot_r (-0.0375988 0.016105 0.0126995)
      PathPoint LateralTaloCalcaneal_r_P2: midfoot_r (-0.0414851 0.0104599 0.015651)
    NonLinearLigament mTC_r: resting_length=0.009 pcsa_force=1032.846
      PathPoint MedialTaloCalcaneal_r_P1: midfoot_r (-0.0366689 0.0156345 -0.0205739)
      PathPoint MedialTaloCalcaneal_r_P2: midfoot_r (-0.0297167 0.00992459 -0.0212993)
    Millard2012EquilibriumMuscle mTC_r_muscle: max_isometric_force=0 optimal_fiber_length=0.1031
        tendon_slack_length=0.03545029 pennation_angle_at_optimal=0.1147809 ignore_tendon_compliance=true
      PathPoint MedialTaloCalcaneal_r_P1: midfoot_r (-0.0366689 0.0156345 -0.0205739)
      PathPoint MedialTaloCalcaneal_r_P2: midfoot_r (-0.0297167 0.00992459 -0.0212993)
    NonLinearLigament pTC_r: resting_length=0.0076 pcsa_force=1032.846
      PathPoint PosteriorTaloCalcaneal_r_P1: midfoot_r (-0.0517473 0.0117631 -0.00340251)
      PathPoint PosteriorTaloCalcaneal_r_P2: midfoot_r (-0.0563557 0.00584704 -0.00219756)
    Millard2012EquilibriumMuscle pTC_r_muscle: max_isometric_force=0 optimal_fiber_length=0.1031
        tendon_slack_length=0.03545029 pennation_angle_at_optimal=0.1147809 ignore_tendon_compliance=true
      PathPoint PosteriorTaloCalcaneal_r_P1: midfoot_r (-0.0517473 0.0117631 -0.00340251)
      PathPoint PosteriorTaloCalcaneal_r_P2: midfoot_r (-0.0563557 0.00584704 -0.00219756)
    NonLinearLigament mCL_1_r: resting_length=0.017 pcsa_force=1032.846
      PathPoint LateralCollateralNonLinearLigament_1_r_P1: toes_thumb_r (0.0168404 -0.00397347 -0.00448909)
      PathPoint LateralCollateralNonLinearLigament_1_r_P2: metatarsal_thumb_r (0.0875277 -0.0249878 -0.0332045)
    Millard2012EquilibriumMuscle mCL_1_r_muscle: max_isometric_force=0 optimal_fiber_length=0.1031
        tendon_slack_length=0.03545029 pennation_angle_at_optimal=0.1147809 ignore_tendon_compliance=true
      PathPoint LateralCollateralNonLinearLigament_1_r_P1: toes_thumb_r (0.0168404 -0.00397347 -0.00448909)
      PathPoint LateralCollateralNonLinearLigament_1_r_P2: metatarsal_thumb_r (0.0875277 -0.0249878 -0.0332045)
    NonLinearLigament mCL_2_r: resting_length=0.0144 pcsa_force=1032.846
      PathPoint LateralCollateralNonLinearLigament_2_r_P1: toes_index_r (0.0161667 -0.000881615 -0.00319104)
      PathPoint LateralCollateralNonLinearLigament_2_r_P2: metatarsal_index_r (0.089466 -0.0204712 -0.00219725)
    Millard2012EquilibriumMuscle mCL_2_r_muscle: max_isometric_force=0 optimal_fiber_length=0.1031
        tendon_slack_length=0.03545029 pennation_angle_at_optimal=0.1147809 ignore_tendon_compliance=true
      PathPoint LateralCollateralNonLinearLigament_2_r_P1: toes_index_r (0.0161667 -0.000881615 -0.00319104)
      PathPoint LateralCollateralNonLinearLigament_2_r_P2: metatarsal_index_r (0.089466 -0.0204712 -0.00219725)
    NonLinearLigament mCL_3_r: resting_length=0.0129 pcsa_force=1032.846
      PathPoint LateralCollateralNonLinearLigament_3_r_P1: toes_middle_r (0.0129929 0.000553766 -0.00488832)
      PathPoint LateralCollateralNonLinearLigament_3_r_P2: metatarsal_middle_r (0.0853982 -0.025 0.0087482)
    Millard2012EquilibriumMuscle mCL_3_r_muscle: max_isometric_force=0 optimal_fiber_length=0.1031
        tendon_slack_length=0.03545029 pennation_angle_at_optimal=0.1147809 ignore_tendon_compliance=true
      PathPoint LateralCollateralNonLinearLigament_3_r_P1: toes_middle_r (0.0129929 0.000553766 -0.00488832)
      PathPoint LateralCollateralNonLinearLigament_3_r_P2: metatarsal_middle_r (0.0853982 -0.025 0.0087482)
    NonLinearLigament mCL_4_r: resting_length=0.0124 pcsa_force=1032.846
      PathPoint LateralCollateralNonLinearLigament_4_r_P1: toes_ring_r (0.0141248 -0.000641653 -0.00297478)
      PathPoint LateralCollateralNonLinearLigament_4_r_P2: metatarsal_ring_r (0.0804101 -0.0215736 0.0201852)
    Millard2012EquilibriumMuscle mCL_4_r_muscle: max_isometric_force=0 optimal_fiber_length=0.1031
        tendon_slack_length=0.03545029 pennation_angle_at_optimal=0.1147809 ignore_tendon_compliance=true
      PathPoint LateralCollateralNonLinearLigament_4_r_P1: toes_ring_r (0.0141248 -0.000641653 -0.00297478)
      PathPoint LateralCollateralNonLinearLigament_4_r_P2: metatarsal_ring_r (0.0804101 -0.0215736 0.0201852)
    NonLinearLigament mCL_5_r: resting_length=0.0101 pcsa_force=1032.846
      PathPoint LateralCollateralNonLinearLigament_5_r_P1: toes_tiny_r (0.00891491 0.00196142 -0.0013955)
      PathPoint LateralCollateralNonLinearLigament_5_r_P2: metatarsal_tiny_r (0.0664109 -0.0211602 0.0341938)
    Millard2012EquilibriumMuscle mCL_5_r_muscle: max_isometric_force=0 optimal_fiber_length=0.1031
        tendon_slack_length=0.03545029 pennation_angle_at_optimal=0.1147809 ignore_tendon_compliance=true
      PathPoint LateralCollateralNonLinearLigament_5_r_P1: toes_tiny_r (0.00891491 0.00196142 -0.0013955)
      PathPoint LateralCollateralNonLinearLigament_5_r_P2: metatarsal_tiny_r (0.0664109 -0.0211602 0.0341938)
    NonLinearLigament lCL_1_r: resting_length=0.0206 pcsa_force=1032.846
      PathPoint MedialCollateralNonLinearLigament_1_r_P1: toes_thumb_r (0.0163372 -0.0027575 0.0105002)
      PathPoint MedialCollateralNonLinearLigament_1_r_P2: metatarsal_thumb_r (0.0827842 -0.0253939 -0.0144913)
    Millard2012EquilibriumMuscle lCL_1_r_muscle: max_isometric_force=0 optimal_fiber_length=0.1031
        tendon_slack_length=0.03545029 pennation_angle_at_optimal=0.1147809 ignore_tendon_compliance=true
      PathPoint MedialCollateralNonLinearLigament_1_r_P1: toes_thumb_r (0.0163372 -0.0027575 0.0105002)
      PathPoint MedialCollateralNonLinearLigament_1_r_P2: metatarsal_thumb_r (0.0827842 -0.0253939 -0.0144913)
    NonLinearLigament lCL_2_r: resting_length=0.0143 pcsa_force=1032.846
      PathPoint MedialCollateralNonLinearLigament_2_r_P1: toes_index_r (0.0150794 -0.00347447 0.00578717)
      PathPoint MedialCollateralNonLinearLigament_2_r_P2: metatarsal_index_r (0.0885095 -0.022822 0.00613549)
    Millard2012EquilibriumMuscle lCL_2_r_muscle: max_isometric_force=0 optimal_fiber_length=0.1031
        tendon_slack_length=0.03545029 pennation_angle_at_optimal=0.1147809 ignore_tendon_compliance=true
      PathPoint MedialCollateralNonLinearLigament_2_r_P1: toes_index_r (0.0150794 -0.00347447 0.00578717)
      PathPoint MedialCollateralNonLinearLigament_2_r_P2: metatarsal_index_r (0.0885095 -0.022822 0.00613549)
    NonLinearLigament lCL_3_r: resting_length=0.0135 pcsa_force=1032.846
      PathPoint MedialCollateralNonLinearLigament_3_r_P1: toes_middle_r (0.0124064 -0.00135467 0.0056478)
      PathPoint MedialCollateralNonLinearLigament_3_r_P2: metatarsal_middle_r (0.0859268 -0.0223106 0.0203996)
    Millard2012EquilibriumMuscle lCL_3_r_muscle: max_isometric_force=0 optimal_fiber_length=0.1031
        tendon_slack_length=0.03545029 pennation_angle_at_optimal=0.1147809 ignore_tendon_compliance=true
      PathPoint MedialCollateralNonLinearLigament_3_r_P1: toes_middle_r (0.0124064 -0.00135467 0.0056478)
      PathPoint MedialCollateralNonLinearLigament_3_r_P2: metatarsal_middle_r (0.0859268 -0.0223106 0.0203996)
    NonLinearLigament lCL_4_r: resting_length=0.0126 pcsa_force=1032.846
      PathPoint MedialCollateralNonLinearLigament_4_r_P1: toes_ring_r (0.0110035 -0.00234574 0.00638602)
      PathPoint MedialCollateralNonLinearLigament_4_r_P2: metatarsal_ring_r (0.0779802 -0.0204802 0.0307281)
    Millard2012EquilibriumMuscle lCL_4_r_muscle: max_isometric_force=0 optimal_fiber_length=0.1031
        tendon_slack_length=0.03545029 pennation_angle_at_optimal=0.1147809 ignore_tendon_compliance=true
      PathPoint MedialCollateralNonLinearLigament_4_r_P1: toes_ring_r (0.0110035 -0.00234574 0.00638602)
      PathPoint MedialCollateralNonLinearLigament_4_r_P2: metatarsal_ring_r (0.0779802 -0.0204802 0.0307281)
    NonLinearLigament lCL_5_r: resting_length=0.0106 pcsa_force=1032.846
      PathPoint MedialCollateralNonLinearLigament_5_r_P1: toes_tiny_r (0.00792838 0.00351628 0.0102168)
      PathPoint MedialCollateralNonLinearLigament_5_r_P2: metatarsal_tiny_r (0.0640944 -0.0203239 0.0476806)
    Millard2012EquilibriumMuscle lCL_5_r_muscle: max_isometric_force=0 optimal_fiber_length=0.1031
        tendon_slack_length=0.03545029 pennation_angle_at_optimal=0.1147809 ignore_tendon_compliance=true
      PathPoint MedialCollateralNonLinearLigament_5_r_P1: toes_tiny_r (0.00792838 0.00351628 0.0102168)
      PathPoint MedialCollateralNonLinearLigament_5_r_P2: metatarsal_tiny_r (0.0640944 -0.0203239 0.0476806)
    NonLinearLigament TPS_r: resting_length=0.0181 pcsa_force=1032.846
      PathPoint TibialPhalangeoSesmoid_r_P1: toes_thumb_r (0.0165508 -0.0110319 -0.000141021)
      PathPoint TibialPhalangeoSesmoid_r_P2: metatarsal_thumb_r (0.0857537 -0.0406479 -0.028141)
    Millard2012EquilibriumMuscle TPS_r_muscle: max_isometric_force=0 optimal_fiber_length=0.1031
        tendon_slack_length=0.03545029 pennation_angle_at_optimal=0.1147809 ignore_tendon_compliance=true
      PathPoint TibialPhalangeoSesmoid_r_P1: toes_thumb_r (0.0165508 -0.0110319 -0.000141021)
      PathPoint TibialPhalangeoSesmoid_r_P2: metatarsal_thumb_r (0.0857537 -0.0406479 -0.028141)
    NonLinearLigament FPS_r: resting_length=0.0202 pcsa_force=1032.846
      PathPoint FibularPhalangeoSesmoid_r_P1: toes_thumb_r (0.0154035 -0.00982384 0.00895237)
      PathPoint FibularPhalangeoSesmoid_r_P2: metatarsal_thumb_r (0.084027 -0.0378106 -0.0137156)
    Millard2012EquilibriumMuscle FPS_r_muscle: max_isometric_force=0 optimal_fiber_length=0.1031
        tendon_slack_length=0.03545029 pennation_angle_at_optimal=0.1147809 ignore_tendon_compliance=true
      PathPoint FibularPhalangeoSesmoid_r_P1: toes_thumb_r (0.0154035 -0.00982384 0.00895237)
      PathPoint FibularPhalangeoSesmoid_r_P2: metatarsal_thumb_r (0.084027 -0.0378106 -0.0137156)
    NonLinearLigament CAPmtp_l: resting_length=0.06545615 pcsa_force=6274.039
      PathPoint MtTransverProfund_l_P1: metatarsal_thumb_l (0.0755012 -0.0295004 0.021845)
      PathPoint MtTransverProfund_l_P2: metatarsal_index_l (0.0816651 -0.0284413 0.000933754)
      PathPoint MtTransverProfund_l_P3: metatarsal_thumb_l (0.0774145 -0.0296557 -0.0107754)
      PathPoint MtTransverProfund_l_P4: metatarsal_ring_l (0.0683727 -0.0312215 -0.0234744)
      PathPoint MtTransverProfund_l_P5: metatarsal_tiny_l (0.0595995 -0.0333453 -0.0366874)
    NonLinearLigament pTTL_l: resting_length=0.01981867 pcsa_force=39.1422
      PathPoint TibioTalarPost_l_P1: tibia_l (-0.00223578 -0.409222 0.0203256)
      PathPoint TibioTalarPost_l_P2: talus_l (-0.0144299 -0.00976515 0.0154393)
    NonLinearLigament aTTL_l: resting_length=0.02533941 pcsa_force=19.56111
      PathPoint TibioTalarAnt_l_P1: tibia_l (0.011459 -0.410674 0.0225584)
      PathPoint TibioTalarAnt_l_P2: talus_l (0.0314666 -0.00888865 0.016316)
    NonLinearLigament TCL_l: resting_length=0.03015251 pcsa_force=18.97472
      PathPoint TibioCalcaneal_l_P1: tibia_l (0.00167908 -0.409674 0.0215768)
      PathPoint TibioCalcaneal_l_P2: calcn_l (-0.00264082 0.00710307 0.02031)
    NonLinearLigament TNL_l: resting_length=0.04079935 pcsa_force=450
      PathPoint TibioNavicular_l_P1: tibia_l (0.00342368 -0.409868 0.0220181)
      PathPoint TibioNavicular_l_P2: midfoot_l (0.005044 0.00961017 0.0229182)
    NonLinearLigament pTFL_l: resting_length=0.03009273 pcsa_force=4.530965
      PathPoint TaloFibularPost_l_P1: tibia_l (-0.00118659 -0.411202 -0.0225417)
      PathPoint TaloFibularPost_l_P2: talus_l (-0.0184543 -0.0131749 -0.00397602)
    NonLinearLigament aTFL_l: resting_length=0.03016323 pcsa_force=47.52764
      PathPoint TaloFibularAnt_l_P1: tibia_l (0.0074568 -0.412098 -0.0214746)
      PathPoint TaloFibularAnt_l_P2: talus_l (0.0310623 -0.00540934 -0.00622887)
    NonLinearLigament CFL_l: resting_length=0.03571322 pcsa_force=10.12472
      PathPoint CalcaneoFibular_l_P1: tibia_l (0.00268358 -0.41337 -0.0223599)
      PathPoint CalcaneoFibular_l_P2: calcn_l (-0.0208839 -0.000432452 -0.0184585)
    NonLinearLigament PF_1_l: resting_length=0.1428954 pcsa_force=62.74039
      PathPoint PlantarFascia1Ph_l_P1: calcn_l (-0.0275355 -0.0366238 0.00232531)
      PathPoint PlantarFascia1Ph_l_P2: metatarsal_thumb_l (0.0802705 -0.0336952 0.020014)
      PathPoint PlantarFascia1Ph_l_P3: toes_thumb_l (0.0285412 -0.0149493 0.0195495)
      PathWrap: wrap_object=foot_arc_l method=hybrid range=(1 2)
    NonLinearLigament PF_2_l: resting_length=0.1440432 pcsa_force=62.74039
      PathPoint PlantarFascia2Ph_l_P1: calcn_l (-0.0275355 -0.0366238 0.00232531)
      PathPoint PlantarFascia2Ph_l_P2: metatarsal_index_l (0.084208 -0.0295263 0.00166878)
      PathPoint PlantarFascia2Ph_l_P3: toes_index_l (0.031291 -0.0155012 -0.00223852)
      PathWrap: wrap_object=foot_arc_l method=hybrid range=(1 2)
    NonLinearLigament PF_3_l: resting_length=0.1433489 pcsa_force=50.19231
      PathPoint PlantarFascia3Ph_l_P1: calcn_l (-0.0275355 -0.0366238 0.00232531)
      PathPoint PlantarFascia3Ph_l_P2: metatarsal_middle_l (0.0800839 -0.0307669 -0.0102765)
      PathPoint PlantarFascia3Ph_l_P3: toes_middle_l (0.0300564 -0.0164847 -0.0155201)
      PathWrap: wrap_object=foot_arc_l method=hybrid range=(1 2)
    NonLinearLigament PF_4_l: resting_length=0.1361232 pcsa_force=37.64423
      PathPoint PlantarFascia4Ph_l_P1: calcn_l (-0.0275355 -0.0366238 0.00232531)
      PathPoint PlantarFascia4Ph_l_P2: metatarsal_ring_l (0.0697689 -0.0323867 -0.0233028)
      PathPoint PlantarFascia4Ph_l_P3: toes_ring_l (0.021293 -0.0166385 -0.0276916)
      PathWrap: wrap_object=foot_arc_l method=hybrid range=(1 2)
    NonLinearLigament PF_5_l: resting_length=0.1281472 pcsa_force=37.64423
      PathPoint PlantarFascia5Ph_l_P1: calcn_l (-0.0275355 -0.0366238 0.00232531)
      PathPoint PlantarFascia5Ph_l_P2: metatarsal_tiny_l (0.0613046 -0.0345674 -0.0339621)
      PathPoint PlantarFascia5Ph_l_P3: toes_tiny_l (0.0104777 -0.0188946 -0.0374343)
      PathWrap: wrap_object=foot_arc_l method=hybrid range=(1 2)
    NonLinearLigament LP_1_l: resting_length=0.08037489 pcsa_force=5383.125
      PathPoint LongPlantar1_l_P1: calcn_l (-0.0181667 -0.0276516 -0.00733001)
      PathPoint LongPlantar1_l_P2: midfoot_l (0.0104999 -0.0232265 -0.00726157)
      PathPoint LongPlantar1_l_P3: metatarsal_index_l (0.0338695 -0.0104401 0.000430524)
      PathWrap: wrap_object=foot_arc_l method=hybrid
    NonLinearLigament LP_2_l: resting_length=0.07665424 pcsa_force=4037.344
      PathPoint LongPlantar2_l_P1: calcn_l (-0.0181667 -0.0276516 -0.00733001)
      PathPoint LongPlantar2_l_P2: midfoot_l (0.00598959 -0.0247439 -0.0120359)
      PathPoint LongPlantar2_l_P3: metatarsal_middle_l (0.0324274 -0.0158619 -0.00534792)
      PathWrap: wrap_object=foot_arc_l method=hybrid
    NonLinearLigament LP_3_l: resting_length=0.07153077 pcsa_force=2691.563
      PathPoint LongPlantar3_l_P1: calcn_l (-0.0181667 -0.0276516 -0.00733001)
      PathPoint LongPlantar3_l_P2: midfoot_l (0.00234681 -0.0252825 -0.0161043)
      PathPoint LongPlantar3_l_P3: metatarsal_ring_l (0.028156 -0.0202811 -0.0125907)
      PathWrap: wrap_object=foot_arc_l method=hybrid
    NonLinearLigament LP_4_l: resting_length=0.06388534 pcsa_force=1345.781
      PathPoint LongPlantar4_l_P1: calcn_l (-0.0181667 -0.0276516 -0.00733001)
      PathPoint LongPlantar4_l_P2: midfoot_l (-0.000481492 -0.0253272 -0.0200673)
      PathPoint LongPlantar4_l_P3: metatarsal_tiny_l (0.0195304 -0.0282905 -0.0245642)
      PathWrap: wrap_object=foot_arc_l method=hybrid
    NonLinearLigament pCN_1_l: resting_length=0.01968065 pcsa_force=1032.846
      PathPoint CalcaneoNavicularPlantar1Mus_l_P1: calcn_l (0.00244355 0.00604883 0.0176546)
      PathPoint CalcaneoNavicularPlantar1Mus_l_P2: midfoot_l (-0.00370625 0.00353066 0.0196283)
    NonLinearLigament pCN_2_l: resting_length=0.01213806 pcsa_force=1200
      PathPoint CalcaneoNavicularPlantar2Mus_rl_P1: calcn_l (0.00612203 0.00405856 0.0137232)
      PathPoint CalcaneoNavicularPlantar2Mus_rl_P2: midfoot_l (-0.00404604 0.000189331 0.0120556)
    NonLinearLigament pCN_3_l: resting_length=0.01040873 pcsa_force=1200
      PathPoint CalcaneoNavicularPlantar3Mus_l_P1: calcn_l (0.00813067 0.00270494 0.00851388)
      PathPoint CalcaneoNavicularPlantar3Mus_l_P2: midfoot_l (-0.0046 -0.000891338 0.00396327)
    NonLinearLigament pCC_1_l: resting_length=0.0176748 pcsa_force=1500
      PathPoint CalcaneoCuboidPlantar1Mus_l_P1: calcn_l (0.00420444 -0.0164583 -0.00932459)
      PathPoint CalcaneoCuboidPlantar1Mus_l_P2: midfoot_l (-0.00115008 -0.0210007 -0.0122584)
    NonLinearLigament pCC_2_l: resting_length=0.02296168 pcsa_force=1500
      PathPoint CalcaneoCuboidPlantar2Mus_l_P1: calcn_l (0.00500508 -0.0131643 -0.001273)
      PathPoint CalcaneoCuboidPlantar2Mus_l_P2: midfoot_l (0.00350242 -0.016266 -0.00646454)
    NonLinearLigament dCC_l: resting_length=0.0254301 pcsa_force=1032.846
      PathPoint CalcaneoCuboidDorsalMus_l_P1: calcn_l (0.00852641 -0.0013088 -0.0230188)
      PathPoint CalcaneoCuboidDorsalMus_l_P2: midfoot_l (0.0110404 -0.00144174 -0.0216943)
    NonLinearLigament dTN_1_l: resting_length=0.01163502 pcsa_force=500
      PathPoint TaloNavicularDorsal1Mus_l_P1: talus_l (0.0292092 -0.000290281 -0.000343318)
      PathPoint TaloNavicularDorsal1Mus_l_P2: midfoot_l (0.0075864 0.0220221 0.00102434)
    NonLinearLigament dTN_2_l: resting_length=0.01163503 pcsa_force=500
      PathPoint TaloNavicularDorsal2Mus_l_P1: talus_l (0.0284216 -0.000515714 0.00775697)
      PathPoint TaloNavicularDorsal2Mus_l_P2: midfoot_l (0.00679827 0.0217965 0.0091305)
    NonLinearLigament CNB_l: resting_length=0.01658527 pcsa_force=1032.846
      PathPoint CalcaneoNavicularBifurcateMus_l_P1: calcn_l (0.00945888 0.012521 -0.0143526)
      PathPoint CalcaneoNavicularBifurcateMus_l_P2: midfoot_l (0.00181286 0.0115785 -0.00919865)
    NonLinearLigament CCB_l: resting_length=0.01421557 pcsa_force=1032.846
      PathPoint CalcaneoCuboidBifurcateMus_l_P1: calcn_l (0.00945888 0.012521 -0.0143526)
      PathPoint CalcaneoCuboidBifurcateMus_l_P2: midfoot_l (0.000186419 0.00229411 -0.0189838)
    NonLinearLigament dTM_1_l: resting_length=0.01270928 pcsa_force=500
      PathPoint TarsoMetatarsalDorsal1Mus_l_P1: midfoot_l (0.0390058 0.010053 0.00951474)
      PathPoint TarsoMetatarsalDorsal1Mus_l_P2: metatarsal_thumb_l (0.050188 0.0051235 0.0119872)
    NonLinearLigament dTM_2_l: resting_length=0.00963108 pcsa_force=500
      PathPoint TarsoMetatarsalDorsal3Mus_l_P1: midfoot_l (0.029294 0.0129735 -0.00158232)
      PathPoint TarsoMetatarsalDorsal3Mus_l_P2: metatarsal_index_l (0.0376257 0.0090481 -0.00418376)
    NonLinearLigament dTM_3_l: resting_length=0.006844048 pcsa_force=200
      PathPoint TarsoMetatarsalDorsal5Mus_l_P1: midfoot_l (0.0278987 0.00326289 -0.0163474)
      PathPoint TarsoMetatarsalDorsal5Mus_l_P2: metatarsal_middle_l (0.0339175 0.000408797 -0.0176699)
    NonLinearLigament dTM_4_l: resting_length=0.008525458 pcsa_force=500
      PathPoint TarsoMetatarsalDorsal7Mus_l_P1: midfoot_l (0.0166846 -0.00628082 -0.0248664)
      PathPoint TarsoMetatarsalDorsal7Mus_l_P2: metatarsal_ring_l (0.0247783 -0.00873345 -0.0253998)
    NonLinearLigament dTM_5_l: resting_length=0.007326688 pcsa_force=500
      PathPoint TarsoMetatarsalDorsal8Mus_l_P1: midfoot_l (0.0101285 -0.0129898 -0.0297071)
      PathPoint TarsoMetatarsalDorsal8Mus_l_P2: metatarsal_tiny_l (0.0153747 -0.0173038 -0.0324203)
    NonLinearLigament pTM_1_l: resting_length=0.009031561 pcsa_force=1032
      PathPoint TarsoMetatarsalPlantar1Mus_l_P1: midfoot_l (0.0291184 -0.0186954 0.0108993)
      PathPoint TarsoMetatarsalPlantar1Mus_l_P2: metatarsal_thumb_l (0.0379767 -0.0197885 0.0107877)
    NonLinearLigament pTM_2_l: resting_length=0.007447147 pcsa_force=20913.46
      PathPoint TarsoMetatarsalPlantar2Mus_l_P1: midfoot_l (0.0234495 -0.00879685 0.00157792)
      PathPoint TarsoMetatarsalPlantar2Mus_l_P2: metatarsal_index_l (0.0304055 -0.0109011 0.000399114)
    NonLinearLigament pTM_3_l: resting_length=0.006973724 pcsa_force=20913.46
      PathPoint TarsoMetatarsalPlantar3Mus_l_P1: midfoot_l (0.0231265 -0.0150134 -0.0033194)
      PathPoint TarsoMetatarsalPlantar3Mus_l_P2: metatarsal_middle_l (0.0296081 -0.0159227 -0.00547775)
    NonLinearLigament pTM_4_l: resting_length=0.007668514 pcsa_force=500
      PathPoint TarsoMetatarsalPlantar4Mus_l_P1: midfoot_l (0.0181682 -0.0200681 -0.0124725)
      PathPoint TarsoMetatarsalPlantar4Mus_l_P2: metatarsal_ring_l (0.0257273 -0.0200375 -0.0135631)
    NonLinearLigament pTM_5_l: resting_length=0.008966995 pcsa_force=500
      PathPoint TarsoMetatarsalPlantar5Mus_l_P1: midfoot_l (0.0088541 -0.0235376 -0.020535)
      PathPoint TarsoMetatarsalPlantar5Mus_l_P2: metatarsal_tiny_l (0.0164051 -0.027351 -0.0235243)
    NonLinearLigament dIC_1_l: resting_length=0.009 pcsa_force=500
      PathPoint DorsalIntercuniform_1_l_P1: midfoot_l (0.0319472 0.0147679 0.0115791)
      PathPoint DorsalIntercuniform_1_l_P2: midfoot_l (0.030507 0.0162672 0.00593917)
    NonLinearLigament dIC_2_l: resting_length=0.0091 pcsa_force=500
      PathPoint DorsalIntercuniform_2_l_P1: midfoot_l (0.0257356 0.0127444 -0.00354823)
      PathPoint DorsalIntercuniform_2_l_P2: midfoot_l (0.0218264 0.00817921 -0.00848038)
    NonLinearLigament dCN_l: resting_length=0.02126 pcsa_force=1032.846
      PathPoint DorsalCuboideoNavicular_l_P1: midfoot_l (0.00285975 0.0113669 -0.00975216)
      PathPoint DorsalCuboideoNavicular_l_P2: midfoot_l (0.00143 0.00192793 -0.0198535)
    NonLinearLigament dML_1_l: resting_length=0.02126 pcsa_force=1032.846
      PathPoint DorsalMetatarsal_1_l_P1: midfoot_l (0.0491997 0.00771677 0.00645745)
      PathPoint DorsalMetatarsal_1_l_P2: midfoot_l (0.0466325 0.00860943 0.00209145)
    NonLinearLigament dML_2_l: resting_length=0.02126 pcsa_force=1032.846
      PathPoint DorsalMetatarsal_2_l_P1: midfoot_l (0.041594 0.00626051 -0.00734275)
      PathPoint DorsalMetatarsal_2_l_P2: midfoot_l (0.0402447 0.00413145 -0.0112543)
    NonLinearLigament dML_3_l: resting_length=0.02126 pcsa_force=1032.846
      PathPoint DorsalMetatarsal_3_l_P1: midfoot_l (0.0349343 -0.00183344 -0.0183704)
      PathPoint DorsalMetatarsal_3_l_P2: midfoot_l (0.0321748 -0.00408147 -0.020423)
    NonLinearLigament dML_4_l: resting_length=0.02126 pcsa_force=1032.846
      PathPoint DorsalMetatarsal_4_l_P1: midfoot_l (0.0252339 -0.0102739 -0.0256174)
      PathPoint DorsalMetatarsal_4_l_P2: midfoot_l (0.021191 -0.0129912 -0.0280654)
    NonLinearLigament dCNL_1_l: resting_length=0.02126 pcsa_force=1032.846
      PathPoint DorsalCunoNavicular_1_l_P1: midfoot_l (0.025999 0.0108388 0.0187366)
      PathPoint DorsalCunoNavicular_1_l_P2: midfoot_l (0.0142807 0.014084 0.0189745)
    NonLinearLigament dCNL_2_l: resting_length=0.02126 pcsa_force=1032.846
      PathPoint DorsalCunoNavicular_2_l_P1: midfoot_l (0.0247808 0.0177889 0.00190732)
      PathPoint DorsalCunoNavicular_2_l_P2: midfoot_l (0.0164874 0.0198218 0.00467995)
    NonLinearLigament dCNL_3_l: resting_length=0.02126 pcsa_force=1032.846
      PathPoint DorsalCunoNavicular_3_l_P1: midfoot_l (0.0168627 0.0090386 -0.00813969)
      PathPoint DorsalCunoNavicular_3_l_P2: midfoot_l (0.0120569 0.0153445 -0.00184975)
    NonLinearLigament dCCL_1_l: resting_length=0.02126 pcsa_force=1032.846
      PathPoint DorsalCunoCuboid_1_l_P1: midfoot_l (0.0146517 0.00586964 -0.0129033)
      PathPoint DorsalCunoCuboid_1_l_P2: midfoot_l (0.0109795 0.00304673 -0.0154069)
    NonLinearLigament dCCL_2_l: resting_length=0.02126 pcsa_force=1032.846
      PathPoint DorsalCunoCuboid_2_l_P1: midfoot_l (0.0208831 0.00330777 -0.0164184)
      PathPoint DorsalCunoCuboid_2_l_P2: midfoot_l (0.0191557 -7.98929e-5 -0.0194493)
    NonLinearLigament ITC_1_l: resting_length=0.02126 pcsa_force=1032.846
      PathPoint InterosseousTaloCalcaneal_1_l_P1: talus_l (0.0116421 -0.0101382 -0.013855)
      PathPoint InterosseousTaloCalcaneal_1_l_P2: calcn_l (0.00260842 0.0110176 -0.0163646)
    NonLinearLigament ITC_2_l: resting_length=0.02126 pcsa_force=1032.846
      PathPoint InterosseousTaloCalcaneal_2_l_P1: talus_l (0.00290426 -0.014187 -0.0162432)
      PathPoint InterosseousTaloCalcaneal_2_l_P2: calcn_l (-0.00797748 0.010375 -0.0179537)
    NonLinearLigament lTC_l: resting_length=0.02126 pcsa_force=1032.846
      PathPoint LateralTaloCalcaneal_l_P1: talus_l (-0.00510084 -0.00989481 -0.0131079)
      PathPoint LateralTaloCalcaneal_l_P2: calcn_l (-0.0193342 0.0160904 -0.0147129)
    NonLinearLigament mTC_l: resting_length=0.02126 pcsa_force=1032.846
      PathPoint MedialTaloCalcaneal_l_P1: talus_l (-0.00417094 -0.0103653 0.0201655)
      PathPoint MedialTaloCalcaneal_l_P2: calcn_l (-0.00756578 0.0155551 0.0222374)
    NonLinearLigament pTC_l: resting_length=0.02126 pcsa_force=1032.846
      PathPoint PosteriorTaloCalcaneal_l_P1: talus_l (-0.0192493 -0.0142367 0.00299414)
      PathPoint PosteriorTaloCalcaneal_l_P2: calcn_l (-0.0342048 0.0114776 0.00313566)
    NonLinearLigament lCL_1_l: resting_length=0.02126 pcsa_force=1032.846
      PathPoint LateralCollateralNonLinearLigament_1_l_P1: midfoot_l (0.104124 -0.0354529 0.0301677)
      PathPoint LateralCollateralNonLinearLigament_1_l_P2: midfoot_l (0.08537 -0.0222791 0.0330036)
      PathWrap: wrap_object=metatarsal_thumb_shaft_l method=hybrid range=(1 2)
    NonLinearLigament lCL_2_l: resting_length=0.02126 pcsa_force=1032.846
      PathPoint LateralCollateralNonLinearLigament_2_l_P1: midfoot_l (0.102923 -0.0268457 0.00205626)
      PathPoint LateralCollateralNonLinearLigament_2_l_P2: midfoot_l (0.089466 -0.0204712 0.00219725)
      PathWrap: wrap_object=metatarsal_index_shaft_l method=hybrid range=(1 2)
    NonLinearLigament lCL_3_l: resting_length=0.02126 pcsa_force=1032.846
      PathPoint LateralCollateralNonLinearLigament_3_l_P1: midfoot_l (0.0977761 -0.0273278 -0.010206)
      PathPoint LateralCollateralNonLinearLigament_3_l_P2: midfoot_l (0.0853982 -0.0215443 -0.0087482)
      PathWrap: wrap_object=metatarsal_middle_shaft_l method=hybrid range=(1 2)
    NonLinearLigament lCL_4_l: resting_length=0.02126 pcsa_force=1032.846
      PathPoint LateralCollateralNonLinearLigament_4_l_P1: midfoot_l (0.0945212 -0.0271666 -0.0276808)
      PathPoint LateralCollateralNonLinearLigament_4_l_P2: midfoot_l (0.0803921 -0.0214604 -0.0202973)
      PathWrap: wrap_object=metatarsal_ring_shaft_l method=hybrid range=(1 2)
    NonLinearLigament lCL_5_l: resting_length=0.02126 pcsa_force=1032.846
      PathPoint LateralCollateralNonLinearLigament_5_l_P1: midfoot_l (0.075441 -0.024929 -0.0372744)
      PathPoint LateralCollateralNonLinearLigament_5_l_P2: midfoot_l (0.0664109 -0.0211602 -0.0341938)
      PathWrap: wrap_object=metatarsal_tiny_shaft_l method=hybrid range=(1 2)
    NonLinearLigament mCL_1_l: resting_length=0.02126 pcsa_force=1032.846
      PathPoint MedialCollateralNonLinearLigament_1_l_P1: midfoot_l (0.103016 -0.0306978 0.0147142)
      PathPoint MedialCollateralNonLinearLigament_1_l_P2: midfoot_l (0.0839977 -0.0205905 0.0151159)
      PathWrap: wrap_object=metatarsal_thumb_shaft_l method=hybrid range=(1 2)
    NonLinearLigament mCL_2_l: resting_length=0.02126 pcsa_force=1032.846
      PathPoint MedialCollateralNonLinearLigament_2_l_P1: midfoot_l (0.101967 -0.0291965 -0.00627648)
      PathPoint MedialCollateralNonLinearLigament_2_l_P2: midfoot_l (0.0885095 -0.022822 -0.00613549)
      PathWrap: wrap_object=metatarsal_index_shaft_l method=hybrid range=(1 2)
    NonLinearLigament mCL_3_l: resting_length=0.02126 pcsa_force=1032.846
      PathPoint MedialCollateralNonLinearLigament_3_l_P1: midfoot_l (0.0999555 -0.0282369 -0.0190623)
      PathPoint MedialCollateralNonLinearLigament_3_l_P2: midfoot_l (0.0859268 -0.0223106 -0.0203996)
      PathWrap: wrap_object=metatarsal_middle_shaft_l method=hybrid range=(1 2)
    NonLinearLigament mCL_4_l: resting_length=0.02126 pcsa_force=1032.846
      PathPoint MedialCollateralNonLinearLigament_4_l_P1: midfoot_l (0.09357 -0.0256432 -0.0335066)
      PathPoint MedialCollateralNonLinearLigament_4_l_P2: midfoot_l (0.0779622 -0.020367 -0.0308402)
      PathWrap: wrap_object=metatarsal_ring_shaft_l method=hybrid range=(1 2)
    NonLinearLigament mCL_5_l: resting_length=0.02126 pcsa_force=1032.846
      PathPoint MedialCollateralNonLinearLigament_5_l_P1: midfoot_l (0.0749478 -0.0243037 -0.0486536)
      PathPoint MedialCollateralNonLinearLigament_5_l_P2: midfoot_l (0.0640944 -0.0203239 -0.0476806)
      PathWrap: wrap_object=metatarsal_tiny_shaft_l method=hybrid range=(1 2)
    NonLinearLigament TPS_l: resting_length=0.02126 pcsa_force=1032.846
      PathPoint TibialPhalangeoSesmoid_l_P1: midfoot_l (0.102886 -0.0350169 0.0272161)
      PathPoint TibialPhalangeoSesmoid_l_P2: midfoot_l (0.0857537 -0.0406479 0.028141)
      PathWrap: wrap_object=metatarsal_tiny_shaft_l method=hybrid range=(1 2)
    NonLinearLigament FPS_l: resting_length=0.02126 pcsa_force=1032.846
      PathPoint FibularPhalangeoSesmoid_l_P1: midfoot_l (0.103481 -0.0348116 0.0182181)
      PathPoint FibularPhalangeoSesmoid_l_P2: midfoot_l (0.084027 -0.0378106 0.0137156)
      PathWrap: wrap_object=metatarsal_tiny_shaft_l method=hybrid range=(1 2)
    Millard2012EquilibriumMuscle plant_r: max_isometric_force=1029.787 optimal_fiber_length=0.026
        tendon_slack_length=0.1149062 pennation_angle_at_optimal=0.1745329
      PathPoint P1: femur_r (-0.0163159 -0.403 0.007)
      PathPoint P2: tibia_r (-0.0138914 -0.11663 -0.00736481)
      PathPoint P3: calcn_r (-0.0506681 0.00231794 -0.0100649)
      PathWrap: wrap_object=CurveForPop_r method=hybrid
    Millard2012EquilibriumMuscle pop_r: max_isometric_force=1029.787 optimal_fiber_length=0.026
        tendon_slack_length=0.1149062 pennation_angle_at_optimal=0.1745329
      PathPoint P1: femur_r (-0.000911328 -0.407892 0.0370887)
      PathPoint P2: tibia_r (-0.00337914 -0.111264 -0.0190476)
      PathWrap: wrap_object=CurveForPop_r method=hybrid
    Millard2012EquilibriumMuscle obtext_r: max_isometric_force=1029.787 optimal_fiber_length=0.026
        tendon_slack_length=0.1149062 pennation_angle_at_optimal=0.1745329
      PathPoint P1: pelvis (-0.0900563 -0.102108 0.0332323)
      PathPoint P2: pelvis (-0.112336 -0.0968799 0.0654751)
      PathPoint P3: femur_r (-0.034 0 0.042)
    Millard2012EquilibriumMuscle obtint_r: max_isometric_force=1029.787 optimal_fiber_length=0.026
        tendon_slack_length=0.1149062 pennation_angle_at_optimal=0.1745329
      PathPoint P1: pelvis (-0.0955804 -0.105986 0.0271833)
      PathPoint P2: pelvis (-0.125996 -0.0633751 0.0573188)
      PathPoint P3: femur_r (-0.034 -0.000310327 0.0421179)
    Millard2012EquilibriumMuscle supgemel_r: max_isometric_force=625.8197 optimal_fiber_length=0.1031
        tendon_slack_length=0.03545029 pennation_angle_at_optimal=0.1147809 ignore_tendon_compliance=true
      PathPoint P1: pelvis (-0.124976 -0.0550287 0.0557445)
      PathPoint P2: femur_r (-0.0339646 0.000244507 0.0418415)
      PathWrap: wrap_object=AB_at_femshaft_r method=hybrid
    Millard2012EquilibriumMuscle infgemel_r: max_isometric_force=625.8197 optimal_fiber_length=0.1031
        tendon_slack_length=0.03545029 pennation_angle_at_optimal=0.1147809 ignore_tendon_compliance=true
      PathPoint P1: pelvis (-0.124977 -0.070286 0.0611584)
      PathPoint P2: femur_r (-0.0339646 0.000244507 0.0418415)
      PathWrap: wrap_object=AB_at_femshaft_r method=hybrid
    Millard2012EquilibriumMuscle addbrev_r: max_isometric_force=625.8197 optimal_fiber_length=0.1031
        tendon_slack_length=0.03545029 pennation_angle_at_optimal=0.1147809 ignore_tendon_compliance=true
      PathPoint P1: pelvis (-0.0439477 -0.0877376 0.0154)
      PathPoint P2: femur_r (-0.002 -0.118 0.0249)
      PathWrap: wrap_object=AB_at_femshaft_r method=hybrid
    Millard2012EquilibriumMuscle addlong_r: max_isometric_force=916.8 optimal_fiber_length=0.1082
        tendon_slack_length=0.1317994 pennation_angle_at_optimal=0.1377704
      PathPoint P1: pelvis (-0.0334709 -0.083327 0.0231461)
      PathPoint P2: femur_r (0.01126 -0.23937 0.01583)
      PathWrap: wrap_object=AL_at_femshaft_r method=hybrid
    Millard2012EquilibriumMuscle addmagDist_r: max_isometric_force=597.2951 optimal_fiber_length=0.1772
        tendon_slack_length=0.0873807 pennation_angle_at_optimal=0.194705 ignore_tendon_compliance=true
      PathPoint P1: pelvis (-0.0982827 -0.118009 0.0364857)
      PathPoint P2: femur_r (0.01125 -0.2625 0.0193)
      PathWrap: wrap_object=AMdist_at_femshaft_r method=hybrid
    Millard2012EquilibriumMuscle addmagIsch_r: max_isometric_force=597.2951 optimal_fiber_length=0.1562
        tendon_slack_length=0.216343 pennation_angle_at_optimal=0.1680443
      PathPoint P1: pelvis (-0.111596 -0.11237 0.0503821)
      PathPoint P2: femur_r (0.00481 -0.38797 -0.03273)
      PathWrap: wrap_object=AMisch_at_condyles_r method=hybrid
    Millard2012EquilibriumMuscle addmagMid_r: max_isometric_force=597.2951 optimal_fiber_length=0.1377
        tendon_slack_length=0.0466277 pennation_angle_at_optimal=0.2073076 ignore_tendon_compliance=true
      PathPoint P1: pelvis (-0.104854 -0.0935359 0.0334797)
      PathPoint P2: femur_r (0.00242 -0.1624 0.02922)
      PathWrap: wrap_object=AMmid_at_femshaft_r method=hybrid
    Millard2012EquilibriumMuscle addmagProx_r: max_isometric_force=597.2951 optimal_fiber_length=0.1056
        tendon_slack_length=0.0403241 pennation_angle_at_optimal=0.3114833 ignore_tendon_compliance=true
      PathPoint P1: pelvis (-0.057396 -0.0975127 0.0166078)
      PathPoint P2: femur_r (-0.01527 -0.07886 0.03202)
      PathWrap: wrap_object=AMprox_at_femshaft_r method=hybrid
    Millard2012EquilibriumMuscle bflh_r: max_isometric_force=1313.184 optimal_fiber_length=0.0976
        tendon_slack_length=0.3252266 pennation_angle_at_optimal=0.1759182
      PathPoint P1: pelvis (-0.119995 -0.102057 0.0665738)
      PathPoint P2: tibia_r (-0.0337 -0.05 0.0253)
      PathPoint P3: tibia_r (-0.02 -0.064 0.0303)
    Millard2012EquilibriumMuscle bfsh_r: max_isometric_force=557.1148 optimal_fiber_length=0.1103
        tendon_slack_length=0.1058172 pennation_angle_at_optimal=0.2642232 ignore_tendon_compliance=true
      PathPoint P1: femur_r (0.005 -0.2111 0.0234)
      PathPoint P2: tibia_r (-0.016 -0.055 0.0318)
      PathWrap: wrap_object=KnExt_at_fem_r method=hybrid
      PathWrap: wrap_object=BF_at_gastroc_r method=hybrid
    Millard2012EquilibriumMuscle edl_r: max_isometric_force=603.4982 optimal_fiber_length=0.0693
        tendon_slack_length=0.3688752 pennation_angle_at_optimal=0.2182582
      PathPoint P1: tibia_r (-0.00815081 -0.107299 0.0236361)
      PathPoint P2: tibia_r (0.0245218 -0.394461 0.0112535)
      PathPoint P3: midfoot_r (0.0173397 0.0136128 0.00531902)
      PathPoint P4: metatarsal_middle_r (0.0860438 -0.013951 0.0126508)
      PathPoint P5: toes_middle_r (0.0433047 -0.00586433 0.0119644)
      PathPoint P6: toes_middle_r (0.0688482 -0.0129012 0.0128164)
    Millard2012EquilibriumMuscle ehl_r: max_isometric_force=285.8675 optimal_fiber_length=0.0748
        tendon_slack_length=0.3267953 pennation_angle_at_optimal=0.1972681
      PathPoint P1: tibia_r (-0.014 -0.155 0.0189)
      PathPoint P2: tibia_r (0.0071 -0.2909 0.0164)
      PathPoint P3: tibia_r (0.0269177 -0.368705 -0.00383986)
      PathPoint P4: midfoot_r (0.00776853 0.0226929 -0.0146486)
      PathPoint P5: metatarsal_thumb_r (0.0466522 0.00860074 -0.0179175)
      PathPoint P6: metatarsal_thumb_r (0.0846327 -0.0108528 -0.0224557)
      PathPoint P7: toes_thumb_r (0.044844 -0.00355079 -0.0244511)
      PathPoint P8: toes_thumb_r (0.0719011 -0.0170324 -0.0231619)
    Millard2012EquilibriumMuscle fdl_r: max_isometric_force=423.177 optimal_fiber_length=0.0446
        tendon_slack_length=0.3787729 pennation_angle_at_optimal=0.2248391
      PathPoint P1: tibia_r (-0.0023 -0.1832 -0.0018)
      PathPoint P2: tibia_r (-0.0194368 -0.382242 -0.0186896)
      PathPoint P3: calcn_r (-0.0196418 0.0221172 -0.0236764)
      PathPoint P4: calcn_r (0.00756481 0.0119019 -0.022266)
      PathPoint P5: calcn_r (0.108208 -0.0266744 0.00646334)
      PathPoint P6: toes_middle_r (0.0375803 -0.0174368 0.00757495)
      PathPoint P7: toes_middle_r (0.0582309 -0.0168156 0.0111677)
      PathPoint P8: toes_middle_r (0.065807 -0.0214924 0.0123115)
    Millard2012EquilibriumMuscle fhl_r: max_isometric_force=907.8393 optimal_fiber_length=0.0527
        tendon_slack_length=0.3543397 pennation_angle_at_optimal=0.2580255
      PathPoint P1: tibia_r (-0.0104682 -0.217301 0.0254238)
      PathPoint P2: tibia_r (-0.0257814 -0.383845 -0.0145153)
      PathPoint P3: calcn_r (-0.0254347 0.0144456 -0.0201117)
      PathPoint P4: calcn_r (0.0485899 -0.00639706 -0.0259926)
      PathPoint P5: calcn_r (0.0983615 -0.0240437 -0.0225333)
      PathPoint P6: toes_thumb_r (0.0391025 -0.0252048 -0.0237208)
      PathPoint P7: toes_thumb_r (0.0686948 -0.0292111 -0.0236109)
      PathWrap: wrap_object=foot_arc_r method=hybrid
    Millard2012EquilibriumMuscle gaslat_r: max_isometric_force=1575.059 optimal_fiber_length=0.0588
        tendon_slack_length=0.3760702 pennation_angle_at_optimal=0.2102268
      PathPoint P1: femur_r (-0.003 -0.3814 0.0277)
      PathPoint P2: calcn_r (-0.0516794 0.0040736 0.000268027)
      PathWrap shank: wrap_object=GasLat_at_shank_r method=hybrid
      PathWrap condyles: wrap_object=Gastroc_at_condyles_r method=hybrid
    Millard2012EquilibriumMuscle gasmed_r: max_isometric_force=3115.515 optimal_fiber_length=0.051
        tendon_slack_length=0.3987163 pennation_angle_at_optimal=0.1656816
      PathPoint P1: femur_r (0.007 -0.3788 -0.0208)
      PathPoint P2: calcn_r (-0.052 0.005 -0.00063087)
      PathWrap shank: wrap_object=GasMed_at_shank_r method=hybrid
      PathWrap condyles: wrap_object=Gastroc_at_condyles_r method=hybrid
    Millard2012EquilibriumMuscle glmax1_r: max_isometric_force=983.7836 optimal_fiber_length=0.147
        tendon_slack_length=0.04884089 pennation_angle_at_optimal=0.3540118 ignore_tendon_compliance=true
      PathPoint P1: pelvis (-0.129765 0.0392182 0.0674688)
      PathPoint P2: pelvis (-0.13327 -0.0201457 0.0779001)
      PathPoint P3: femur_r (-0.0444 -0.0326 0.0302)
      PathPoint P4: femur_r (-0.0277 -0.0566 0.047)
      PathWrap: wrap_object=Gmax1_at_pelvis_r method=hybrid
    Millard2012EquilibriumMuscle glmax2_r: max_isometric_force=1406.046 optimal_fiber_length=0.157
        tendon_slack_length=0.06788715 pennation_angle_at_optimal=0.3673821 ignore_tendon_compliance=true
      PathPoint P1: pelvis (-0.135457 0.0252205 0.0596693)
      PathPoint P2: pelvis (-0.138973 -0.0482697 0.0737967)
      PathPoint P3: femur_r (-0.045 -0.0584 0.0252)
      PathPoint P4: femur_r (-0.0156 -0.1016 0.0419)
      PathWrap: wrap_object=Gmax2_at_pelvis_r method=hybrid
    Millard2012EquilibriumMuscle glmax3_r: max_isometric_force=947.7541 optimal_fiber_length=0.167
        tendon_slack_length=0.06971661 pennation_angle_at_optimal=0.3824161 ignore_tendon_compliance=true
      PathPoint P1: pelvis (-0.152197 -0.0323299 0.00618306)
      PathPoint P2: pelvis (-0.143731 -0.0997843 0.0479597)
      PathPoint P3: femur_r (-0.0281 -0.1125 0.0094)
      PathPoint P4: femur_r (-0.006 -0.1419 0.0411)
      PathWrap: wrap_object=Gmax3_at_pelvis_r method=hybrid
    Millard2012EquilibriumMuscle glmed1_r: max_isometric_force=1093.467 optimal_fiber_length=0.073
        tendon_slack_length=0.05581683 pennation_angle_at_optimal=0.3165559 ignore_tendon_compliance=true
      PathPoint P1: pelvis (-0.0445 0.0245 0.1172)
      PathPoint P2: femur_r (-0.0218 -0.0117 0.0555)
    Millard2012EquilibriumMuscle glmed2_r: max_isometric_force=765.0917 optimal_fiber_length=0.073
        tendon_slack_length=0.06524881 pennation_angle_at_optimal=0.3165559 ignore_tendon_compliance=true
      PathPoint P1: pelvis (-0.085 0.04 0.076)
      PathPoint P2: femur_r (-0.0258 -0.0058 0.0527)
    Millard2012EquilibriumMuscle glmed3_r: max_isometric_force=871.1993 optimal_fiber_length=0.073
        tendon_slack_length=0.04523284 pennation_angle_at_optimal=0.3165559 ignore_tendon_compliance=true
      PathPoint P1: pelvis (-0.117 0.005 0.065)
      PathPoint P2: femur_r (-0.0309 -0.0047 0.0518)
    Millard2012EquilibriumMuscle glmin1_r: max_isometric_force=374.0459 optimal_fiber_length=0.068
        tendon_slack_length=0.01613778 pennation_angle_at_optimal=0.1745329 ignore_tendon_compliance=true
      PathPoint P1: pelvis (-0.0542364 0.000821798 0.108207)
      PathPoint P2: femur_r (-0.0072 -0.0104 0.056)
    Millard2012EquilibriumMuscle glmin2_r: max_isometric_force=394.8197 optimal_fiber_length=0.056
        tendon_slack_length=0.02609905 pennation_angle_at_optimal=0 ignore_tendon_compliance=true
      PathPoint P1: pelvis (-0.0616 -0.0142 0.0971)
      PathPoint P2: femur_r (-0.0096 -0.0104 0.056)
    Millard2012EquilibriumMuscle glmin3_r: max_isometric_force=446.7738 optimal_fiber_length=0.038
        tendon_slack_length=0.0508725 pennation_angle_at_optimal=0.01745329
      PathPoint P1: pelvis (-0.0872452 -0.00529729 0.0871071)
      PathPoint P2: femur_r (-0.0135 -0.0083 0.055)
    Millard2012EquilibriumMuscle grac_r: max_isometric_force=281.3115 optimal_fiber_length=0.2278
        tendon_slack_length=0.1720138 pennation_angle_at_optimal=0.1720016 ignore_tendon_compliance=true
      PathPoint P1: pelvis (-0.0775541 -0.117721 0.0281046)
      PathPoint P2: tibia_r (-0.01842 -0.06 -0.02961)
      PathPoint P3: tibia_r (0.004 -0.08 -0.024)
      PathWrap: wrap_object=GR_at_condyles_r method=hybrid
    Millard2012EquilibriumMuscle iliacus_r: max_isometric_force=1021.141 optimal_fiber_length=0.1066
        tendon_slack_length=0.09612071 pennation_angle_at_optimal=0.279914 ignore_tendon_compliance=true
      PathPoint P1: pelvis (-0.0605 0.0309 0.0843)
      PathPoint P2: pelvis (-0.0135 -0.0557 0.0756)
      PathPoint P3: femur_r (-0.0023 -0.0565 0.0139)
      PathPoint P4: femur_r (-0.0122 -0.0637 0.0196)
      PathWrap: wrap_object=IL_at_brim_r method=hybrid range=(2 3)
    Millard2012EquilibriumMuscle perbrev_r: max_isometric_force=521.2016 optimal_fiber_length=0.0454
        tendon_slack_length=0.1475275 pennation_angle_at_optimal=0.2052361
      PathPoint P1: tibia_r (-0.00946867 -0.280785 0.0305666)
      PathPoint P2: tibia_r (-0.0226955 -0.414689 0.022146)
      PathPoint P3: tibia_r (-0.0172946 -0.425043 0.0227459)
      PathPoint P4: calcn_r (-0.00522246 -0.00147057 0.0217782)
      PathPoint P5: metatarsal_tiny_r (0.0121598 -0.0142043 0.0285174)
    Millard2012EquilibriumMuscle perlong_r: max_isometric_force=1115.371 optimal_fiber_length=0.0508
        tendon_slack_length=0.3322208 pennation_angle_at_optimal=0.2479525
      PathPoint P1: tibia_r (-0.00805693 -0.15672 0.0318912)
      PathPoint P2: tibia_r (-0.0249911 -0.413945 0.020913)
      PathPoint P3: tibia_r (-0.0182955 -0.427118 0.0212462)
      PathPoint P4: calcn_r (-0.00685002 -0.00703197 0.0216483)
      PathPoint P5: calcn_r (0.0261765 -0.015483 0.0240729)
      PathPoint P6: calcn_r (0.0407109 -0.012976 0.0117621)
      PathPoint P7: calcn_r (0.0593345 -0.00893889 -0.00741512)
    Millard2012EquilibriumMuscle piri_r: max_isometric_force=1029.787 optimal_fiber_length=0.026
        tendon_slack_length=0.1149062 pennation_angle_at_optimal=0.1745329
      PathPoint P1: pelvis (-0.111668 0.0126412 0.0132939)
      PathPoint P2: pelvis (-0.111856 -0.015923 0.0693642)
      PathPoint P3: femur_r (-0.0148 -0.0036 0.0437)
    Millard2012EquilibriumMuscle psoas_r: max_isometric_force=1426.79 optimal_fiber_length=0.1169
        tendon_slack_length=0.09954317 pennation_angle_at_optimal=0.2155251 ignore_tendon_compliance=true
      PathPoint P1: pelvis (-0.0606 0.062 0.039)
      PathPoint P2: pelvis (-0.023346 -0.0491274 0.0659038)
      PathPoint P3: femur_r (-0.0132 -0.0467 0.0046)
      PathPoint P4: femur_r (-0.0235 -0.0524 0.0088)
      PathWrap: wrap_object=PS_at_brim_r method=hybrid range=(2 3)
    Millard2012EquilibriumMuscle recfem_r: max_isometric_force=2191.741 optimal_fiber_length=0.0759
        tendon_slack_length=0.4484935 pennation_angle_at_optimal=0.2170149
      PathPoint P1: pelvis (-0.0301342 -0.0299852 0.0928736)
      PathPoint P2: patella_r (0.01 0.049 0.0007)
      PathPoint P3: patella_r (0.0121 0.0437 -0.001)
      PathPoint P4: patella_r (0.005 0.00247 3e-5)
      PathPoint P5: tibia_r (0.0326 -0.06312 -0.00047)
      PathWrap: wrap_object=KnExt_at_fem_r method=hybrid
    Millard2012EquilibriumMuscle sart_r: max_isometric_force=249.4131 optimal_fiber_length=0.403
        tendon_slack_length=0.1239998 pennation_angle_at_optimal=0.02613542 ignore_tendon_compliance=true
      PathPoint P1: pelvis (-0.0195 -0.0156 0.1056)
      PathPoint P2: femur_r (-0.00900344 -0.359612 -0.0439824)
      PathPoint P3: tibia_r (-0.0258575 -0.05 -0.041)
      PathPoint P4: tibia_r (-0.0103979 -0.0688812 -0.0345948)
      PathPoint P5: tibia_r (0.0216522 -0.0853148 -0.0243826)
    Millard2012EquilibriumMuscle semimem_r: max_isometric_force=2200.987 optimal_fiber_length=0.069
        tendon_slack_length=0.347586 pennation_angle_at_optimal=0.2545615
      PathPoint P1: pelvis (-0.116726 -0.103662 0.0650029)
      PathPoint P2: tibia_r (-0.029 -0.0417 -0.0196)
      PathWrap: wrap_object=SM_at_condyles_r method=hybrid
    Millard2012EquilibriumMuscle semiten_r: max_isometric_force=591.2951 optimal_fiber_length=0.193
        tendon_slack_length=0.2471989 pennation_angle_at_optimal=0.241295
      PathPoint P1: pelvis (-0.128319 -0.103381 0.0500422)
      PathPoint P2: tibia_r (-0.028 -0.054 -0.0229)
      PathPoint P3: tibia_r (0.00060944 -0.078266 -0.024)
      PathWrap: wrap_object=ST_at_condyles_r method=hybrid
    Millard2012EquilibriumMuscle soleus_r: max_isometric_force=6194.843 optimal_fiber_length=0.044
        tendon_slack_length=0.2767559 pennation_angle_at_optimal=0.3814289
      PathPoint P1: tibia_r (-0.0107127 -0.104527 0.00653212)
      PathPoint P2: calcn_r (-0.0515518 0.00906752 0.000745684)
    Millard2012EquilibriumMuscle tfl_r: max_isometric_force=411.2066 optimal_fiber_length=0.095
        tendon_slack_length=0.4494971 pennation_angle_at_optimal=0.05235988
      PathPoint P1: pelvis (-0.0321939 0.0325173 0.123616)
      PathPoint P2: femur_r (0.0294 -0.0995 0.0597)
      PathPoint P3: femur_r (0.0107 -0.405 0.0324)
      PathPoint P4: tibia_r (0.0116876 -0.0502273 0.0276253)
    Millard2012EquilibriumMuscle tibant_r: max_isometric_force=1227.452 optimal_fiber_length=0.0683
        tendon_slack_length=0.240461 pennation_angle_at_optimal=0.1951828
      PathPoint P1: tibia_r (0.0154 -0.1312 0.0162)
      PathPoint P2: tibia_r (0.0251 -0.1906 0.0128)
      PathPoint P3: tibia_r (0.0305809 -0.38467 -0.0156831)
      PathPoint P4: calcn_r (0.0579621 0.00511995 -0.0239623)
    Millard2012EquilibriumMuscle tibpost_r: max_isometric_force=1730.154 optimal_fiber_length=0.0378
        tendon_slack_length=0.2807796 pennation_angle_at_optimal=0.2264891
      PathPoint P1: tibia_r (-0.0041 -0.1304 0.0103)
      PathPoint P2: tibia_r (-0.0120065 -0.385191 -0.0182288)
      PathPoint P3: calcn_r (-0.0220603 0.0192164 -0.0232334)
      PathPoint P4: calcn_r (0.0191416 0.0098729 -0.0282212)
    Millard2012EquilibriumMuscle vasint_r: max_isometric_force=1697.361 optimal_fiber_length=0.0993
        tendon_slack_length=0.2022107 pennation_angle_at_optimal=0.06309973
      PathPoint P1: femur_r (0.029 -0.1924 0.031)
      PathPoint P2: femur_r (0.0335 -0.2084 0.0285)
      PathPoint P3: patella_r (0.0058 0.048 -0.0006)
      PathPoint P4: patella_r (0.005 0.00247 -0.00039)
      PathPoint P5: tibia_r (0.035 -0.0632 0.00043)
      PathWrap: wrap_object=KnExt_at_fem_r method=hybrid
    Millard2012EquilibriumMuscle vaslat_r: max_isometric_force=5148.767 optimal_fiber_length=0.0994
        tendon_slack_length=0.2206013 pennation_angle_at_optimal=0.2528673
      PathPoint P1: femur_r (0.0048 -0.1854 0.0349)
      PathPoint P2: femur_r (0.0269 -0.2591 0.0409)
      PathPoint P3: patella_r (0.0103 0.0423 0.0141)
      PathPoint P4: patella_r (0.005 0.00247 0.00733)
      PathPoint P5: tibia_r (0.03254 -0.06338 0.00511)
      PathWrap: wrap_object=KnExt_at_fem_r method=hybrid
    Millard2012EquilibriumMuscle vasmed_r: max_isometric_force=2747.823 optimal_fiber_length=0.0968
        tendon_slack_length=0.1999043 pennation_angle_at_optimal=0.4222225
      PathPoint P1: femur_r (0.014 -0.2099 0.0188)
      PathPoint P2: femur_r (0.0356 -0.2769 0.0009)
      PathPoint P3: patella_r (0.0063 0.0445 -0.017)
      PathPoint P4: patella_r (0.005 0.00247 -0.0085)
      PathPoint P5: tibia_r (0.0319 -0.06357 -0.00678)
      PathWrap: wrap_object=KnExt_at_fem_r method=hybrid
    Millard2012EquilibriumMuscle plant_l: max_isometric_force=1029.787 optimal_fiber_length=0.026
        tendon_slack_length=0.1149062 pennation_angle_at_optimal=0.1745329
      PathPoint P1: femur_l (-0.0163159 -0.403 -0.007)
      PathPoint P2: tibia_l (-0.0138914 -0.11663 0.00736481)
      PathPoint P3: calcn_l (-0.0506681 0.00231794 0.0100649)
      PathWrap: wrap_object=CurveForPop_l method=hybrid
    Millard2012EquilibriumMuscle pop_l: max_isometric_force=1029.787 optimal_fiber_length=0.026
        tendon_slack_length=0.1149062 pennation_angle_at_optimal=0.1745329
      PathPoint P1: femur_l (-0.000911328 -0.407892 0.0370887)
      PathPoint P2: tibia_l (-0.00337914 -0.111264 -0.0190476)
      PathWrap: wrap_object=CurveForPop_l method=hybrid
    Millard2012EquilibriumMuscle obtext_l: max_isometric_force=1029.787 optimal_fiber_length=0.026
        tendon_slack_length=0.1149062 pennation_angle_at_optimal=0.1745329
      PathPoint P1: pelvis (-0.0900563 -0.102108 -0.0332323)
      PathPoint P2: pelvis (-0.112336 -0.0968799 -0.0654751)
      PathPoint P3: femur_l (-0.034 0 -0.042)
    Millard2012EquilibriumMuscle obtint_l: max_isometric_force=1029.787 optimal_fiber_length=0.026
        tendon_slack_length=0.1149062 pennation_angle_at_optimal=0.1745329
      PathPoint P1: pelvis (-0.0955804 -0.105986 -0.0271833)
      PathPoint P2: pelvis (-0.125996 -0.0633751 -0.0573188)
      PathPoint P3: femur_l (-0.034 -0.000310327 -0.0421179)
    Millard2012EquilibriumMuscle supgemel_l: max_isometric_force=625.8197 optimal_fiber_length=0.1031
        tendon_slack_length=0.03545029 pennation_angle_at_optimal=0.1147809 ignore_tendon_compliance=true
      PathPoint P1: pelvis (-0.124976 -0.0550287 -0.0557445)
      PathPoint P2: femur_l (-0.0339646 0.000244507 -0.0418415)
      PathWrap: wrap_object=AB_at_femshaft_r method=hybrid
    Millard2012EquilibriumMuscle infgemel_l: max_isometric_force=625.8197 optimal_fiber_length=0.1031
        tendon_slack_length=0.03545029 pennation_angle_at_optimal=0.1147809 ignore_tendon_compliance=true
      PathPoint P1: pelvis (-0.124977 -0.070286 -0.0611584)
      PathPoint P2: femur_l (-0.0339646 0.000244507 -0.0418415)
      PathWrap: wrap_object=AB_at_femshaft_r method=hybrid
    Millard2012EquilibriumMuscle addbrev_l: max_isometric_force=625.8197 optimal_fiber_length=0.1031
        tendon_slack_length=0.03545029 pennation_angle_at_optimal=0.1147809 ignore_tendon_compliance=true
      PathPoint addbrev_r-P1: pelvis (-0.0439477 -0.0877376 -0.0154)
      PathPoint addbrev_r-P2: femur_l (-0.002 -0.118 -0.0249)
      PathWrap: wrap_object=AB_at_femshaft_l method=hybrid
    Millard2012EquilibriumMuscle addlong_l: max_isometric_force=916.8 optimal_fiber_length=0.1082
        tendon_slack_length=0.1317994 pennation_angle_at_optimal=0.1377704
      PathPoint addlong_r-P1: pelvis (-0.0334709 -0.083327 -0.0231461)
      PathPoint addlong_r-P2: femur_l (0.01126 -0.23937 -0.01583)
      PathWrap: wrap_object=AL_at_femshaft_l method=hybrid
    Millard2012EquilibriumMuscle addmagDist_l: max_isometric_force=597.2951 optimal_fiber_length=0.1772
        tendon_slack_length=0.0873807 pennation_angle_at_optimal=0.194705 ignore_tendon_compliance=true
      PathPoint addmagDist_r-P1: pelvis (-0.0982827 -0.118009 -0.0364857)
      PathPoint addmagDist_r-P2: femur_l (0.01125 -0.2625 -0.0193)
      PathWrap: wrap_object=AMdist_at_femshaft_l method=hybrid
    Millard2012EquilibriumMuscle addmagIsch_l: max_isometric_force=597.2951 optimal_fiber_length=0.1562
        tendon_slack_length=0.216343 pennation_angle_at_optimal=0.1680443
      PathPoint addmagIsch_r-P1: pelvis (-0.111596 -0.11237 -0.0503821)
      PathPoint addmagIsch_r-P2: femur_l (0.00481 -0.38797 0.03273)
      PathWrap: wrap_object=AMisch_at_condyles_l method=hybrid
    Millard2012EquilibriumMuscle addmagMid_l: max_isometric_force=597.2951 optimal_fiber_length=0.1377
        tendon_slack_length=0.0466277 pennation_angle_at_optimal=0.2073076 ignore_tendon_compliance=true
      PathPoint addmagMid_r-P1: pelvis (-0.104854 -0.0935359 -0.0334797)
      PathPoint addmagMid_r-P2: femur_l (0.00242 -0.1624 -0.02922)
      PathWrap: wrap_object=AMmid_at_femshaft_l method=hybrid
    Millard2012EquilibriumMuscle addmagProx_l: max_isometric_force=597.2951 optimal_fiber_length=0.1056
        tendon_slack_length=0.0403241 pennation_angle_at_optimal=0.3114833 ignore_tendon_compliance=true
      PathPoint addmagProx_r-P1: pelvis (-0.057396 -0.0975127 -0.0166078)
      PathPoint addmagProx_r-P2: femur_l (-0.01527 -0.07886 -0.03202)
      PathWrap: wrap_object=AMprox_at_femshaft_l method=hybrid
    Millard2012EquilibriumMuscle bflh_l: max_isometric_force=1313.184 optimal_fiber_length=0.0976
        tendon_slack_length=0.3252266 pennation_angle_at_optimal=0.1759182
      PathPoint bflh_r-P1: pelvis (-0.119995 -0.102057 -0.0665738)
      PathPoint bflh_r-P2: tibia_l (-0.0337 -0.05 -0.0253)
      PathPoint bflh_r-P3: tibia_l (-0.02 -0.064 -0.0303)
    Millard2012EquilibriumMuscle bfsh_l: max_isometric_force=557.1148 optimal_fiber_length=0.1103
        tendon_slack_length=0.1058172 pennation_angle_at_optimal=0.2642232 ignore_tendon_compliance=true
      PathPoint bfsh_r-P1: femur_l (0.005 -0.2111 -0.0234)
      PathPoint bfsh_r-P2: tibia_l (-0.016 -0.055 -0.0318)
      PathWrap: wrap_object=BF_at_gastroc_l method=hybrid
    Millard2012EquilibriumMuscle edl_l: max_isometric_force=603.4982 optimal_fiber_length=0.0693
        tendon_slack_length=0.3688752 pennation_angle_at_optimal=0.2182582
      PathPoint edl_r-P1: tibia_l (-0.00815081 -0.107299 -0.0236361)
      PathPoint edl_r-P2: tibia_l (0.0245218 -0.394461 -0.0112535)
      PathPoint edl_r-P3: midfoot_l (0.0173397 0.0136128 -0.00531902)
      PathPoint edl_r-P4: metatarsal_middle_l (0.0860438 -0.013951 -0.0126508)
      PathPoint edl_r-P5: toes_middle_l (0.0437578 -0.00570292 -0.0175244)
      PathPoint edl_r-P6: toes_middle_l (0.0680431 -0.0126282 -0.0190441)
    Millard2012EquilibriumMuscle ehl_l: max_isometric_force=285.8675 optimal_fiber_length=0.0748
        tendon_slack_length=0.3267953 pennation_angle_at_optimal=0.1972681
      PathPoint ehl_r-P1: tibia_l (-0.014 -0.155 -0.0189)
      PathPoint ehl_r-P2: tibia_l (0.0071 -0.2909 -0.0164)
      PathPoint ehl_r-P3: tibia_l (0.0269177 -0.368705 0.00383986)
      PathPoint ehl_r-P4: midfoot_l (0.00776853 0.0226929 0.0146486)
      PathPoint ehl_r-P5: metatarsal_thumb_l (0.0466522 0.00860074 0.0179175)
      PathPoint ehl_r-P6: metatarsal_thumb_l (0.0846327 -0.0108528 0.0224557)
      PathPoint ehl_r-P7: toes_thumb_l (0.0449199 -0.00280299 0.0206674)
      PathPoint ehl_r-P8: toes_thumb_l (0.0716469 -0.016543 0.0201581)
    Millard2012EquilibriumMuscle fdl_l: max_isometric_force=423.177 optimal_fiber_length=0.0446
        tendon_slack_length=0.3787729 pennation_angle_at_optimal=0.2248391
      PathPoint fdl_r-P1: tibia_l (-0.0023 -0.1832 0.0018)
      PathPoint fdl_r-P2: tibia_l (-0.0194368 -0.382242 0.0186896)
      PathPoint fdl_r-P3: calcn_l (-0.0196418 0.0221172 0.0236764)
      PathPoint fdl_r-P4: calcn_l (0.00756481 0.0119019 0.022266)
      PathPoint fdl_r-P5: calcn_l (0.108208 -0.0266744 -0.00646334)
      PathPoint fdl_r-P6: toes_middle_l (0.037156 -0.0172413 -0.0124378)
      PathPoint fdl_r-P7: toes_middle_l (0.057878 -0.0165558 -0.0182021)
      PathPoint fdl_r-P8: toes_middle_l (0.0654541 -0.0212326 -0.0193459)
    Millard2012EquilibriumMuscle fhl_l: max_isometric_force=907.8393 optimal_fiber_length=0.0527
        tendon_slack_length=0.3543397 pennation_angle_at_optimal=0.2580255
      PathPoint fhl_r-P1: tibia_l (-0.0104682 -0.217301 -0.0254238)
      PathPoint fhl_r-P2: tibia_l (-0.0257814 -0.383845 0.0145153)
      PathPoint fhl_r-P3: calcn_l (-0.0254347 0.0144456 0.0201117)
      PathPoint fhl_r-P4: calcn_l (0.0485899 -0.00639706 0.0259926)
      PathPoint fhl_r-P5: calcn_l (0.0983615 -0.0240437 0.0225333)
      PathPoint fhl_r-P6: toes_thumb_l (0.0388804 -0.0250266 0.0188434)
      PathPoint fhl_r-P7: toes_thumb_l (0.0679409 -0.0280525 0.0158325)
    Millard2012EquilibriumMuscle gaslat_l: max_isometric_force=1575.059 optimal_fiber_length=0.0588
        tendon_slack_length=0.3760702 pennation_angle_at_optimal=0.2102268
      PathPoint gaslat_r-P1: femur_l (-0.003 -0.3814 -0.0277)
      PathPoint gaslat_r-P2: calcn_l (-0.0516794 0.0040736 -0.000268027)
      PathWrap shank: wrap_object=GasLat_at_shank_l method=hybrid
      PathWrap condyles: wrap_object=Gastroc_at_condyles_l method=hybrid
    Millard2012EquilibriumMuscle gasmed_l: max_isometric_force=3115.515 optimal_fiber_length=0.051
        tendon_slack_length=0.3987163 pennation_angle_at_optimal=0.1656816
      PathPoint gasmed_r-P1: femur_l (0.007 -0.3788 0.0208)
      PathPoint gasmed_r-P2: calcn_l (-0.052 0.005 0.00063087)
      PathWrap shank: wrap_object=GasMed_at_shank_l method=hybrid
      PathWrap condyles: wrap_object=Gastroc_at_condyles_l method=hybrid
    Millard2012EquilibriumMuscle glmax1_l: max_isometric_force=983.7836 optimal_fiber_length=0.147
        tendon_slack_length=0.04884089 pennation_angle_at_optimal=0.3540118 ignore_tendon_compliance=true
      PathPoint glmax1_r-P1: pelvis (-0.129765 0.0392182 -0.0674688)
      PathPoint glmax1_r-P2: pelvis (-0.13327 -0.0201457 -0.0779001)
      PathPoint glmax1_r-P3: femur_l (-0.0444 -0.0326 -0.0302)
      PathPoint glmax1_r-P4: femur_l (-0.0277 -0.0566 -0.047)
      PathWrap: wrap_object=Gmax1_at_pelvis_l method=hybrid
    Millard2012EquilibriumMuscle glmax2_l: max_isometric_force=1406.046 optimal_fiber_length=0.157
        tendon_slack_length=0.06788715 pennation_angle_at_optimal=0.3673821 ignore_tendon_compliance=true
      PathPoint glmax2_r-P1: pelvis (-0.135457 0.0252205 -0.0596693)
      PathPoint glmax2_r-P2: pelvis (-0.138973 -0.0482697 -0.0737967)
      PathPoint glmax2_r-P3: femur_l (-0.045 -0.0584 -0.0252)
      PathPoint glmax2_r-P4: femur_l (-0.0156 -0.1016 -0.0419)
      PathWrap: wrap_object=Gmax2_at_pelvis_l method=hybrid
    Millard2012EquilibriumMuscle glmax3_l: max_isometric_force=947.7541 optimal_fiber_length=0.167
        tendon_slack_length=0.06971661 pennation_angle_at_optimal=0.3824161 ignore_tendon_compliance=true
      PathPoint glmax3_r-P1: pelvis (-0.152197 -0.0323299 -0.00618306)
      PathPoint glmax3_r-P2: pelvis (-0.143731 -0.0997843 -0.0479597)
      PathPoint glmax3_r-P3: femur_l (-0.0281 -0.1125 -0.0094)
      PathPoint glmax3_r-P4: femur_l (-0.006 -0.1419 -0.0411)
      PathWrap: wrap_object=Gmax3_at_pelvis_l method=hybrid
    Millard2012EquilibriumMuscle glmed1_l: max_isometric_force=1093.467 optimal_fiber_length=0.073
        tendon_slack_length=0.05581683 pennation_angle_at_optimal=0.3165559 ignore_tendon_compliance=true
      PathPoint glmed1_r-P1: pelvis (-0.0445 0.0245 -0.1172)
      PathPoint glmed1_r-P2: femur_l (-0.0218 -0.0117 -0.0555)
    Millard2012EquilibriumMuscle glmed2_l: max_isometric_force=765.0917 optimal_fiber_length=0.073
        tendon_slack_length=0.06524881 pennation_angle_at_optimal=0.3165559 ignore_tendon_compliance=true
      PathPoint glmed2_r-P1: pelvis (-0.085 0.04 -0.076)
      PathPoint glmed2_r-P2: femur_l (-0.0258 -0.0058 -0.0527)
    Millard2012EquilibriumMuscle glmed3_l: max_isometric_force=871.1993 optimal_fiber_length=0.073
        tendon_slack_length=0.04523284 pennation_angle_at_optimal=0.3165559 ignore_tendon_compliance=true
      PathPoint glmed3_r-P1: pelvis (-0.117 0.005 -0.065)
      PathPoint glmed3_r-P2: femur_l (-0.0309 -0.0047 -0.0518)
    Millard2012EquilibriumMuscle glmin1_l: max_isometric_force=374.0459 optimal_fiber_length=0.068
        tendon_slack_length=0.01613778 pennation_angle_at_optimal=0.1745329 ignore_tendon_compliance=true
      PathPoint glmin1_r-P1: pelvis (-0.0542364 0.000821798 -0.108207)
      PathPoint glmin1_r-P2: femur_l (-0.0072 -0.0104 -0.056)
    Millard2012EquilibriumMuscle glmin2_l: max_isometric_force=394.8197 optimal_fiber_length=0.056
        tendon_slack_length=0.02609905 pennation_angle_at_optimal=0 ignore_tendon_compliance=true
      PathPoint glmin2_r-P1: pelvis (-0.0616 -0.0142 -0.0971)
      PathPoint glmin2_r-P2: femur_l (-0.0096 -0.0104 -0.056)
    Millard2012EquilibriumMuscle glmin3_l: max_isometric_force=446.7738 optimal_fiber_length=0.038
        tendon_slack_length=0.0508725 pennation_angle_at_optimal=0.01745329
      PathPoint glmin3_r-P1: pelvis (-0.0872452 -0.00529729 -0.0871071)
      PathPoint glmin3_r-P2: femur_l (-0.0135 -0.0083 -0.055)
    Millard2012EquilibriumMuscle grac_l: max_isometric_force=281.3115 optimal_fiber_length=0.2278
        tendon_slack_length=0.1720138 pennation_angle_at_optimal=0.1720016 ignore_tendon_compliance=true
      PathPoint grac_r-P1: pelvis (-0.0775541 -0.117721 -0.0281046)
      PathPoint grac_r-P2: tibia_l (-0.01842 -0.06 0.02961)
      PathPoint grac_r-P3: tibia_l (0.004 -0.08 0.024)
      PathWrap: wrap_object=GR_at_condyles_l method=hybrid
    Millard2012EquilibriumMuscle iliacus_l: max_isometric_force=1021.141 optimal_fiber_length=0.1066
        tendon_slack_length=0.09612071 pennation_angle_at_optimal=0.279914 ignore_tendon_compliance=true
      PathPoint iliacus_r-P1: pelvis (-0.0605 0.0309 -0.0843)
      PathPoint iliacus_r-P2: pelvis (-0.0135 -0.0557 -0.0756)
      PathPoint iliacus_r-P3: femur_l (-0.0023 -0.0565 -0.0139)
      PathPoint iliacus_r-P4: femur_l (-0.0122 -0.0637 -0.0196)
      PathWrap: wrap_object=IL_at_brim_l method=hybrid range=(2 3)
    Millard2012EquilibriumMuscle perbrev_l: max_isometric_force=521.2016 optimal_fiber_length=0.0454
        tendon_slack_length=0.1475275 pennation_angle_at_optimal=0.2052361
      PathPoint perbrev_r-P1: tibia_l (-0.00946867 -0.280785 -0.0305666)
      PathPoint perbrev_r-P2: tibia_l (-0.0228977 -0.414994 -0.0253628)
      PathPoint perbrev_r-P3: tibia_l (-0.0174968 -0.425348 -0.0259627)
      PathPoint perbrev_r-P4: calcn_l (-0.00535885 -0.00162048 -0.0227146)
      PathPoint perbrev_r-P5: metatarsal_tiny_l (0.0121598 -0.0142043 -0.0285174)
    Millard2012EquilibriumMuscle perlong_l: max_isometric_force=1115.371 optimal_fiber_length=0.0508
        tendon_slack_length=0.3322208 pennation_angle_at_optimal=0.2479525
      PathPoint perlong_r-P1: tibia_l (-0.00805693 -0.15672 -0.0318912)
      PathPoint perlong_r-P2: tibia_l (-0.0251933 -0.41425 -0.0241298)
      PathPoint perlong_r-P3: tibia_l (-0.0184977 -0.427423 -0.024463)
      PathPoint perlong_r-P4: calcn_l (-0.00698641 -0.00718188 -0.0225847)
      PathPoint perlong_r-P5: calcn_l (0.0261765 -0.015483 -0.0240729)
      PathPoint perlong_r-P6: calcn_l (0.0407109 -0.012976 -0.0117621)
      PathPoint perlong_r-P7: calcn_l (0.0593345 -0.00893889 0.00741512)
    Millard2012EquilibriumMuscle piri_l: max_isometric_force=1029.787 optimal_fiber_length=0.026
        tendon_slack_length=0.1149062 pennation_angle_at_optimal=0.1745329
      PathPoint piri_r-P1: pelvis (-0.111668 0.0126412 -0.0132939)
      PathPoint piri_r-P2: pelvis (-0.111856 -0.015923 -0.0693642)
      PathPoint piri_r-P3: femur_l (-0.0148 -0.0036 -0.0437)
    Millard2012EquilibriumMuscle psoas_l: max_isometric_force=1426.79 optimal_fiber_length=0.1169
        tendon_slack_length=0.09954317 pennation_angle_at_optimal=0.2155251 ignore_tendon_compliance=true
      PathPoint psoas_r-P1: pelvis (-0.0606 0.062 -0.039)
      PathPoint psoas_r-P2: pelvis (-0.023346 -0.0491274 -0.0659038)
      PathPoint psoas_r-P3: femur_l (-0.0132 -0.0467 -0.0046)
      PathPoint psoas_r-P4: femur_l (-0.0235 -0.0524 -0.0088)
      PathWrap: wrap_object=PS_at_brim_l method=hybrid range=(2 3)
    Millard2012EquilibriumMuscle recfem_l: max_isometric_force=2191.741 optimal_fiber_length=0.0759
        tendon_slack_length=0.4484935 pennation_angle_at_optimal=0.2170149
      PathPoint recfem_r-P1: pelvis (-0.0301342 -0.0299852 -0.0928736)
      PathPoint recfem_r-P2: patella_l (0.01 0.049 -0.0007)
      PathPoint recfem_r-P3: patella_l (0.0121 0.0437 0.001)
      PathPoint recfem_r-P4: patella_l (0.005 0.00247 -3e-5)
      PathPoint recfem_r-P5: tibia_l (0.0326 -0.06312 0.00047)
      PathWrap: wrap_object=KnExt_at_fem_l method=hybrid
    Millard2012EquilibriumMuscle sart_l: max_isometric_force=249.4131 optimal_fiber_length=0.403
        tendon_slack_length=0.1239998 pennation_angle_at_optimal=0.02613542 ignore_tendon_compliance=true
      PathPoint sart_r-P1: pelvis (-0.0195 -0.0156 -0.1056)
      PathPoint sart_r-P2: femur_l (-0.00900344 -0.359612 0.0439824)
      PathPoint sart_r-P3: tibia_l (-0.0258575 -0.05 0.041)
      PathPoint sart_r-P4: tibia_l (-0.0103979 -0.0688812 0.0345948)
      PathPoint sart_r-P5: tibia_l (0.0216522 -0.0853148 0.0243826)
    Millard2012EquilibriumMuscle semimem_l: max_isometric_force=2200.987 optimal_fiber_length=0.069
        tendon_slack_length=0.347586 pennation_angle_at_optimal=0.2545615
      PathPoint semimem_r-P1: pelvis (-0.116726 -0.103662 -0.0650029)
      PathPoint semimem_r-P2: tibia_l (-0.029 -0.0417 0.0196)
      PathWrap: wrap_object=SM_at_condyles_l method=hybrid
    Millard2012EquilibriumMuscle semiten_l: max_isometric_force=591.2951 optimal_fiber_length=0.193
        tendon_slack_length=0.2471989 pennation_angle_at_optimal=0.241295
      PathPoint semiten_r-P1: pelvis (-0.128319 -0.103381 -0.0500422)
      PathPoint semiten_r-P2: tibia_l (-0.028 -0.054 0.0229)
      PathPoint semiten_r-P3: tibia_l (0.00060944 -0.078266 0.024)
      PathWrap: wrap_object=ST_at_condyles_l method=hybrid
    Millard2012EquilibriumMuscle soleus_l: max_isometric_force=6194.843 optimal_fiber_length=0.044
        tendon_slack_length=0.2767559 pennation_angle_at_optimal=0.3814289
      PathPoint soleus_r-P1: tibia_l (-0.0107127 -0.104527 -0.00653212)
      PathPoint soleus_r-P2: calcn_l (-0.0515518 0.00906752 -0.000745684)
    Millard2012EquilibriumMuscle tfl_l: max_isometric_force=411.2066 optimal_fiber_length=0.095
        tendon_slack_length=0.4494971 pennation_angle_at_optimal=0.05235988
      PathPoint tfl_r-P1: pelvis (-0.0321939 0.0325173 -0.123616)
      PathPoint tfl_r-P2: femur_l (0.0294 -0.0995 -0.0597)
      PathPoint tfl_r-P3: femur_l (0.0107 -0.405 -0.0324)
      PathPoint tfl_r-P4: tibia_l (0.0116876 -0.0502273 -0.0276253)
    Millard2012EquilibriumMuscle tibant_l: max_isometric_force=1227.452 optimal_fiber_length=0.0683
        tendon_slack_length=0.240461 pennation_angle_at_optimal=0.1951828
      PathPoint tibant_r-P1: tibia_l (0.0154 -0.1312 -0.0162)
      PathPoint tibant_r-P2: tibia_l (0.0251 -0.1906 -0.0128)
      PathPoint tibant_r-P3: tibia_l (0.0305809 -0.38467 0.0156831)
      PathPoint tibant_r-P4: calcn_l (0.0579621 0.00511995 0.0239623)
    Millard2012EquilibriumMuscle tibpost_l: max_isometric_force=1730.154 optimal_fiber_length=0.0378
        tendon_slack_length=0.2807796 pennation_angle_at_optimal=0.2264891
      PathPoint tibpost_r-P1: tibia_l (-0.0041 -0.1304 -0.0103)
      PathPoint tibpost_r-P2: tibia_l (-0.0120065 -0.385191 0.0182288)
      PathPoint tibpost_r-P3: calcn_l (-0.0220603 0.0192164 0.0232334)
      PathPoint tibpost_r-P4: calcn_l (0.0191416 0.0098729 0.0282212)
    Millard2012EquilibriumMuscle vasint_l: max_isometric_force=1697.361 optimal_fiber_length=0.0993
        tendon_slack_length=0.2022107 pennation_angle_at_optimal=0.06309973
      PathPoint vasint_r-P1: femur_l (0.029 -0.1924 -0.031)
      PathPoint vasint_r-P2: femur_l (0.0335 -0.2084 -0.0285)
      PathPoint vasint_r-P3: patella_l (0.0058 0.048 0.0006)
      PathPoint vasint_r-P4: patella_l (0.005 0.00247 0.00039)
      PathPoint vasint_r-P5: tibia_l (0.035 -0.0632 -0.00043)
      PathWrap: wrap_object=KnExt_at_fem_l method=hybrid
    Millard2012EquilibriumMuscle vaslat_l: max_isometric_force=5148.767 optimal_fiber_length=0.0994
        tendon_slack_length=0.2206013 pennation_angle_at_optimal=0.2528673
      PathPoint vaslat_r-P1: femur_l (0.0048 -0.1854 -0.0349)
      PathPoint vaslat_r-P2: femur_l (0.0269 -0.2591 -0.0409)
      PathPoint vaslat_r-P3: patella_l (0.0103 0.0423 -0.0141)
      PathPoint vaslat_r-P4: patella_l (0.005 0.00247 -0.00733)
      PathPoint vaslat_r-P5: tibia_l (0.03254 -0.06338 -0.00511)
      PathWrap: wrap_object=KnExt_at_fem_l method=hybrid
    Millard2012EquilibriumMuscle vasmed_l: max_isometric_force=2747.823 optimal_fiber_length=0.0968
        tendon_slack_length=0.1999043 pennation_angle_at_optimal=0.4222225
      PathPoint vasmed_r-P1: femur_l (0.014 -0.2099 -0.0188)
      PathPoint vasmed_r-P2: femur_l (0.0356 -0.2769 -0.0009)
      PathPoint vasmed_r-P3: patella_l (0.0063 0.0445 0.017)
      PathPoint vasmed_r-P4: patella_l (0.005 0.00247 0.0085)
      PathPoint vasmed_r-P5: tibia_l (0.0319 -0.06357 0.00678)
      PathWrap: wrap_object=KnExt_at_fem_l method=hybrid
    PathActuator Ext_Digit_Brev2_r: min_control=0 max_control=1 optimal_force=35.68673
      PathPoint Ext_Digit_Brev2_r_P1: calcn_r (-0.00891136 0.014187 0.022135)
      PathPoint Ext_Digit_Brev2_r_P2: metatarsal_middle_r (0.0451124 0.0025727 0.0159159)
      PathPoint Ext_Digit_Brev2_r_P3: metatarsal_thumb_r (0.0829928 -0.0122868 0.000624026)
      PathPoint Ext_Digit_Brev2_r_P4: metatarsal_thumb_r (0.0864723 -0.0140072 0.000331486)
    PathActuator Ext_Digit_Brev3_r: min_control=0 max_control=1 optimal_force=23.03827
      PathPoint Ext_Digit_Brev3_r_P1: calcn_r (-0.00891136 0.014187 0.022135)
      PathPoint Ext_Digit_Brev3_r_P2: metatarsal_middle_r (0.0421604 -0.0017958 0.0206728)
      PathPoint Ext_Digit_Brev3_r_P3: metatarsal_middle_r (0.0795313 -0.0141953 0.0134005)
      PathPoint Ext_Digit_Brev3_r_P4: metatarsal_middle_r (0.0830442 -0.0159061 0.0134527)
    PathActuator Ext_Digit_Brev4_r: min_control=0 max_control=1 optimal_force=19.87615
      PathPoint Ext_Digit_Brev4_r_P1: calcn_r (-0.00891136 0.014187 0.022135)
      PathPoint Ext_Digit_Brev4_r_P2: metatarsal_ring_r (0.0720543 -0.0149925 0.0254442)
      PathPoint Ext_Digit_Brev4_r_P3: metatarsal_ring_r (0.0755925 -0.0166961 0.0257551)
    Millard2012EquilibriumMuscle Ext_Digit_Brev2_r: max_isometric_force=35.68673 optimal_fiber_length=0.0968
        tendon_slack_length=0.1999043 pennation_angle_at_optimal=0.4222225
      PathPoint Ext_Digit_Brev2_r_P1: calcn_r (-0.00891136 0.014187 0.022135)
      PathPoint Ext_Digit_Brev2_r_P2: metatarsal_middle_r (0.0451124 0.0025727 0.0159159)
      PathPoint Ext_Digit_Brev2_r_P3: metatarsal_thumb_r (0.0829928 -0.0122868 0.000624026)
      PathPoint Ext_Digit_Brev2_r_P4: metatarsal_thumb_r (0.0864723 -0.0140072 0.000331486)
    Millard2012EquilibriumMuscle Ext_Digit_Brev3_r: max_isometric_force=23.03827 optimal_fiber_length=0.0968
        tendon_slack_length=0.1999043 pennation_angle_at_optimal=0.4222225
      PathPoint Ext_Digit_Brev3_r_P1: calcn_r (-0.00891136 0.014187 0.022135)
      PathPoint Ext_Digit_Brev3_r_P2: metatarsal_middle_r (0.0421604 -0.0017958 0.0206728)
      PathPoint Ext_Digit_Brev3_r_P3: metatarsal_middle_r (0.0795313 -0.0141953 0.0134005)
      PathPoint Ext_Digit_Brev3_r_P4: metatarsal_middle_r (0.0830442 -0.0159061 0.0134527)
    Millard2012EquilibriumMuscle Ext_Digit_Brev4_r: max_isometric_force=19.87615 optimal_fiber_length=0.0968
        tendon_slack_length=0.1999043 pennation_angle_at_optimal=0.4222225
      PathPoint Ext_Digit_Brev4_r_P1: calcn_r (-0.00891136 0.014187 0.022135)
      PathPoint Ext_Digit_Brev4_r_P2: metatarsal_ring_r (0.0720543 -0.0149925 0.0254442)
      PathPoint Ext_Digit_Brev4_r_P3: metatarsal_ring_r (0.0755925 -0.0166961 0.0257551)
    PathActuator Abd_hallucis_r: min_control=0 max_control=1 optimal_force=301.7562
      PathPoint Abd_hallucis_r_P1: calcn_r (-0.0234029 -0.024924 -0.0119495)
      PathPoint Abd_hallucis_r_P2: midfoot_r (0.00160034 -0.00981678 -0.0214344)
      PathPoint Abd_hallucis_r_P3: metatarsal_thumb_r (0.0750534 -0.0218625 -0.0357338)
      PathPoint Abd_hallucis_r_P4: toes_thumb_r (0.0319215 -0.0117618 -0.0371027)
    Millard2012EquilibriumMuscle Abd_hallucis_r: max_isometric_force=301.7562 optimal_fiber_length=0.0968
        tendon_slack_length=0.1999043 pennation_angle_at_optimal=0.4222225
      PathPoint Abd_hallucis_r_P1: calcn_r (-0.0234029 -0.024924 -0.0119495)
      PathPoint Abd_hallucis_r_P2: midfoot_r (0.00160034 -0.00981678 -0.0214344)
      PathPoint Abd_hallucis_r_P3: metatarsal_thumb_r (0.0750534 -0.0218625 -0.0357338)
      PathPoint Abd_hallucis_r_P4: toes_thumb_r (0.0319215 -0.0117618 -0.0371027)
    PathActuator Fle_Digit_Brev2_r: min_control=0 max_control=1 optimal_force=80.40808
      PathPoint Fle_Digit_Brev2_r_P1: calcn_r (-0.0205016 -0.0327075 -0.00430874)
      PathPoint Fle_Digit_Brev2_r_P2: midfoot_r (0.000160212 -0.0148592 0.00210475)
      PathPoint Fle_Digit_Brev2_r_P3: metatarsal_index_r (0.0807164 -0.0315222 -0.00189972)
      PathPoint Fle_Digit_Brev2_r_P4: metatarsal_index_r (0.0914748 -0.0302725 -0.000729783)
      PathPoint Fle_Digit_Brev2_r_P5: toes_index_r (0.0538028 -0.0134743 -0.0012949)
    PathActuator Fle_Digit_Brev3_r: min_control=0 max_control=1 optimal_force=67.30788
      PathPoint Fle_Digit_Brev3_r_P1: calcn_r (-0.0205016 -0.0327075 -0.00430874)
      PathPoint Fle_Digit_Brev3_r_P2: midfoot_r (-0.000620932 -0.017704 0.00638215)
      PathPoint Fle_Digit_Brev3_r_P3: metatarsal_middle_r (0.0775013 -0.0322048 0.0102941)
      PathPoint Fle_Digit_Brev3_r_P4: metatarsal_middle_r (0.091799 -0.0298243 0.0124728)
      PathPoint Fle_Digit_Brev3_r_P5: toes_middle_r (0.0510028 -0.0124503 0.0120996)
    PathActuator Fle_Digit_Brev4_r: min_control=0 max_control=1 optimal_force=56.91808
      PathPoint Fle_Digit_Brev4_r_P1: calcn_r (-0.0205016 -0.0327075 -0.00430874)
      PathPoint Fle_Digit_Brev4_r_P2: midfoot_r (-0.00144189 -0.0210936 0.0102089)
      PathPoint Fle_Digit_Brev4_r_P3: metatarsal_ring_r (0.0700908 -0.0337398 0.0224821)
      PathPoint Fle_Digit_Brev4_r_P4: metatarsal_ring_r (0.0832983 -0.0308754 0.0258732)
      PathPoint Fle_Digit_Brev4_r_P5: toes_ring_r (0.0381052 -0.0140686 0.0255712)
    PathActuator Fle_Digit_Brev5_r: min_control=0 max_control=1 optimal_force=15.81058
      PathPoint Fle_Digit_Brev5_r_P1: calcn_r (-0.0205016 -0.0327075 -0.00430874)
      PathPoint Fle_Digit_Brev5_r_P2: midfoot_r (-0.00267043 -0.0232693 0.0153959)
      PathPoint Fle_Digit_Brev5_r_P3: metatarsal_tiny_r (0.0593901 -0.0347394 0.0335445)
      PathPoint Fle_Digit_Brev5_r_P4: toes_tiny_r (0.0267329 -0.0163172 0.0352655)
    Millard2012EquilibriumMuscle Fle_Digit_Brev2_r: max_isometric_force=80.40808 optimal_fiber_length=0.0968
        tendon_slack_length=0.1999043 pennation_angle_at_optimal=0.4222225
      PathPoint Fle_Digit_Brev2_r_P1: calcn_r (-0.0205016 -0.0327075 -0.00430874)
      PathPoint Fle_Digit_Brev2_r_P2: midfoot_r (0.000160212 -0.0148592 0.00210475)
      PathPoint Fle_Digit_Brev2_r_P3: metatarsal_index_r (0.0807164 -0.0315222 -0.00189972)
      PathPoint Fle_Digit_Brev2_r_P4: metatarsal_index_r (0.0914748 -0.0302725 -0.000729783)
      PathPoint Fle_Digit_Brev2_r_P5: toes_index_r (0.0538028 -0.0134743 -0.0012949)
    Millard2012EquilibriumMuscle Fle_Digit_Brev3_r: max_isometric_force=67.30788 optimal_fiber_length=0.0968
        tendon_slack_length=0.1999043 pennation_angle_at_optimal=0.4222225
      PathPoint Fle_Digit_Brev3_r_P1: calcn_r (-0.0205016 -0.0327075 -0.00430874)
      PathPoint Fle_Digit_Brev3_r_P2: midfoot_r (-0.000620932 -0.017704 0.00638215)
      PathPoint Fle_Digit_Brev3_r_P3: metatarsal_middle_r (0.0775013 -0.0322048 0.0102941)
      PathPoint Fle_Digit_Brev3_r_P4: metatarsal_middle_r (0.091799 -0.0298243 0.0124728)
      PathPoint Fle_Digit_Brev3_r_P5: toes_middle_r (0.0510028 -0.0124503 0.0120996)
    Millard2012EquilibriumMuscle Fle_Digit_Brev4_r: max_isometric_force=56.91808 optimal_fiber_length=0.0968
        tendon_slack_length=0.1999043 pennation_angle_at_optimal=0.4222225
      PathPoint Fle_Digit_Brev4_r_P1: calcn_r (-0.0205016 -0.0327075 -0.00430874)
      PathPoint Fle_Digit_Brev4_r_P2: midfoot_r (-0.00144189 -0.0210936 0.0102089)
      PathPoint Fle_Digit_Brev4_r_P3: metatarsal_ring_r (0.0700908 -0.0337398 0.0224821)
      PathPoint Fle_Digit_Brev4_r_P4: metatarsal_ring_r (0.0832983 -0.0308754 0.0258732)
      PathPoint Fle_Digit_Brev4_r_P5: toes_ring_r (0.0381052 -0.0140686 0.0255712)
    Millard2012EquilibriumMuscle Fle_Digit_Brev5_r: max_isometric_force=15.81058 optimal_fiber_length=0.0968
        tendon_slack_length=0.1999043 pennation_angle_at_optimal=0.4222225
      PathPoint Fle_Digit_Brev5_r_P1: calcn_r (-0.0205016 -0.0327075 -0.00430874)
      PathPoint Fle_Digit_Brev5_r_P2: midfoot_r (-0.00267043 -0.0232693 0.0153959)
      PathPoint Fle_Digit_Brev5_r_P3: metatarsal_tiny_r (0.0593901 -0.0347394 0.0335445)
      PathPoint Fle_Digit_Brev5_r_P4: toes_tiny_r (0.0267329 -0.0163172 0.0352655)
    PathActuator Abd_Digi_Min1_r: min_control=0 max_control=1 optimal_force=57.06865
      PathPoint Abd_Digi_Min1_r_P1: calcn_r (-0.0111244 -0.025 0.004)
      PathPoint Abd_Digi_Min1_r_P2: midfoot_r (0.00080266 -0.0266148 0.0262011)
      PathPoint Abd_Digi_Min1_r_P3: metatarsal_tiny_r (0.0119166 -0.0286969 0.0372524)
      PathPoint Abd_Digi_Min1_r_P4: toes_tiny_r (0.00977586 -0.0195562 0.0410431)
    PathActuator Abd_Digi_Min2_r: min_control=0 max_control=1 optimal_force=57.06865
      PathPoint Abd_Digi_Min2_r_P1: calcn_r (-0.0169572 -0.0249002 0.0106695)
      PathPoint Abd_Digi_Min2_r_P2: midfoot_r (0.00080266 -0.0266148 0.0262011)
      PathPoint Abd_Digi_Min2_r_P3: metatarsal_tiny_r (0.0119166 -0.0286969 0.0372524)
      PathPoint Abd_Digi_Min2_r_P4: toes_tiny_r (0.00977586 -0.0195562 0.0410431)
    PathActuator Abd_Digi_Min3_r: min_control=0 max_control=1 optimal_force=57.06865
      PathPoint Abd_Digi_Min3_r_P1: calcn_r (-0.0215683 -0.0211161 0.0185148)
      PathPoint Abd_Digi_Min3_r_P2: midfoot_r (0.00080266 -0.0266148 0.0262011)
      PathPoint Abd_Digi_Min3_r_P3: metatarsal_tiny_r (0.0119166 -0.0286969 0.0372524)
      PathPoint Abd_Digi_Min3_r_P4: toes_tiny_r (0.00977586 -0.0195562 0.0410431)
    Millard2012EquilibriumMuscle Abd_Digi_Min1_r: max_isometric_force=57.06865 optimal_fiber_length=0.0968
        tendon_slack_length=0.1999043 pennation_angle_at_optimal=0.4222225
      PathPoint Abd_Digi_Min1_r_P1: calcn_r (-0.0111244 -0.025 0.004)
      PathPoint Abd_Digi_Min1_r_P2: midfoot_r (0.00080266 -0.0266148 0.0262011)
      PathPoint Abd_Digi_Min1_r_P3: metatarsal_tiny_r (0.0119166 -0.0286969 0.0372524)
      PathPoint Abd_Digi_Min1_r_P4: toes_tiny_r (0.00977586 -0.0195562 0.0410431)
    Millard2012EquilibriumMuscle Abd_Digi_Min2_r: max_isometric_force=57.06865 optimal_fiber_length=0.0968
        tendon_slack_length=0.1999043 pennation_angle_at_optimal=0.4222225
      PathPoint Abd_Digi_Min2_r_P1: calcn_r (-0.0169572 -0.0249002 0.0106695)
      PathPoint Abd_Digi_Min2_r_P2: midfoot_r (0.00080266 -0.0266148 0.0262011)
      PathPoint Abd_Digi_Min2_r_P3: metatarsal_tiny_r (0.0119166 -0.0286969 0.0372524)
      PathPoint Abd_Digi_Min2_r_P4: toes_tiny_r (0.00977586 -0.0195562 0.0410431)
    Millard2012EquilibriumMuscle Abd_Digi_Min3_r: max_isometric_force=57.06865 optimal_fiber_length=0.0968
        tendon_slack_length=0.1999043 pennation_angle_at_optimal=0.4222225
      PathPoint Abd_Digi_Min3_r_P1: calcn_r (-0.0215683 -0.0211161 0.0185148)
      PathPoint Abd_Digi_Min3_r_P2: midfoot_r (0.00080266 -0.0266148 0.0262011)
      PathPoint Abd_Digi_Min3_r_P3: metatarsal_tiny_r (0.0119166 -0.0286969 0.0372524)
      PathPoint Abd_Digi_Min3_r_P4: toes_tiny_r (0.00977586 -0.0195562 0.0410431)
    PathActuator Lumbrical2_r: min_control=0 max_control=1 optimal_force=18.06923
      PathPoint Lumbrical2_r_P1: midfoot_r (0.0250343 -0.0165795 -0.0017996)
      PathPoint Lumbrical2_r_P2: metatarsal_index_r (0.0814211 -0.0310421 -0.00469196)
      PathPoint Lumbrical2_r_P3: toes_index_r (0.0349422 -0.0136596 -0.00601797)
    PathActuator Lumbrical3_r: min_control=0 max_control=1 optimal_force=18.06923
      PathPoint Lumbrical3_r_P1: midfoot_r (0.0280309 -0.0164391 0.00150883)
      PathPoint Lumbrical3_r_P2: metatarsal_middle_r (0.0788726 -0.0317885 0.0073634)
      PathPoint Lumbrical3_r_P3: toes_middle_r (0.0318597 -0.0145115 0.00735463)
    PathActuator Lumbrical4_r: min_control=0 max_control=1 optimal_force=13.55192
      PathPoint Lumbrical4_r_P1: midfoot_r (0.0284146 -0.0163448 0.00485938)
      PathPoint Lumbrical4_r_P2: metatarsal_ring_r (0.0707053 -0.0331326 0.0197599)
      PathPoint Lumbrical4_r_P3: toes_ring_r (0.0232055 -0.0156218 0.0206319)
    PathActuator Lumbrical5_r: min_control=0 max_control=1 optimal_force=8.131154
      PathPoint Lumbrical5_r_P1: midfoot_r (0.0268126 -0.0162858 0.00823186)
      PathPoint Lumbrical5_r_P2: metatarsal_tiny_r (0.0630084 -0.0338006 0.0310545)
      PathPoint Lumbrical5_r_P3: toes_tiny_r (0.0102537 -0.0170711 0.0308916)
    Millard2012EquilibriumMuscle Lumbrical2_r: max_isometric_force=18.06923 optimal_fiber_length=0.0968
        tendon_slack_length=0.1999043 pennation_angle_at_optimal=0.4222225
      PathPoint Lumbrical2_r_P1: midfoot_r (0.0250343 -0.0165795 -0.0017996)
      PathPoint Lumbrical2_r_P2: metatarsal_index_r (0.0814211 -0.0310421 -0.00469196)
      PathPoint Lumbrical2_r_P3: toes_index_r (0.0349422 -0.0136596 -0.00601797)
    Millard2012EquilibriumMuscle Lumbrical3_r: max_isometric_force=18.06923 optimal_fiber_length=0.0968
        tendon_slack_length=0.1999043 pennation_angle_at_optimal=0.4222225
      PathPoint Lumbrical3_r_P1: midfoot_r (0.0280309 -0.0164391 0.00150883)
      PathPoint Lumbrical3_r_P2: metatarsal_middle_r (0.0788726 -0.0317885 0.0073634)
      PathPoint Lumbrical3_r_P3: toes_middle_r (0.0318597 -0.0145115 0.00735463)
    Millard2012EquilibriumMuscle Lumbrical4_r: max_isometric_force=13.55192 optimal_fiber_length=0.0968
        tendon_slack_length=0.1999043 pennation_angle_at_optimal=0.4222225
      PathPoint Lumbrical4_r_P1: midfoot_r (0.0284146 -0.0163448 0.00485938)
      PathPoint Lumbrical4_r_P2: metatarsal_ring_r (0.0707053 -0.0331326 0.0197599)
      PathPoint Lumbrical4_r_P3: toes_ring_r (0.0232055 -0.0156218 0.0206319)
    Millard2012EquilibriumMuscle Lumbrical5_r: max_isometric_force=8.131154 optimal_fiber_length=0.0968
        tendon_slack_length=0.1999043 pennation_angle_at_optimal=0.4222225
      PathPoint Lumbrical5_r_P1: midfoot_r (0.0268126 -0.0162858 0.00823186)
      PathPoint Lumbrical5_r_P2: metatarsal_tiny_r (0.0630084 -0.0338006 0.0310545)
      PathPoint Lumbrical5_r_P3: toes_tiny_r (0.0102537 -0.0170711 0.0308916)
    PathActuator Ext_Hall_Brev_r: min_control=0 max_control=1 optimal_force=60.53192
      PathPoint Ext_Hall_Brev_r_P1: calcn_r (-0.0130742 0.0180464 0.0179313)
      PathPoint Ext_Hall_Brev_r_P2: midfoot_r (0.0275983 0.0176442 0.00581373)
      PathPoint Ext_Hall_Brev_r_P3: metatarsal_thumb_r (0.0529554 0.0030133 -0.0175609)
      PathPoint Ext_Hall_Brev_r_P4: metatarsal_thumb_r (0.0870588 -0.00997794 -0.0259896)
    PathActuator QPM1_r: min_control=0 max_control=1 optimal_force=29.51308
      PathPoint QPM1_r_P1: calcn_r (-0.0344321 -0.00781194 -0.0125409)
      PathPoint QPM1_r_P2: midfoot_r (-0.00197438 -0.0170687 -0.00183484)
    PathActuator QPM2_r: min_control=0 max_control=1 optimal_force=29.51308
      PathPoint QPM2_r_P1: calcn_r (-0.0336568 -0.0172336 -0.0133586)
      PathPoint QPM2_r_P2: midfoot_r (0.0106344 -0.0167151 0.0029847)
    PathActuator QPM3_r: min_control=0 max_control=1 optimal_force=29.51308
      PathPoint QPM3_r_P1: calcn_r (-0.0238316 -0.0205632 -0.0103867)
      PathPoint QPM3_r_P2: midfoot_r (0.0232256 -0.0163704 0.00747481)
    PathActuator QPL1_r: min_control=0 max_control=1 optimal_force=15.05769
      PathPoint QPL1_r_P1: calcn_r (-0.0185451 -0.0233162 -0.0080152)
      PathPoint QPL1_r_P2: midfoot_r (-0.00197438 -0.0170687 -0.00183484)
    PathActuator QPL2_r: min_control=0 max_control=1 optimal_force=15.05769
      PathPoint QPL2_r_P1: calcn_r (-0.0146505 -0.024451 -0.00263419)
      PathPoint QPL2_r_P2: midfoot_r (0.0106344 -0.0167151 0.0029847)
    PathActuator QPL3_r: min_control=0 max_control=1 optimal_force=15.05769
      PathPoint QPL3_r_P1: calcn_r (-0.0135204 -0.0259282 0.00252273)
      PathPoint QPL3_r_P2: midfoot_r (0.0232256 -0.0163704 0.00747481)
    PathActuator Add_hallucis_ob1_r: min_control=0 max_control=1 optimal_force=74.385
      PathPoint Add_hallucis_ob1_r_P1: metatarsal_index_r (0.0378269 -0.00922426 -0.000387004)
      PathPoint Add_hallucis_ob1_r_P2: metatarsal_thumb_r (0.0722887 -0.0273897 -0.00871307)
      PathPoint Add_hallucis_ob1_r_P3: metatarsal_thumb_r (0.0915169 -0.0220834 -0.0134206)
    PathActuator Add_hallucis_ob2_r: min_control=0 max_control=1 optimal_force=74.385
      PathPoint Add_hallucis_ob2_r_P1: metatarsal_middle_r (0.0371109 -0.0132306 0.00739572)
      PathPoint Add_hallucis_ob2_r_P2: metatarsal_thumb_r (0.0722887 -0.0273897 -0.00871307)
      PathPoint Add_hallucis_ob2_r_P3: metatarsal_thumb_r (0.0915169 -0.0220834 -0.0134206)
    PathActuator Add_hallucis_ob3_r: min_control=0 max_control=1 optimal_force=74.385
      PathPoint Add_hallucis_ob3_r_P1: metatarsal_ring_r (0.0336901 -0.0193448 0.0162818)
      PathPoint Add_hallucis_ob3_r_P2: metatarsal_thumb_r (0.0722887 -0.0273897 -0.00871307)
      PathPoint Add_hallucis_ob3_r_P3: metatarsal_thumb_r (0.0915169 -0.0220834 -0.0134206)
    PathActuator Add_hallucis_Trv1_r: min_control=0 max_control=1 optimal_force=9.335769
      PathPoint Add_hallucis_Trv1_r_P1: metatarsal_index_r (0.0795779 -0.0259473 0.0058478)
      PathPoint Add_hallucis_Trv1_r_P2: metatarsal_thumb_r (0.0725455 -0.0261042 -0.00876257)
      PathPoint Add_hallucis_Trv1_r_P3: metatarsal_thumb_r (0.0917242 -0.02161 -0.0133069)
    PathActuator Add_hallucis_Trv2_r: min_control=0 max_control=1 optimal_force=9.335769
      PathPoint Add_hallucis_Trv2_r_P1: metatarsal_middle_r (0.0714012 -0.0278205 0.0192606)
      PathPoint Add_hallucis_Trv2_r_P2: metatarsal_thumb_r (0.0725455 -0.0261042 -0.00876257)
      PathPoint Add_hallucis_Trv2_r_P3: metatarsal_thumb_r (0.0917242 -0.02161 -0.0133069)
    PathActuator Flex_DigitiMinimi_Brevis_r: min_control=0 max_control=1 optimal_force=90.34615
      PathPoint Flex_DigitiMinimi_Brevis_r_P1: midfoot_r (0.0138554 -0.0254799 0.0209558)
      PathPoint Flex_DigitiMinimi_Brevis_r_P2: metatarsal_tiny_r (0.0540779 -0.0331263 0.0337518)
      PathPoint Flex_DigitiMinimi_Brevis_r_P3: toes_tiny_r (0.00966366 -0.0213126 0.0351278)
    PathActuator Flex_hall_Brevis_Medialis_r: min_control=0 max_control=1 optimal_force=81.31154
      PathPoint Flex_hall_Brevis_Medialis_r_P1: midfoot_r (0.0116618 -0.00743452 -0.0111167)
      PathPoint Flex_hall_Brevis_Medialis_r_P2: metatarsal_thumb_r (0.0747136 -0.0332782 -0.0288539)
      PathPoint Flex_hall_Brevis_Medialis_r_P3: metatarsal_thumb_r (0.0816106 -0.0331711 -0.0295274)
      PathPoint Flex_hall_Brevis_Medialis_r_P4: metatarsal_thumb_r (0.0878581 -0.0294746 -0.0297377)
    PathActuator Flex_hall_Brevis_Lateralis_r: min_control=0 max_control=1 optimal_force=95.76692
      PathPoint Flex_hall_Brevis_Lateralis_r_P1: midfoot_r (0.00785926 -0.0064535 -0.00251636)
      PathPoint Flex_hall_Brevis_Lateralis_r_P2: metatarsal_thumb_r (0.0733454 -0.0309209 -0.0100416)
      PathPoint Flex_hall_Brevis_Lateralis_r_P3: metatarsal_thumb_r (0.0800749 -0.0308618 -0.0124389)
      PathPoint Flex_hall_Brevis_Lateralis_r_P4: metatarsal_thumb_r (0.0884026 -0.0274216 -0.0179963)
    PathActuator Abd_hallucis_l: min_control=0 max_control=1 optimal_force=301.7562
      PathPoint Abd_hallucis_l_P1: calcn_l (-0.0234029 -0.024924 0.0119495)
      PathPoint Abd_hallucis_l_P2: midfoot_l (0.00160034 -0.00981678 0.0214344)
      PathPoint Abd_hallucis_l_P3: metatarsal_thumb_l (0.0750534 -0.0218625 0.0357338)
      PathPoint Abd_hallucis_l_P4: toes_thumb_l (0.0319215 -0.0117618 0.0313661)
    PathActuator Ext_Hall_Brev_l: min_control=0 max_control=1 optimal_force=60.53192
      PathPoint Ext_Hall_Brev_l_P1: calcn_l (-0.0130742 0.0180464 -0.0179313)
      PathPoint Ext_Hall_Brev_l_P2: midfoot_l (0.0275983 0.0176442 -0.00581373)
      PathPoint Ext_Hall_Brev_l_P3: metatarsal_thumb_l (0.0529554 0.0030133 0.0175609)
      PathPoint Ext_Hall_Brev_l_P4: metatarsal_thumb_l (0.0870588 -0.00997794 0.0259896)
    PathActuator Abd_Digi_Min1_l: min_control=0 max_control=1 optimal_force=57.06865
      PathPoint Abd_Digi_Min1_l_P1: calcn_l (-0.0109291 -0.0253619 -0.00409439)
      PathPoint Abd_Digi_Min1_l_P2: midfoot_l (0.00080266 -0.0266148 -0.0262011)
      PathPoint Abd_Digi_Min1_l_P3: metatarsal_tiny_l (0.0119166 -0.0286969 -0.0372524)
      PathPoint Abd_Digi_Min1_l_P4: toes_tiny_l (0.00977586 -0.0195562 -0.0467797)
    PathActuator Abd_Digi_Min2_l: min_control=0 max_control=1 optimal_force=57.06865
      PathPoint Abd_Digi_Min2_l_P1: calcn_l (-0.0169572 -0.0249002 -0.0106695)
      PathPoint Abd_Digi_Min2_l_P2: midfoot_l (0.00080266 -0.0266148 -0.0262011)
      PathPoint Abd_Digi_Min2_l_P3: metatarsal_tiny_l (0.0119166 -0.0286969 -0.0372524)
      PathPoint Abd_Digi_Min2_l_P4: toes_tiny_l (0.00977586 -0.0195562 -0.0467797)
    PathActuator Abd_Digi_Min3_l: min_control=0 max_control=1 optimal_force=57.06865
      PathPoint Abd_Digi_Min3_l_P1: calcn_l (-0.0215683 -0.0211161 -0.0185148)
      PathPoint Abd_Digi_Min3_l_P2: midfoot_l (0.00080266 -0.0266148 -0.0262011)
      PathPoint Abd_Digi_Min3_l_P3: metatarsal_tiny_l (0.0119166 -0.0286969 -0.0372524)
      PathPoint Abd_Digi_Min3_l_P4: toes_tiny_l (0.00977586 -0.0195562 -0.0467797)
    PathActuator Lumbrical2_l: min_control=0 max_control=1 optimal_force=18.06923
      PathPoint Lumbrical2_l_P1: midfoot_l (0.0250343 -0.0165795 0.0017996)
      PathPoint Lumbrical2_l_P2: metatarsal_index_l (0.0814211 -0.0310421 0.00469196)
      PathPoint Lumbrical2_l_P3: toes_index_l (0.0349422 -0.0136596 0.000281429)
    PathActuator Lumbrical3_l: min_control=0 max_control=1 optimal_force=18.06923
      PathPoint Lumbrical3_l_P1: midfoot_l (0.0280309 -0.0164391 -0.00150883)
      PathPoint Lumbrical3_l_P2: metatarsal_middle_l (0.0788726 -0.0317885 -0.0073634)
      PathPoint Lumbrical3_l_P3: toes_middle_l (0.0318597 -0.0145115 -0.0130912)
    PathActuator Lumbrical4_l: min_control=0 max_control=1 optimal_force=13.55192
      PathPoint Lumbrical4_l_P1: midfoot_l (0.0284146 -0.0163448 -0.00485938)
      PathPoint Lumbrical4_l_P2: metatarsal_ring_l (0.0707053 -0.0331326 -0.0197599)
      PathPoint Lumbrical4_l_P3: toes_ring_l (0.0232055 -0.0156218 -0.0263685)
    PathActuator Lumbrical5_l: min_control=0 max_control=1 optimal_force=8.131154
      PathPoint Lumbrical5_l_P1: midfoot_l (0.0268126 -0.0162858 -0.00823186)
      PathPoint Lumbrical5_l_P2: metatarsal_tiny_l (0.0630084 -0.0338006 -0.0310545)
      PathPoint Lumbrical5_l_P3: toes_tiny_l (0.0102537 -0.0170711 -0.0366282)
    PathActuator QPM1_l: min_control=0 max_control=1 optimal_force=29.51308
      PathPoint QPM1_l_P1: calcn_l (-0.0344321 -0.00781194 0.0125409)
      PathPoint QPM1_l_P2: midfoot_l (-0.00197438 -0.0170687 0.00183484)
    PathActuator QPM2_l: min_control=0 max_control=1 optimal_force=29.51308
      PathPoint QPM2_l_P1: calcn_l (-0.0336568 -0.0172336 0.0133586)
      PathPoint QPM2_l_P2: midfoot_l (0.0106344 -0.0167151 -0.0029847)
    PathActuator QPM3_l: min_control=0 max_control=1 optimal_force=29.51308
      PathPoint QPM3_l_P1: calcn_l (-0.0238316 -0.0205632 0.0103867)
      PathPoint QPM3_l_P2: midfoot_l (0.0232256 -0.0163704 -0.00747481)
    PathActuator QPL1_l: min_control=0 max_control=1 optimal_force=15.05769
      PathPoint QPL1_l_P1: calcn_l (-0.0185451 -0.0233162 0.0080152)
      PathPoint QPL1_l_P2: midfoot_l (-0.00197438 -0.0170687 0.00183484)
    PathActuator QPL2_l: min_control=0 max_control=1 optimal_force=15.05769
      PathPoint QPL2_l_P1: calcn_l (-0.0146505 -0.024451 0.00263419)
      PathPoint QPL2_l_P2: midfoot_l (0.0106344 -0.0167151 -0.0029847)
    PathActuator QPL3_l: min_control=0 max_control=1 optimal_force=15.05769
      PathPoint QPL3_l_P1: calcn_l (-0.0135204 -0.0259282 -0.00252273)
      PathPoint QPL3_l_P2: midfoot_l (0.0232256 -0.0163704 -0.00747481)
    PathActuator Fle_Digit_Brev2_l: min_control=0 max_control=1 optimal_force=80.40808
      PathPoint Fle_Digit_Brev2_l_P1: calcn_l (-0.0205016 -0.0327075 0.00430874)
      PathPoint Fle_Digit_Brev2_l_P2: midfoot_l (0.000160212 -0.0148592 -0.00210475)
      PathPoint Fle_Digit_Brev2_l_P3: metatarsal_index_l (0.0807164 -0.0315222 0.00189972)
      PathPoint Fle_Digit_Brev2_l_P4: metatarsal_index_l (0.0914748 -0.0302725 0.000729783)
      PathPoint Fle_Digit_Brev2_l_P5: toes_index_l (0.0538028 -0.0134743 -0.00444164)
    PathActuator Fle_Digit_Brev3_l: min_control=0 max_control=1 optimal_force=67.30788
      PathPoint Fle_Digit_Brev3_l_P1: calcn_l (-0.0205016 -0.0327075 0.00430874)
      PathPoint Fle_Digit_Brev3_l_P2: midfoot_l (-0.000620932 -0.017704 -0.00638215)
      PathPoint Fle_Digit_Brev3_l_P3: metatarsal_middle_l (0.0775013 -0.0322048 -0.0102941)
      PathPoint Fle_Digit_Brev3_l_P4: metatarsal_middle_l (0.091799 -0.0298243 -0.0124728)
      PathPoint Fle_Digit_Brev3_l_P5: toes_middle_l (0.0510028 -0.0124503 -0.0178362)
    PathActuator Fle_Digit_Brev4_l: min_control=0 max_control=1 optimal_force=56.91808
      PathPoint Fle_Digit_Brev4_l_P1: calcn_l (-0.0205016 -0.0327075 0.00430874)
      PathPoint Fle_Digit_Brev4_l_P2: midfoot_l (-0.00144189 -0.0210936 -0.0102089)
      PathPoint Fle_Digit_Brev4_l_P3: metatarsal_ring_l (0.0700908 -0.0337398 -0.0224821)
      PathPoint Fle_Digit_Brev4_l_P4: metatarsal_ring_l (0.0832983 -0.0308754 -0.0258732)
      PathPoint Fle_Digit_Brev4_l_P5: toes_ring_l (0.0381052 -0.0140686 -0.0313078)
    PathActuator Fle_Digit_Brev5_l: min_control=0 max_control=1 optimal_force=15.81058
      PathPoint Fle_Digit_Brev5_l_P1: calcn_l (-0.0205016 -0.0327075 0.00430874)
      PathPoint Fle_Digit_Brev5_l_P2: midfoot_l (-0.00267043 -0.0232693 -0.0153959)
      PathPoint Fle_Digit_Brev5_l_P3: metatarsal_tiny_l (0.0593901 -0.0347394 -0.0335445)
      PathPoint Fle_Digit_Brev5_l_P4: toes_tiny_l (0.0267329 -0.0163172 -0.0410021)
    PathActuator Ext_Digit_Brev2_l: min_control=0 max_control=1 optimal_force=35.68673
      PathPoint Ext_Digit_Brev2_l_P1: calcn_l (-0.00891136 0.014187 -0.022135)
      PathPoint Ext_Digit_Brev2_l_P2: metatarsal_middle_l (0.0451124 0.0025727 -0.0159159)
      PathPoint Ext_Digit_Brev2_l_P3: metatarsal_index_l (0.0829928 -0.0122868 -0.000624026)
      PathPoint Ext_Digit_Brev2_l_P4: metatarsal_index_l (0.0864723 -0.0140072 -0.000331486)
    PathActuator Ext_Digit_Brev3_l: min_control=0 max_control=1 optimal_force=23.03827
      PathPoint Ext_Digit_Brev3_l_P1: calcn_l (-0.00891136 0.014187 -0.022135)
      PathPoint Ext_Digit_Brev3_l_P2: metatarsal_ring_l (0.0421604 -0.0017958 -0.0206728)
      PathPoint Ext_Digit_Brev3_l_P3: metatarsal_middle_l (0.0795313 -0.0141953 -0.0134005)
      PathPoint Ext_Digit_Brev3_l_P4: metatarsal_middle_l (0.0830442 -0.0159061 -0.0134527)
    PathActuator Ext_Digit_Brev4_l: min_control=0 max_control=1 optimal_force=19.87615
      PathPoint Ext_Digit_Brev4_l_P1: calcn_l (-0.00891136 0.014187 -0.022135)
      PathPoint Ext_Digit_Brev4_l_P2: metatarsal_ring_l (0.0720543 -0.0149925 -0.0254442)
      PathPoint Ext_Digit_Brev4_l_P3: metatarsal_ring_l (0.0755925 -0.0166961 -0.0257551)
    PathActuator Add_hallucis_ob1_l: min_control=0 max_control=1 optimal_force=74.385
      PathPoint Add_hallucis_ob1_l_P1: metatarsal_index_l (0.0378269 -0.00922426 0.000387004)
      PathPoint Add_hallucis_ob1_l_P2: metatarsal_thumb_l (0.0722887 -0.0273897 0.00871307)
      PathPoint Add_hallucis_ob1_l_P3: metatarsal_thumb_l (0.0915169 -0.0220834 0.0134206)
    PathActuator Add_hallucis_ob2_l: min_control=0 max_control=1 optimal_force=74.385
      PathPoint Add_hallucis_ob2_l_P1: metatarsal_middle_l (0.0371109 -0.0132306 -0.00739572)
      PathPoint Add_hallucis_ob2_l_P2: metatarsal_thumb_l (0.0722887 -0.0273897 0.00871307)
      PathPoint Add_hallucis_ob2_l_P3: metatarsal_thumb_l (0.0915169 -0.0220834 0.0134206)
    PathActuator Add_hallucis_ob3_l: min_control=0 max_control=1 optimal_force=74.385
      PathPoint Add_hallucis_ob3_l_P1: metatarsal_ring_l (0.0336901 -0.0193448 -0.0162818)
      PathPoint Add_hallucis_ob3_l_P2: metatarsal_thumb_l (0.0722887 -0.0273897 0.00871307)
      PathPoint Add_hallucis_ob3_l_P3: metatarsal_thumb_l (0.0915169 -0.0220834 0.0134206)
    PathActuator Add_hallucis_Trv1_l: min_control=0 max_control=1 optimal_force=9.335769
      PathPoint Add_hallucis_Trv1_l_P1: metatarsal_middle_l (0.0795779 -0.0259473 -0.0058478)
      PathPoint Add_hallucis_Trv1_l_P2: metatarsal_thumb_l (0.0725455 -0.0261042 0.00876257)
      PathPoint Add_hallucis_Trv1_l_P3: metatarsal_thumb_l (0.0917242 -0.02161 0.0133069)
    PathActuator Add_hallucis_Trv2_l: min_control=0 max_control=1 optimal_force=9.335769
      PathPoint Add_hallucis_Trv2_l_P1: metatarsal_ring_l (0.0714012 -0.0278205 -0.0192606)
      PathPoint Add_hallucis_Trv2_l_P2: metatarsal_thumb_l (0.0725455 -0.0261042 0.00876257)
      PathPoint Add_hallucis_Trv2_l_P3: metatarsal_thumb_l (0.0917242 -0.02161 0.0133069)
    PathActuator Flex_DigitiMinimi_Brevis_l: min_control=0 max_control=1 optimal_force=90.34615
      PathPoint Flex_DigitiMinimi_Brevis_l_P1: midfoot_l (0.0138554 -0.0254799 -0.0209558)
      PathPoint Flex_DigitiMinimi_Brevis_l_P2: metatarsal_tiny_l (0.0540779 -0.0331263 -0.0337518)
      PathPoint Flex_DigitiMinimi_Brevis_l_P3: metatarsal_tiny_l (0.0701499 -0.0354004 -0.0379961)
    PathActuator Flex_hall_Brevis_Medialis_l: min_control=0 max_control=1 optimal_force=81.31154
      PathPoint Flex_hall_Brevis_Medialis_l_P1: midfoot_l (0.0116618 -0.00743452 0.0111167)
      PathPoint Flex_hall_Brevis_Medialis_l_P2: metatarsal_thumb_l (0.0747136 -0.0332782 0.0288539)
      PathPoint Flex_hall_Brevis_Medialis_l_P3: metatarsal_thumb_l (0.0816106 -0.0331711 0.0295274)
      PathPoint Flex_hall_Brevis_Medialis_l_P4: metatarsal_thumb_l (0.0878581 -0.0294746 0.0297377)
    PathActuator Flex_hall_Brevis_Lateralis_l: min_control=0 max_control=1 optimal_force=95.76692
      PathPoint Flex_hall_Brevis_Lateralis_l_P1: midfoot_l (0.00785926 -0.0064535 0.00251636)
      PathPoint Flex_hall_Brevis_Lateralis_l_P2: metatarsal_thumb_l (0.0733454 -0.0309209 0.0100416)
      PathPoint Flex_hall_Brevis_Lateralis_l_P3: metatarsal_thumb_l (0.0800749 -0.0308618 0.0124389)
      PathPoint Flex_hall_Brevis_Lateralis_l_P4: metatarsal_thumb_l (0.0884026 -0.0274216 0.0179963)
    ObjectGroup R_hip_abd
    ObjectGroup R_hip_flex
    ObjectGroup R_hip_inrot
    ObjectGroup R_hip_exrot
    ObjectGroup R_hip_ext
    ObjectGroup R_hip_add
    ObjectGroup R_knee_bend
    ObjectGroup R_knee_ext
    ObjectGroup R_ankle_pf
    ObjectGroup R_inverter
    ObjectGroup R_ankle_df
    ObjectGroup L_hip_abd
    ObjectGroup L_hip_flex
    ObjectGroup L_hip_inrot
    ObjectGroup L_hip_exrot
    ObjectGroup L_hip_ext
    ObjectGroup L_hip_add
    ObjectGroup L_knee_bend
    ObjectGroup L_knee_ext
    ObjectGroup L_ankle_pf
    ObjectGroup L_inverter
    ObjectGroup L_ankle_df
    ObjectGroup back_ext
    ObjectGroup back_rlb
    ObjectGroup back_introt
    ObjectGroup back_llb
    ObjectGroup back_extrot
    ObjectGroup back_flex
    ObjectGroup R_knee_ligament
    ObjectGroup L_knee_ligament
  MarkerSet:
    Marker r knee 1: femur_r (0.0102116 -0.400988 0.0385042)
    Marker r knee 2: femur_r (-0.00748508 -0.459852 0.0522284)
    Marker r tub: tibia_r (0.0576575 -0.0794414 0.012962)
    Marker r shin: tibia_r (0.0468346 -0.181347 -0.00358577)
    Marker r mall: tibia_r (-0.00665906 -0.39927 0.0433886)
    Marker r mall m: tibia_r (0.00268658 -0.399199 -0.0383278)
    Marker r cpeg: talus_r (-0.104419 0.00824625 0.000398615) fixed=true
    Marker r pcal: tibia_r (-0.0442241 -0.380075 -0.000329117)
    Marker r cal: calcn_r (-0.0184466 -0.0101418 0.0325614) fixed=true
    Marker r heel: calcn_r (-0.0620902 4.55993e-5 0.00155133) fixed=true
    Marker r met 5b: metatarsal_tiny_r (0.00560832 -0.0180094 0.039161)
    Marker r met 5h: metatarsal_tiny_r (0.0639411 -0.0220049 0.0493376)
    Marker r met 1h: metatarsal_thumb_r (0.0870065 -0.0214549 -0.0420881)
    Marker r hallux: toes_thumb_r (0.0451642 -0.0161443 -0.0169351)
    Marker r met: toes_index_r (-0.000928182 0.0118932 0.000107198)
    Marker r met 1b: midfoot_r (0.0115403 0.0139148 -0.0359235)
    Marker l knee 1: femur_l (0.0102116 -0.400988 -0.038504)
    Marker l knee 2: femur_l (-0.0074851 -0.459852 -0.052228)
    Marker l tub: tibia_l (0.0576576 -0.0796445 -0.012962)
    Marker l shin: tibia_l (0.0468346 -0.181551 0.0035858)
    Marker l mall: tibia_l (-0.00665904 -0.399473 -0.043389)
    Marker l mall m: tibia_l (0.00268656 -0.399402 0.0383278)
    Marker l cpeg: talus_l (-0.104419 0.00804349 -0.0003986)
    Marker l pcal: tibia_l (-0.0442241 -0.380279 0.0003291)
    Marker l cal: calcn_l (-0.0184466 -0.0103442 -0.0325615)
    Marker l heel: calcn_l (-0.0620902 -0.000157184 -0.00155133)
    Marker l met 5b: metatarsal_tiny_l (0.0056083 -0.0182117 -0.0391606)
    Marker l met 5h: metatarsal_tiny_l (0.0639411 -0.0222077 -0.0493376)
    Marker l met 1h: metatarsal_thumb_l (0.0870065 -0.0216577 0.0420881)
    Marker l hallux: toes_thumb_l (0.071678 -0.0262589 0.0390669)
    Marker l met: toes_index_l (0.0255856 0.00177813 -0.0029755)
    Marker l met 1b: midfoot_l (0.0115403 0.0137123 0.0359235)
  ContactGeometrySet:
    ContactMesh medial_meniscus: body_name=tibia_r location=(0 -0.098 -0.06) orientation=(0.2 0.2 3.3)
        filename=.\Geometry\med_meniscus.obj
    ContactMesh OK_femur_cartilage_med: body_name=femur_r location=(0 -0.8 -0.065)
        filename=.\Geometry\OK_femur_cartilage_med2.stl
    ContactMesh lateral_meniscus: body_name=tibia_r location=(0.02 -0.09 0.025) orientation=(0.2 0.1 -3)
        filename=.\Geometry\lat_meniscus3.obj
    ContactMesh OK_femur_cartilage_lat: body_name=femur_r location=(0 -0.8 0.045)
        filename=.\Geometry\OK_femur_cartilage_med2.obj
